// SBML level 2 version 4

model Immune_Oncology_Model()
  // Immune Oncology Model

  // Compartments:
  // Central compartment (C) volume
  compartment V_C = 5 MWBUILTINUNIT_liter;
  // Peripheral compartment (P) volume
  compartment V_P = 60 MWBUILTINUNIT_liter;
  // Tumor compartment (T) volume
  compartment V_T; V_T has MWBUILTINPREFIX_milli_MWBUILTINUNIT_liter;
  // Lymph node (LN) compartment volume
  compartment V_LN = 1112.647 MWDERIVEDUNIT_millimeter___3;
  // APC endosomal compartment
  compartment V_e = 4e-16 litre;
  // APC endosomal surface compartment
  compartment A_e = 15 MWDERIVEDUNIT_micrometer___2;  // 2-D
  // APC surface compartment
  compartment A_s = 900 MWDERIVEDUNIT_micrometer___2;  // 2-D
  // synapse compartment between CD8 and C1
  compartment syn_CD8_C1 = 37.8 MWDERIVEDUNIT_micrometer___2;  // 2-D
  // synapse compartment between CD8 and APC
  compartment syn_CD8_APC = 37.8 MWDERIVEDUNIT_micrometer___2;  // 2-D
  // synapse compartment between macrophage and cancer cell
  compartment syn_M_C = 37.8 MWDERIVEDUNIT_micrometer___2;  // 2-D
  // Intradermal injection site compartment
  compartment V_ID = 0.0001 MWBUILTINUNIT_liter;

  // Species:
  // Number of naive Treg cells in the central compartment
  substanceOnly species nCD4_V_C in V_C = 3706.897;  // substance in MWUSERUNIT_cell
  substanceOnly species Treg_V_C in V_C = 0;  // substance in MWUSERUNIT_cell
  // Number of naive CD8 cells in the central compartment
  substanceOnly species nCD8_V_C in V_C = 2274.775;  // substance in MWUSERUNIT_cell
  // Number of CD8 cells in the central compartment
  substanceOnly species CD8_V_C in V_C = 0;  // substance in MWUSERUNIT_cell
  // Concentration of aPD1 in central compartment
  species aPD1_V_C in V_C = 0;  // substance in MWDERIVEDUNIT_nanomolarity_liter
  // Number of Th cells in the central compartment
  substanceOnly species Th_V_C in V_C = 0;  // substance in MWUSERUNIT_cell
  // Cyclophosphamide for Treg depletion (low-dose immunomodulatory)
  substanceOnly species Cy in V_C = 0;  // substance in MWBUILTINPREFIX_milli_MWBUILTINUNIT_gram
  // Cyclophosphamide durable PD effect compartment (mg-equiv signal; durable Treg-reconstitution block)
  substanceOnly species Cy_eff in V_C = 0;  // substance in MWBUILTINPREFIX_milli_MWBUILTINUNIT_gram
  // Number of Tfh cells in the central compartment
  substanceOnly species Tfh_V_C in V_C = 0;  // substance in MWUSERUNIT_cell
  // Number of naive B cells in the central compartment
  substanceOnly species nB_V_C in V_C = 1000000000;  // substance in MWUSERUNIT_cell
  // Number of B cells in the central compartment
  substanceOnly species B_V_C in V_C = 0;  // substance in MWUSERUNIT_cell
  // Number of naive Treg cells in the peripheral compartment
  substanceOnly species nCD4_V_P in V_P = 185344.8;  // substance in MWUSERUNIT_cell
  substanceOnly species Treg_V_P in V_P = 0;  // substance in MWUSERUNIT_cell
  // Number of naive CD8 cells in the peripheral compartment
  substanceOnly species nCD8_V_P in V_P = 113738.7;  // substance in MWUSERUNIT_cell
  // Number of CD8 cells in the peripheral compartment
  substanceOnly species CD8_V_P in V_P = 0;  // substance in MWUSERUNIT_cell
  // Concentration of aPD1 in peripheral compartment
  species aPD1_V_P in V_P = 0;  // substance in MWDERIVEDUNIT_nanomolarity_liter
  // Number of Th cells in the peripheral compartment
  substanceOnly species Th_V_P in V_P = 0;  // substance in MWUSERUNIT_cell
  // Number of Tfh cells in the peripheral compartment
  substanceOnly species Tfh_V_P in V_P = 0;  // substance in MWUSERUNIT_cell
  // Number of B cells in the peripheral compartment
  substanceOnly species B_V_P in V_P = 0;  // substance in MWUSERUNIT_cell
  // Dead cancer cells in the tumour compartment
  substanceOnly species C_x in V_T = 0;  // substance in MWUSERUNIT_cell
  // Terminally exhausted CD8 effector T cells (TCF1-)
  substanceOnly species CD8_exh in V_T = 0;  // substance in MWUSERUNIT_cell
  // Progenitor-exhausted (Tpex, TCF1+) CD8 reservoir; self-renews against a niche cap, differentiates to CD8_exh, refluxes to CD8 under checkpoint blockade
  substanceOnly species CD8_pex in V_T = 0;  // substance in MWUSERUNIT_cell
  // Exhausted CD4 effector T cells
  substanceOnly species Th_exh in V_T = 0;  // substance in MWUSERUNIT_cell
  // Number of cancer cells in tumor
  substanceOnly species C1 in V_T = 1;  // substance in MWUSERUNIT_cell
  // Vascular carrying capacity (Hahnfeldt angiogenesis). This is ONLY the vasculature term; the aggregate tumor carrying capacity C_max = (C_cap0 + K_vasc + CAF stromal support) * collagen barrier (see fibroblast_module_enhanced). K_vasc also gates immune access via vasc_ratio = K_vasc/V_T (H_vasc, Teff_module).
  substanceOnly species K_vasc in V_T = 10300;  // substance in MWUSERUNIT_cell
  // VEGF concentration in tumor
  species VEGF in V_T = 0;  // substance in MWDERIVEDUNIT_picogram__milliliter_milliliter
  // Number of Treg cells in the tumor compartment
  substanceOnly species Treg_V_T in V_T = 0;  // substance in MWUSERUNIT_cell
  // Number of CD8 cells in the tumor compartment
  substanceOnly species CD8_V_T in V_T = 0;  // substance in MWUSERUNIT_cell
  // Naive CD8 T cells in tumor (recruited from blood, primed by local mature cDC1)
  substanceOnly species nCD8_V_T in V_T = 0;  // substance in MWUSERUNIT_cell
  // Immature cDC1 (CD11c+CD141+BATF3+CD83-, cross-presenting) in tumor
  substanceOnly species cDC1_V_T in V_T = 0;  // substance in MWUSERUNIT_cell
  // Immature cDC2 (CD11c+CD1c+IRF4+CD83-, MHC-II presenting) in tumor
  substanceOnly species cDC2_V_T in V_T = 0;  // substance in MWUSERUNIT_cell
  // Mature cDC1 (CD83+CD80+CD86+CD141+BATF3+, cross-presenting) in tumor
  substanceOnly species mcDC1_V_T in V_T = 0;  // substance in MWUSERUNIT_cell
  // Mature cDC2 (CD83+CD80+CD86+CD1c+IRF4+, MHC-II presenting) in tumor
  substanceOnly species mcDC2_V_T in V_T = 0;  // substance in MWUSERUNIT_cell
  // Concentration of free antigen (P0) in the LN compartment
  species P0_V_T in V_T = 1e-18;  // substance in MWDERIVEDUNIT_molarity_milliliter
  // Concentration of free antigen (P1) in the LN compartment
  species P1_V_T in V_T = 1e-18;  // substance in MWDERIVEDUNIT_molarity_milliliter
  // Concentration of aPD1 in tumour compartment
  species aPD1_V_T in V_T = 0;  // substance in MWDERIVEDUNIT_nanomolarity_milliliter
  // Number of Th cells in the tumor compartment
  substanceOnly species Th_V_T in V_T = 0;  // substance in MWUSERUNIT_cell
  // Naive CD4 T cells in tumor (recruited from blood, primed by local mature cDC2)
  substanceOnly species nCD4_V_T in V_T = 0;  // substance in MWUSERUNIT_cell
  // IFNg in the tumor compartment
  species IFNg_V_T in V_T = 0;  // substance in MWDERIVEDUNIT_nanomolarity_milliliter
  // TGFb in the tumor compartment
  species TGFb in V_T = 0;  // substance in MWDERIVEDUNIT_nanomolarity_milliliter
  // Number of MDSCs in the tumour compartment
  substanceOnly species MDSC in V_T = 0;  // substance in MWUSERUNIT_cell
  // Concentration of NO in the tumor compartment
  species NO in V_T = 0;  // substance in MWDERIVEDUNIT_nanomolarity_milliliter
  // Concentration of Arg I in the tumor compartment
  species ArgI in V_T = 0;  // substance in MWDERIVEDUNIT_nanomolarity_milliliter
  // Concentration of CCL2 in the tumor compartment
  species CCL2 in V_T = 0;  // substance in MWDERIVEDUNIT_nanomolarity_milliliter
  // Number of M1 macrophage in the tumor compartment
  substanceOnly species Mac_M1 in V_T = 0;  // substance in MWUSERUNIT_cell
  // Number of M2 macrophage in the tumor compartment
  substanceOnly species Mac_M2 in V_T = 0;  // substance in MWUSERUNIT_cell
  // Concentration of IL-12 in tumor
  species IL12 in V_T = 0;  // substance in MWDERIVEDUNIT_nanomolarity_milliliter
  // Concentration of IL-10 in tumor
  species IL10 in V_T = 0;  // substance in MWDERIVEDUNIT_nanomolarity_milliliter
  // Quiescent pancreatic stellate cells in tumor compartment. In normal pancreas, PSCs store vitamin A and maintain stromal homeostasis.
  substanceOnly species qPSC in V_T = 0;  // substance in MWUSERUNIT_cell
  // Inflammatory cancer-associated fibroblasts. Secrete IL-6 and CXCL12, driving MDSC recruitment, M2 polarization, and CXCR4-mediated T-cell exclusion (Elyada 2019, Ogawa 2021). Driven by tumor-derived IL-1alpha; TGFb antagonizes via IL-1R1 repression.
  substanceOnly species iCAF in V_T = 0;  // substance in MWUSERUNIT_cell
  // Myofibroblastic cancer-associated fibroblasts. Secrete ECM (collagen), TGFb, VEGF. Build desmoplastic barrier. Favored by TGFb signaling (Biffi 2019). (CXCL12 is iCAF-derived, not myCAF -- audit m2-A-ECM-01.)
  substanceOnly species myCAF in V_T = 0;  // substance in MWUSERUNIT_cell
  // Antigen-presenting cancer-associated fibroblasts. Express MHC-II, present tumor antigen tolerogenically -> Treg induction. Rarest subtype ~2-5% of CAFs (Elyada 2019).
  substanceOnly species apCAF in V_T = 0;  // substance in MWUSERUNIT_cell
  // Fibrillar collagen (types I/III) in tumor (total mass in mg). Primary structural ECM component driving desmoplasia. Determines pore size (immune exclusion) and stiffness (mechanotransduction).
  substanceOnly species collagen in V_T = 0;  // substance in MWBUILTINPREFIX_milli_MWBUILTINUNIT_gram
  // CXCL12/SDF-1 chemokine secreted by iCAFs. Major T cell exclusion mechanism in PDAC via CXCR4 signaling (Elyada 2019, Ogawa 2021).
  species CXCL12 in V_T = 0;  // substance in MWDERIVEDUNIT_nanomolarity_milliliter
  // Interleukin-6 inflammatory cytokine secreted by iCAFs. Promotes MDSC recruitment, M2 polarization, tumor progression.
  species IL6 in V_T = 0;  // substance in MWDERIVEDUNIT_nanomolarity_milliliter
  // Interleukin-1alpha in tumor compartment. Tumor-derived; drives iCAF formation via NF-kB/LIF/JAK-STAT3. TGFb antagonizes signaling by downregulating IL-1R1.
  species IL1 in V_T = 0;  // substance in MWDERIVEDUNIT_nanomolarity_milliliter
  // Number of Tfh cells in the tumor compartment
  substanceOnly species Tfh_V_T in V_T = 0;  // substance in MWUSERUNIT_cell
  // Number of naive B cells in the tumor compartment (ABM: BCELL_NAIVE)
  substanceOnly species nB_V_T in V_T = 0;  // substance in MWUSERUNIT_cell
  // Number of activated B cells in the tumor compartment (ABM: BCELL_ACTIVATED)
  substanceOnly species aB_V_T in V_T = 0;  // substance in MWUSERUNIT_cell
  // Number of plasma cells in the tumor compartment (ABM: BCELL_PLASMA)
  substanceOnly species Plasma in V_T = 0;  // substance in MWUSERUNIT_cell
  // Naive regulatory B cells in tumor (Breg-switched nB, IL-10 functional state)
  substanceOnly species nBreg in V_T = 0;  // substance in MWUSERUNIT_cell
  // Activated regulatory B cells in tumor (Breg-switched aB, IL-10 secreting)
  substanceOnly species aBreg in V_T = 0;  // substance in MWUSERUNIT_cell
  // Endogenous polyclonal IgG in tumor (ABM: PDE_CONC_ANTIBODY)
  species Ab in V_T = 0;  // substance in MWDERIVEDUNIT_nanomolarity_milliliter
  // Number of naive Treg cells in the lymph node
  substanceOnly species nCD4_V_LN in V_LN = 155.6897;  // substance in MWUSERUNIT_cell
  // Number of activated Treg cells in the lymph node
  substanceOnly species aTreg in V_LN = 0;  // substance in MWUSERUNIT_cell
  // Number of Treg cells in the lymph node compartment
  substanceOnly species Treg_V_LN in V_LN = 0;  // substance in MWUSERUNIT_cell
  // Number of naive CD8 cells in the lymph node
  substanceOnly species nCD8_V_LN in V_LN = 113.7387;  // substance in MWUSERUNIT_cell
  // Number of activated CD8 cells in the lymph node
  substanceOnly species aCD8 in V_LN = 0;  // substance in MWUSERUNIT_cell
  // Number of CD8 cells in the lymph node compartment
  substanceOnly species CD8_V_LN in V_LN = 0;  // substance in MWUSERUNIT_cell
  // Immature cDC1 (CD11c+CD141+BATF3+CD83-) in lymph node
  substanceOnly species cDC1_V_LN in V_LN = 0;  // substance in MWUSERUNIT_cell
  // Immature cDC2 (CD11c+CD1c+IRF4+CD83-) in lymph node
  substanceOnly species cDC2_V_LN in V_LN = 0;  // substance in MWUSERUNIT_cell
  // Mature cDC1 (CD83+CD80+CD86+CD141+BATF3+CCR7+) in lymph node
  substanceOnly species mcDC1_V_LN in V_LN = 0;  // substance in MWUSERUNIT_cell
  // Mature cDC2 (CD83+CD80+CD86+CD1c+IRF4+CCR7+) in lymph node
  substanceOnly species mcDC2_V_LN in V_LN = 0;  // substance in MWUSERUNIT_cell
  // Concentration of aPD1 in lymph node compartment
  species aPD1_V_LN in V_LN = 0;  // substance in MWDERIVEDUNIT_nanomolarity_millimeter___3
  // Number of activated Th cells in the lymph node
  substanceOnly species aTh in V_LN = 0;  // substance in MWUSERUNIT_cell
  // Number of Th cells in the lymph node compartment
  substanceOnly species Th_V_LN in V_LN = 0;  // substance in MWUSERUNIT_cell
  // IFNg in the lymph node compartment (local priming milieu)
  species IFNg_V_LN in V_LN = 0;  // substance in MWDERIVEDUNIT_nanomolarity_millimeter___3
  // Number of activated Tfh cells in the lymph node
  substanceOnly species aTfh in V_LN = 0;  // substance in MWUSERUNIT_cell
  // Number of Tfh cells in the lymph node compartment
  substanceOnly species Tfh_V_LN in V_LN = 0;  // substance in MWUSERUNIT_cell
  // Number of naive B cells in the lymph node
  substanceOnly species nB_V_LN in V_LN = 40000000;  // substance in MWUSERUNIT_cell
  // Number of activated B cells in the lymph node
  substanceOnly species aB_V_LN in V_LN = 0;  // substance in MWUSERUNIT_cell
  // Number of B cells in the lymph node compartment
  substanceOnly species B_V_LN in V_LN = 0;  // substance in MWUSERUNIT_cell
  // Concentration of antigen P0 in the APC endosomes
  species P0_V_e in V_e = 1e-18;  // substance in MWDERIVEDUNIT_molarity_litre
  // Concentration of epitope P0 in the APC endosomes
  species p0 in V_e = 1e-18;  // substance in MWDERIVEDUNIT_molarity_litre
  // Concentration of antigen P1 in the APC endosomes
  species P1_V_e in V_e = 1e-18;  // substance in MWDERIVEDUNIT_molarity_litre
  // Concentration of epitope P1 in the APC endosomes
  species p1 in V_e = 1e-18;  // substance in MWDERIVEDUNIT_molarity_litre
  // Amount of MHC per area on the endosomal surface
  species M1_A_e in A_e = 2185.792;  // substance in MWDERIVEDUNIT_molecule__micrometer___2_micrometer___2
  // Antigen-MHC complex
  species M1p0_A_e in A_e = 1e-6;  // substance in MWDERIVEDUNIT_molecule__micrometer___2_micrometer___2
  // Antigen-MHC complex
  species M1p1_A_e in A_e = 1e-6;  // substance in MWDERIVEDUNIT_molecule__micrometer___2_micrometer___2
  // Amount of MHC per area on the cell surface
  species M1_A_s in A_s = 1e-6;  // substance in MWDERIVEDUNIT_molecule__micrometer___2_micrometer___2
  // Antigen-MHC complex
  species M1p0_A_s in A_s = 1e-6;  // substance in MWDERIVEDUNIT_molecule__micrometer___2_micrometer___2
  // Antigen-MHC complex
  species M1p1_A_s in A_s = 1e-6;  // substance in MWDERIVEDUNIT_molecule__micrometer___2_micrometer___2
  // concentration of PD1-PDL1 complex
  species PD1_PDL1_syn_CD8_C1 in syn_CD8_C1 = 0;  // substance in MWDERIVEDUNIT_molecule__micrometer___2_micrometer___2
  // concentration of PD1-PDL2 complex
  species PD1_PDL2_syn_CD8_C1 in syn_CD8_C1 = 0;  // substance in MWDERIVEDUNIT_molecule__micrometer___2_micrometer___2
  // concentration of PD1 in synapse
  species PD1_syn_CD8_C1 in syn_CD8_C1 = CD8_PD1_total/A_Tcell;  // substance in MWDERIVEDUNIT_molecule__micrometer___2_micrometer___2
  // concentration of PDL1 in synapse
  species PDL1_syn_CD8_C1 in syn_CD8_C1 = C1_PDL1_base/A_cell;  // substance in MWDERIVEDUNIT_molecule__micrometer___2_micrometer___2
  // concentration of PDL2 in synapse
  species PDL2_syn_CD8_C1 in syn_CD8_C1 = C1_PDL1_base*r_PDL2C1/A_cell;  // substance in MWDERIVEDUNIT_molecule__micrometer___2_micrometer___2
  // concentration of PD1-aPD1 complex
  species PD1_aPD1_syn_CD8_C1 in syn_CD8_C1 = 0;  // substance in MWDERIVEDUNIT_molecule__micrometer___2_micrometer___2
  // concentration of PD1-aPD1-PD1 complex
  species PD1_aPD1_PD1_syn_CD8_C1 in syn_CD8_C1 = 0;  // substance in MWDERIVEDUNIT_molecule__micrometer___2_micrometer___2
  // concentration of PDL1 in synapse of T cell
  species TPDL1_syn_CD8_C1 in syn_CD8_C1 = CD8_PDL1_total/A_Tcell;  // substance in MWDERIVEDUNIT_molecule__micrometer___2_micrometer___2
  // concentration of CD28-CD80 complex
  species CD28_CD80_syn_CD8_C1 in syn_CD8_C1 = 0;  // substance in MWDERIVEDUNIT_molecule__micrometer___2_micrometer___2
  // concentration of CD28-CD80-CD28 complex
  species CD28_CD80_CD28_syn_CD8_C1 in syn_CD8_C1 = 0;  // substance in MWDERIVEDUNIT_molecule__micrometer___2_micrometer___2
  // concentration of CD28-CD86 complex
  species CD28_CD86_syn_CD8_C1 in syn_CD8_C1 = 0;  // substance in MWDERIVEDUNIT_molecule__micrometer___2_micrometer___2
  // concentration of CD80-CTLA4 complex
  species CD80_CTLA4_syn_CD8_C1 in syn_CD8_C1 = 0;  // substance in MWDERIVEDUNIT_molecule__micrometer___2_micrometer___2
  // concentration of CD80-CTLA4-CD80 complex
  species CD80_CTLA4_CD80_syn_CD8_C1 in syn_CD8_C1 = 0;  // substance in MWDERIVEDUNIT_molecule__micrometer___2_micrometer___2
  // concentration of CTLA4-CD80-CTLA4 complex
  species CTLA4_CD80_CTLA4_syn_CD8_C1 in syn_CD8_C1 = 0;  // substance in MWDERIVEDUNIT_molecule__micrometer___2_micrometer___2
  // concentration of CD80-CTLA4-CD80-CTLA4 complex
  species CD80_CTLA4_CD80_CTLA4_syn_CD8_C1 in syn_CD8_C1 = 0;  // substance in MWDERIVEDUNIT_molecule__micrometer___2_micrometer___2
  // concentration of CD86-CTLA4 complex
  species CD86_CTLA4_syn_CD8_C1 in syn_CD8_C1 = 0;  // substance in MWDERIVEDUNIT_molecule__micrometer___2_micrometer___2
  // concentration of CD86-CTLA4-CD86 complex
  species CD86_CTLA4_CD86_syn_CD8_C1 in syn_CD8_C1 = 0;  // substance in MWDERIVEDUNIT_molecule__micrometer___2_micrometer___2
  // concentration of PDL1-CD80 complex
  species PDL1_CD80_syn_CD8_C1 in syn_CD8_C1 = 0;  // substance in MWDERIVEDUNIT_molecule__micrometer___2_micrometer___2
  // concentration of PDL1-CD80-CD28 complex
  species PDL1_CD80_CD28_syn_CD8_C1 in syn_CD8_C1 = 0;  // substance in MWDERIVEDUNIT_molecule__micrometer___2_micrometer___2
  // concentration of PDL1-CD80-CTLA4 complex
  species PDL1_CD80_CTLA4_syn_CD8_C1 in syn_CD8_C1 = 0;  // substance in MWDERIVEDUNIT_molecule__micrometer___2_micrometer___2
  // concentration of CD28 in synapse
  species CD28_syn_CD8_C1 in syn_CD8_C1 = CD8_CD28_total/A_Tcell;  // substance in MWDERIVEDUNIT_molecule__micrometer___2_micrometer___2
  // concentration of CTLA4 in synapse
  species CTLA4_syn_CD8_C1 in syn_CD8_C1 = CD8_CTLA4_syn/A_Tcell;  // substance in MWDERIVEDUNIT_molecule__micrometer___2_micrometer___2
  // concentration of CD80 dimer in synapse
  species CD80_syn_CD8_C1 in syn_CD8_C1 = C1_CD80_total/A_cell;  // substance in MWDERIVEDUNIT_molecule__micrometer___2_micrometer___2
  // concentration of CD80 monomer in synapse
  species CD80m_syn_CD8_C1 in syn_CD8_C1 = 0;  // substance in MWDERIVEDUNIT_molecule__micrometer___2_micrometer___2
  // concentration of CD86 in synapse
  species CD86_syn_CD8_C1 in syn_CD8_C1 = C1_CD86_total/A_cell;  // substance in MWDERIVEDUNIT_molecule__micrometer___2_micrometer___2
  // concentration of PD1-PDL1 complex
  species PD1_PDL1_syn_CD8_APC in syn_CD8_APC = 0;  // substance in MWDERIVEDUNIT_molecule__micrometer___2_micrometer___2
  // concentration of PD1-PDL2 complex
  species PD1_PDL2_syn_CD8_APC in syn_CD8_APC = 0;  // substance in MWDERIVEDUNIT_molecule__micrometer___2_micrometer___2
  // concentration of PD1 in synapse
  species PD1_syn_CD8_APC in syn_CD8_APC = CD8_PD1_total/A_Tcell;  // substance in MWDERIVEDUNIT_molecule__micrometer___2_micrometer___2
  // concentration of PDL1 in synapse
  species PDL1_syn_CD8_APC in syn_CD8_APC = APC_PDL1_base/A_APC;  // substance in MWDERIVEDUNIT_molecule__micrometer___2_micrometer___2
  // concentration of PDL2 in synapse
  species PDL2_syn_CD8_APC in syn_CD8_APC = APC_PDL1_base*r_PDL2APC/A_APC;  // substance in MWDERIVEDUNIT_molecule__micrometer___2_micrometer___2
  // concentration of PD1-aPD1 complex
  species PD1_aPD1_syn_CD8_APC in syn_CD8_APC = 0;  // substance in MWDERIVEDUNIT_molecule__micrometer___2_micrometer___2
  // concentration of PD1-aPD1-PD1 complex
  species PD1_aPD1_PD1_syn_CD8_APC in syn_CD8_APC = 0;  // substance in MWDERIVEDUNIT_molecule__micrometer___2_micrometer___2
  // concentration of PDL1 in synapse of T cell
  species TPDL1_syn_CD8_APC in syn_CD8_APC = CD8_PDL1_total/A_Tcell;  // substance in MWDERIVEDUNIT_molecule__micrometer___2_micrometer___2
  // concentration of CD28-CD80 complex
  species CD28_CD80_syn_CD8_APC in syn_CD8_APC = 0;  // substance in MWDERIVEDUNIT_molecule__micrometer___2_micrometer___2
  // concentration of CD28-CD80-CD28 complex
  species CD28_CD80_CD28_syn_CD8_APC in syn_CD8_APC = 0;  // substance in MWDERIVEDUNIT_molecule__micrometer___2_micrometer___2
  // concentration of CD28-CD86 complex
  species CD28_CD86_syn_CD8_APC in syn_CD8_APC = 0;  // substance in MWDERIVEDUNIT_molecule__micrometer___2_micrometer___2
  // concentration of CD80-CTLA4 complex
  species CD80_CTLA4_syn_CD8_APC in syn_CD8_APC = 0;  // substance in MWDERIVEDUNIT_molecule__micrometer___2_micrometer___2
  // concentration of CD80-CTLA4-CD80 complex
  species CD80_CTLA4_CD80_syn_CD8_APC in syn_CD8_APC = 0;  // substance in MWDERIVEDUNIT_molecule__micrometer___2_micrometer___2
  // concentration of CTLA4-CD80-CTLA4 complex
  species CTLA4_CD80_CTLA4_syn_CD8_APC in syn_CD8_APC = 0;  // substance in MWDERIVEDUNIT_molecule__micrometer___2_micrometer___2
  // concentration of CD80-CTLA4-CD80-CTLA4 complex
  species CD80_CTLA4_CD80_CTLA4_syn_CD8_APC in syn_CD8_APC = 0;  // substance in MWDERIVEDUNIT_molecule__micrometer___2_micrometer___2
  // concentration of CD86-CTLA4 complex
  species CD86_CTLA4_syn_CD8_APC in syn_CD8_APC = 0;  // substance in MWDERIVEDUNIT_molecule__micrometer___2_micrometer___2
  // concentration of CD86-CTLA4-CD86 complex
  species CD86_CTLA4_CD86_syn_CD8_APC in syn_CD8_APC = 0;  // substance in MWDERIVEDUNIT_molecule__micrometer___2_micrometer___2
  // concentration of PDL1-CD80 complex
  species PDL1_CD80_syn_CD8_APC in syn_CD8_APC = 0;  // substance in MWDERIVEDUNIT_molecule__micrometer___2_micrometer___2
  // concentration of PDL1-CD80-CD28 complex
  species PDL1_CD80_CD28_syn_CD8_APC in syn_CD8_APC = 0;  // substance in MWDERIVEDUNIT_molecule__micrometer___2_micrometer___2
  // concentration of PDL1-CD80-CTLA4 complex
  species PDL1_CD80_CTLA4_syn_CD8_APC in syn_CD8_APC = 0;  // substance in MWDERIVEDUNIT_molecule__micrometer___2_micrometer___2
  // concentration of CD28 in synapse
  species CD28_syn_CD8_APC in syn_CD8_APC = CD8_CD28_total/A_Tcell;  // substance in MWDERIVEDUNIT_molecule__micrometer___2_micrometer___2
  // concentration of CTLA4 in synapse
  species CTLA4_syn_CD8_APC in syn_CD8_APC = CD8_CTLA4_syn/A_Tcell;  // substance in MWDERIVEDUNIT_molecule__micrometer___2_micrometer___2
  // concentration of CD80 dimer in synapse
  species CD80_syn_CD8_APC in syn_CD8_APC = APC_CD80_total/A_APC;  // substance in MWDERIVEDUNIT_molecule__micrometer___2_micrometer___2
  // concentration of CD80 monomer in synapse
  species CD80m_syn_CD8_APC in syn_CD8_APC = 0;  // substance in MWDERIVEDUNIT_molecule__micrometer___2_micrometer___2
  // concentration of CD86 in synapse
  species CD86_syn_CD8_APC in syn_CD8_APC = APC_CD86_total/A_APC;  // substance in MWDERIVEDUNIT_molecule__micrometer___2_micrometer___2
  species CD47 in syn_M_C = C_CD47;  // substance in MWDERIVEDUNIT_molecule__micrometer___2_micrometer___2
  species SIRPa in syn_M_C = M_SIRPa;  // substance in MWDERIVEDUNIT_molecule__micrometer___2_micrometer___2
  // concentration CD47-SIRPa complex in synapse
  species CD47_SIRPa in syn_M_C = 0;  // substance in MWDERIVEDUNIT_molecule__micrometer___2_micrometer___2
  // concentration of bound and unbound PDL1 molecules
  species PDL1_total in syn_M_C;  // substance in MWDERIVEDUNIT_molecule__micrometer___2_micrometer___2
  // concentration of bound and unbound PDL2 molecules
  species PDL2_total in syn_M_C;  // substance in MWDERIVEDUNIT_molecule__micrometer___2_micrometer___2
  // concentration of PD1-PDL1 complex
  species PD1_PDL1_syn_M_C in syn_M_C = 0;  // substance in MWDERIVEDUNIT_molecule__micrometer___2_micrometer___2
  // concentration of PD1-PDL2 complex
  species PD1_PDL2_syn_M_C in syn_M_C = 0;  // substance in MWDERIVEDUNIT_molecule__micrometer___2_micrometer___2
  // concentration of PD1 in synapse
  species PD1_syn_M_C in syn_M_C = M_PD1_total/A_Mcell;  // substance in MWDERIVEDUNIT_molecule__micrometer___2_micrometer___2
  // concentration of PDL1 in synapse
  species PDL1_syn_M_C in syn_M_C = C1_PDL1_base/A_cell;  // substance in MWDERIVEDUNIT_molecule__micrometer___2_micrometer___2
  // concentration of PDL2 in synapse
  species PDL2_syn_M_C in syn_M_C = C1_PDL1_base*r_PDL2C1/A_cell;  // substance in MWDERIVEDUNIT_molecule__micrometer___2_micrometer___2
  // concentration of PD1-aPD1 complex
  species PD1_aPD1_syn_M_C in syn_M_C = 0;  // substance in MWDERIVEDUNIT_molecule__micrometer___2_micrometer___2
  // concentration of PD1-aPD1-PD1 complex
  species PD1_aPD1_PD1_syn_M_C in syn_M_C = 0;  // substance in MWDERIVEDUNIT_molecule__micrometer___2_micrometer___2
  // concentration of PDL1-CD80 complex
  species PDL1_CD80_syn_M_C in syn_M_C = 0;  // substance in MWDERIVEDUNIT_molecule__micrometer___2_micrometer___2
  // concentration of CD80 in synapse
  species CD80_syn_M_C in syn_M_C = C1_CD80_total/A_cell;  // substance in MWDERIVEDUNIT_molecule__micrometer___2_micrometer___2
  // concentration of CD80 monomer in synapse
  species CD80m_syn_M_C in syn_M_C = 0;  // substance in MWDERIVEDUNIT_molecule__micrometer___2_micrometer___2
  // GVAX vaccine cells at intradermal injection site
  substanceOnly species GVAX_cells in V_ID = 0;  // substance in MWUSERUNIT_cell
  // Naive APCs recruited to injection site
  substanceOnly species APC in V_ID = 0;  // substance in MWUSERUNIT_cell
  // Mature APCs with antigen at injection site
  substanceOnly species mAPC in V_ID = 0;  // substance in MWUSERUNIT_cell
  // GM-CSF amount at injection site
  substanceOnly species GMCSF in V_ID = 0;  // substance in MWBUILTINPREFIX_nano_MWBUILTINUNIT_mole
  // GVAX-derived antigen at injection site
  substanceOnly species P1_GVAX in V_ID = 0;  // substance in MWBUILTINPREFIX_nano_MWBUILTINUNIT_mole

  // Parameters:
  // Rate of dead cell clearance from tumour compartment
  k_cell_clear = 0.1 MWDERIVEDUNIT_1__day;
  // unit parameter for calculation
  cell = 1 MWUSERUNIT_cell;
  // unit parameter for calculation
  day = 1 MWBUILTINUNIT_day;
  // Average diameter of cancer cell
  D_cell = 17 MWBUILTINPREFIX_micro_MWBUILTINUNIT_meter;
  // Average volume of cancer cell
  vol_cell = 2572.441 MWDERIVEDUNIT_micrometer___3__cell;
  // Average volume of T cells
  vol_Tcell = 175.0157 MWDERIVEDUNIT_micrometer___3__cell;
  // Intracellular fraction of the tumor
  Ve_T = 0.37 dimensionless;
  // Minimum tumor compartment volume (cancer-free baseline)
  V_Tmin = 1e-6 MWBUILTINPREFIX_milli_MWBUILTINUNIT_liter;
  // Total number of cancer cells
  C_total has MWUSERUNIT_cell;
  // Total number of activated T cells in tumor
  T_total has MWUSERUNIT_cell;
  // Total number of activated T cells in TDLNs
  T_total_LN has MWUSERUNIT_cell;
  // Rate of cancer cell death
  R_Tcell has MWDERIVEDUNIT_cell__day;
  // Total number of Tregs in tumor compartment (V_T.Treg)
  Tregs has MWUSERUNIT_cell; Tregs is "Tregs_";
  // Hill function of cDC2 for Treg activation (shared nCD4 pool, self-antigen)
  H_APC_Treg has dimensionless;
  // Hill function of PDL1 on chemotherapy-sensitive tumor cells for T cell exhaustion
  H_PD1_C1 has dimensionless;
  // Hill function of PDL1 on APC for T cell exhaustion
  H_PD1_APC has dimensionless;
  // Hill function of CD28 on tumor cells
  H_CD28_C1 has dimensionless;
  // Hill function of CD28 on APCs for T cell activation
  H_CD28_APC has dimensionless;
  // Cancer growth rate
  k_C1_growth = 0.008 MWDERIVEDUNIT_1__day;
  // Cancer death rate
  k_C1_death = 0.003 MWDERIVEDUNIT_1__day;
  // Aggregate tumor carrying capacity (Gompertzian denominator). Initialized = K_vasc here, then RE-DEFINED in fibroblast_module_enhanced to (C_cap0 + K_vasc + CAF stromal support) * collagen barrier.
  C_max has MWUSERUNIT_cell;
  // Therapy-induced death rate
  k_C1_therapy has MWDERIVEDUNIT_1__day;
  // Pre-treatment tumor diameter
  initial_tumour_diameter = 3.2 MWBUILTINPREFIX_centi_MWBUILTINUNIT_meter;
  // Initial tumor carrying capacity
  K_initial = 10300 MWUSERUNIT_cell;
  // Tumor vasculature growth rate
  k_vas_growth = 0.15 MWDERIVEDUNIT_1__day;
  // Tumor vasculature inhibition rate
  k_vas_decay = 0.0001 MWDERIVEDUNIT_1__day;
  // Per-cell tumor-volume scaling (cancer cell volume in mm^3 ~ 4/3*pi*(D_cell/2)^3*1e-9) for the Hahnfeldt 1999 V^(2/3) endogenous vascular-inhibition surface term (PMID 10519381).
  vas_inhib_vol_scale = 2.57e-6 dimensionless;
  // Angiogenic factor secretion rate
  k_vas_Csec = 0.1 MWDERIVEDUNIT_picogram__cell__day;
  // Angiogenic factor degradation rate
  k_vas_deg = 16.6 MWDERIVEDUNIT_1__day;
  // Half-maximal angiogenic factor concentration for tumor capacity growth
  VEGF_50 = 2410 MWDERIVEDUNIT_picogram__milliliter;
  // T Cell Diversity
  div_Treg = 1160000 dimensionless;
  // Number of self-antigen-specific T cell clones
  n_CD4_clones = 100 dimensionless;
  // Rate of naive T cell transport into the LN
  q_nCD4_LN_in = 0.1 MWDERIVEDUNIT_1__day;
  // Rate of activated T cell transport out of the LN
  q_Treg_LN_out = 24 MWDERIVEDUNIT_1__day;
  // Rate of naive T cell transport out of the LN
  q_nCD4_LN_out = 2.88 MWDERIVEDUNIT_1__day;
  // Treg activation rate
  k_Treg_act = 5 MWDERIVEDUNIT_1__day;
  // Treg proliferation rate
  k_Treg_pro = 0.05 MWDERIVEDUNIT_1__day;
  // Treg death rate
  k_Treg_death = 0.1 MWDERIVEDUNIT_1__day;
  // Tumor-local Treg proliferation rate (Ki67+ 30-60% in PDAC TME)
  k_Treg_pro_tumor = 0.2 MWDERIVEDUNIT_1__day;
  // Max Treg density in tumor (carrying capacity for local proliferation)
  rho_Treg_max = 1300000 MWDERIVEDUNIT_cell__milliliter;
  // rate of Treg transport into the peripheral compartment
  q_Treg_P_in = 0.25 MWDERIVEDUNIT_1__minute;
  // rate of Treg transport out of the peripheral compartment
  q_Treg_P_out = 24 MWDERIVEDUNIT_1__day;
  // rate of Treg transport into the tumor compartment
  q_Treg_T_in = 5.8e-5 MWDERIVEDUNIT_1__centimeter___3_minute;
  // rate of naive Treg transport into the peripheral compartment
  q_nCD4_P_in = 0.1764 MWDERIVEDUNIT_1__minute;
  // rate of naive Treg transport out of the peripheral compartment
  q_nCD4_P_out = 5.1 MWDERIVEDUNIT_1__day;
  // Thymic output of naive Treg cells
  Q_nCD4_thym = 1000000 MWDERIVEDUNIT_cell__day;
  // rate of naive Treg proliferation
  k_nCD4_pro = 320000000 MWDERIVEDUNIT_cell__day;
  // half-maximal peripheral proliferation of naive Treg
  K_nTreg_pro = 1000000000 MWUSERUNIT_cell;
  // rate of naive Treg death
  k_nTreg_death = 0.002 MWDERIVEDUNIT_1__day;
  // Fraction of naturally-occurring Tregs
  f_nTreg = 0.25 dimensionless;
  // Maximal rate of Treg-mediated CD8 exhaustion under saturating IL-10 and Treg:CD8 ratio
  k_Treg_CD8_exh = 0.1 MWDERIVEDUNIT_1__day;
  // Hill function of tumor antigenP0
  H_P0 has dimensionless;
  // T Cell Diversity
  div_CD8 = 1110000 dimensionless;
  // Number of tumor-specific T cell clones
  n_CD8_clones = 120 dimensionless;
  // Rate of naive T cell transport into the LN
  q_nCD8_LN_in = 0.076 MWDERIVEDUNIT_1__day;
  // Rate of activated T cell transport out of the LN
  q_CD8_LN_out = 24 MWDERIVEDUNIT_1__day;
  // Rate of naive T cell transport out of the LN
  q_nCD8_LN_out = 1.8 MWDERIVEDUNIT_1__day;
  // CD8 proliferation rate
  k_CD8_pro = 1 MWDERIVEDUNIT_1__day;
  // Tumor-local CD8 proliferation rate (antigen-gated, PD-1-suppressed)
  k_CD8_T_pro = 0.05 MWDERIVEDUNIT_1__day;
  // Max CD8 density in tumor (carrying capacity for local proliferation)
  rho_CD8_max = 5000000 MWDERIVEDUNIT_cell__milliliter;
  // Density set-point for CD8 crowding death (crowding = linear death at this density)
  rho_CD8_crowd = 20000000 MWDERIVEDUNIT_cell__milliliter;
  // Rate of naive T cell activation per mature APC
  k_T_activation_per_APC = 0.00032 MWDERIVEDUNIT_1__day_cell;
  // CD4-help/CD40L licensing multiplier on cDC1->CD8 priming (rule supplied by Th_module)
  H_CD4_help has dimensionless;
  // CD8 death rate
  k_CD8_death = 0.03 MWDERIVEDUNIT_1__day;
  // rate of CD8+ T cell transport into the peripheral compartment
  q_CD8_P_in = 0.25 MWDERIVEDUNIT_1__minute;
  // rate of CD8+ T cell transport out of the peripheral compartment
  q_CD8_P_out = 24 MWDERIVEDUNIT_1__day;
  // rate of CD8+ T cell transport into the tumor compartment
  q_CD8_T_in = 5.8e-5 MWDERIVEDUNIT_1__centimeter___3_minute;
  // rate of naive CD8+ T cell transport into the peripheral compartment
  q_nCD8_P_in = 0.1764 MWDERIVEDUNIT_1__minute;
  // rate of naive CD8+ T cell transport out of the peripheral compartment
  q_nCD8_P_out = 5.1 MWDERIVEDUNIT_1__day;
  // Thymic output of naive CD8+ T cells
  Q_nCD8_thym = 3000000 MWDERIVEDUNIT_cell__day;
  // rate of naive CD8+ T cell proliferation
  k_nCD8_pro = 320000000 MWDERIVEDUNIT_cell__day;
  // half-maximal peripheral proliferation of naive CD8+ T cells
  K_nCD8_pro = 1000000000 MWUSERUNIT_cell;
  // rate of naive CD8+ T cell death
  k_nCD8_death = 0.002 MWDERIVEDUNIT_1__day;
  // Rate of T cell exhaustion by cancer cells
  k_C_CD8_exh = 0.1 MWDERIVEDUNIT_1__day;
  // Rate of stiffness-mediated T cell exhaustion
  k_stiff_CD8_exh = 0.02 MWDERIVEDUNIT_1__day;
  // Baseline exhaustion rate from chronic TCR stimulation
  k_CD8_basal_exh = 0.05 MWDERIVEDUNIT_1__day;
  // Cancer cell number for half-maximal exhaustion induction
  K_C_exh = 100000000 MWUSERUNIT_cell;
  // Death rate of exhausted CD8 T cells
  k_CD8_exh_death = 0.15 MWDERIVEDUNIT_1__day;
  // Max anti-PD-1 reinvigoration rate of progenitor-exhausted CD8 (at full PD-1 occupancy)
  k_reinvig = 0.0375 MWDERIVEDUNIT_1__day;
  // Niche carrying-capacity density for the progenitor-exhausted (Tpex) reservoir
  rho_pex_max = 10000000 MWDERIVEDUNIT_cell__milliliter;
  // Differentiation rate of Tpex -> terminal exhausted CD8
  k_pex_diff = 0.1 MWDERIVEDUNIT_1__day;
  // Death rate of progenitor-exhausted (Tpex) CD8 (~0.4x k_CD8_exh_death, Miller 2019)
  k_pex_death = 0.041 MWDERIVEDUNIT_1__day;
  // Constitutive Tpex -> effector reflux rate (homeostatic stem-like replenishment)
  k_pex_reflux = 0.005 MWDERIVEDUNIT_1__day;
  // Hill function for CXCL12-mediated T cell exclusion
  H_CXCL12_Texcl has dimensionless;
  // EC50 for vascular-access gating of extravasation (V_T.K_vasc/V_T)
  K50_vasc = 10000000 MWDERIVEDUNIT_cell__milliliter;
  // Hill coefficient for vascular-access gating of extravasation
  n_vasc = 3 dimensionless;
  // Vascular density (V_T.K_vasc/V_T) normalized by K50_vasc (dimensionless intermediate)
  vasc_ratio has dimensionless;
  // Vascular-access Hill: per-volume extravasation efficiency, falls as the tumor outgrows its vasculature
  H_vasc has dimensionless;
  // Hill function of tumor antigen P1
  H_P1 has dimensionless;
  // Treg:Teff ratio for 50% inhibition of T cell killing
  R50_Treg = 0.31 dimensionless;
  // Treg inhibition factor (derived: 1/R50_Treg)
  K_T_Treg has dimensionless;
  // Volume searched by one T cell per day
  v_T_search_volume = 0.0001 MWDERIVEDUNIT_millimeter___3__day;
  // Kill probability per T cell-tumor contact
  p_T_kill_per_contact = 0.45 dimensionless;
  // Max fractional TGFb suppression of CD8 killing (Ahmadzadeh 2005 plateau)
  Emax_TGFb_Teff = 0.4 dimensionless;
  // Effective T cell killing rate including all inhibition factors
  k_C_Tcell_eff has MWDERIVEDUNIT_1__day;
  // Rate of cDC1 maturation (BATF3 program)
  k_APC_mat_cDC1 = 2 MWDERIVEDUNIT_1__day;
  // Rate of cDC2 maturation
  k_APC_mat_cDC2 = 1.5 MWDERIVEDUNIT_1__day;
  // Rate of APC migration
  k_APC_mig = 4 MWDERIVEDUNIT_1__day;
  // Rate of APC death
  k_APC_death = 0.15 MWDERIVEDUNIT_1__day;
  // Rate of mAPC death
  k_mAPC_death = 0.3 MWDERIVEDUNIT_1__day;
  // cDC1 recruitment-target density in tumor (recruit-rate / k_APC_death)
  cDC1_recruit_target_T = 540000 MWDERIVEDUNIT_cell__milliliter;
  // cDC2 recruitment-target density in tumor (recruit-rate / k_APC_death)
  cDC2_recruit_target_T = 200000 MWDERIVEDUNIT_cell__milliliter;
  // cDC1 homeostatic density in LN
  APC0_cDC1_LN = 240000 MWDERIVEDUNIT_cell__milliliter;
  // cDC2 homeostatic density in LN
  APC0_cDC2_LN = 960000 MWDERIVEDUNIT_cell__milliliter;
  // Maximum number of T Cells an APC can interact with
  n_sites_APC = 10 dimensionless;
  // Half-maximal tumor death rate for HMGB1 (DAMP)-mediated APC maturation
  HMGB1_50 = 1000000 MWDERIVEDUNIT_cell__day;
  // Hill function for HMGB1 (DAMP)-mediated APC maturation (uses R_Tcell = total cancer death rate as the HMGB1-release proxy)
  H_HMGB1 has dimensionless;
  // Half-maximal TGFb for inhibition of APC maturation
  TGFb_50_APC = 0.07 MWBUILTINPREFIX_nano_MWBUILTINUNIT_molarity;
  // Hill function for TGFb inhibition of APC maturation
  H_TGFb_APC has dimensionless;
  // Total immature DCs in tumor (cDC1+cDC2; CD11c+CD83-)
  APC_total_T has MWUSERUNIT_cell;
  // Total mature DCs in tumor (mcDC1+mcDC2; CD83+ by IHC)
  mAPC_total_T has MWUSERUNIT_cell;
  // Total mature DCs in LN (mcDC1+mcDC2; CD83+CCR7+)
  mAPC_total_LN has MWUSERUNIT_cell;
  // Rate of MHC internalization
  kin = 14.4 MWDERIVEDUNIT_1__day;
  // Rate of MHC externalization
  kout = 28.8 MWDERIVEDUNIT_1__day;
  // Rate of antigen uptake by APCs
  k_P0_up = 14.4 MWDERIVEDUNIT_1__day__cell;
  // Rate of extracellular antigen degradation
  k_xP0_deg = 2 MWDERIVEDUNIT_1__day;
  // Rate of endosomal antigen degradation
  k_P0_deg = 17.28 MWDERIVEDUNIT_1__day;
  // Rate of endosomal epitope degradation
  k_p0_deg = 144 MWDERIVEDUNIT_1__day;
  // Rate of antigen-MHC binding
  k_P0_on = 144000 MWDERIVEDUNIT_1__day__molarity;
  // Antigen-MHC dissociation constant
  k_P0_d1 = 1e-7 MWBUILTINUNIT_molarity;
  // Epitope concentration for half-maximal T cell activation
  p0_50 = 2.645503e-5 MWDERIVEDUNIT_molecule__micrometer___2;
  // Concentration of P0 in C1
  P0_C1 = 5.4e-13 MWDERIVEDUNIT_mole__cell;
  // Surface area of the synapse
  A_syn = 37.8 MWDERIVEDUNIT_micrometer___2;
  // Surface area of the T cell
  A_Tcell = 151.3104 MWDERIVEDUNIT_micrometer___2;
  // Surface area of the Cancer cell
  A_cell = 907.9203 MWDERIVEDUNIT_micrometer___2;
  // Surface area of the APC
  A_APC = 900 MWDERIVEDUNIT_micrometer___2;
  // Rate of TCR binding to MHC-peptide complex
  k_M1p0_TCR_on = 1 MWDERIVEDUNIT_1__second_molecule__micrometer___2;
  // Rate of TCR unbinding from MHC-peptide complex
  k_M1p0_TCR_off = 1 MWDERIVEDUNIT_1__second;
  // Rate of MHC-peptide-TCR complex modification
  k_M1p0_TCR_p = 1 MWDERIVEDUNIT_1__second;
  // Rate of MHC-peptide-TCR complex with maximal modification that leads to non-signaling
  phi_M1p0_TCR = 0.09 MWDERIVEDUNIT_1__second;
  // Number of modifcation steps for MHC-peptide-TCR complex
  N_M1p0_TCR = 10 dimensionless;
  // Total number of TCR molecules per naive T cell
  TCR_p0_tot = 103.8131 MWDERIVEDUNIT_molecule__micrometer___2;
  // Total number of MHC-p0-TCR complexes of all different activation levels (see Rules)
  pTCR_p0_MHC_tot has MWDERIVEDUNIT_molecule__micrometer___2;
  // Rate of antigen uptake by APCs
  k_P1_up = 14.4 MWDERIVEDUNIT_1__day__cell;
  // Rate of extracellular antigen degradation
  k_xP1_deg = 2 MWDERIVEDUNIT_1__day;
  // Rate of endosomal antigen degradation
  k_P1_deg = 17.28 MWDERIVEDUNIT_1__day;
  // Rate of endosomal epitope degradation
  k_p1_deg = 144 MWDERIVEDUNIT_1__day;
  // Rate of antigen-MHC binding
  k_P1_on = 144000 MWDERIVEDUNIT_1__day__molarity;
  // Antigen-MHC dissociation constant
  k_P1_d1 = 1e-8 MWBUILTINUNIT_molarity;
  // Epitope concentration for half-maximal T cell activation
  p1_50 = 2.645503e-5 MWDERIVEDUNIT_molecule__micrometer___2;
  // Concentration of P1 in C1
  P1_C1 = 5.4e-13 MWDERIVEDUNIT_mole__cell;
  // Rate of TCR binding to MHC-peptide complex
  k_M1p1_TCR_on = 1 MWDERIVEDUNIT_1__second_molecule__micrometer___2;
  // Rate of TCR unbinding from MHC-peptide complex
  k_M1p1_TCR_off = 1 MWDERIVEDUNIT_1__second;
  // Rate of MHC-peptide-TCR complex modification
  k_M1p1_TCR_p = 1 MWDERIVEDUNIT_1__second;
  // Rate of MHC-peptide-TCR complex with maximal modification that leads to non-signaling
  phi_M1p1_TCR = 0.09 MWDERIVEDUNIT_1__second;
  // Number of modifcation steps for MHC-peptide-TCR complex
  N_M1p1_TCR = 10 dimensionless;
  // Total number of TCR molecules per naive T cell
  TCR_p1_tot = 103.8131 MWDERIVEDUNIT_molecule__micrometer___2;
  // Total number of MHC-p1-TCR complexes of all different activation levels (see Rules)
  pTCR_p1_MHC_tot has MWDERIVEDUNIT_molecule__micrometer___2;
  // Capillary filtration rate of aPD1 between central and peripheral compartment
  q_P_aPD1 = 8.8e-6 MWDERIVEDUNIT_liter__second;
  // Capillary filtration rate of aPD1 between central and tumor compartment
  q_T_aPD1 = 8.52e-5 MWDERIVEDUNIT_milliliter__second;
  // Capillary filtration rate of aPD1 between central and TDLN compartment
  q_LN_aPD1 = 3.25e-6 MWDERIVEDUNIT_milliliter__second;
  // Rate of lymphatic drainage of aPD1 from TDLN to central compartment
  q_LD_aPD1 = 0.0015 MWDERIVEDUNIT_1__minute;
  // Clearance rate of aPD1 from central compartment
  k_cl_aPD1 = 0.37 MWDERIVEDUNIT_liter__day;
  // Volume fraction of interstitial space available to aPD1 in central compartment
  gamma_C_aPD1 = 0.61 dimensionless;
  // Volume fraction of interstitial space available to aPD1 in peripheral compartment
  gamma_P_aPD1 = 0.0452 dimensionless;
  // Volume fraction of interstitial space available to aPD1 in tumor compartment
  gamma_T_aPD1 = 0.522 dimensionless;
  // Volume fraction of interstitial space available to aPD1 in TDLN compartment
  gamma_LN_aPD1 = 0.2 dimensionless;
  // kon of PD1-PDL1 binding
  kon_PD1_PDL1 = 0.06 MWDERIVEDUNIT_1__micromolarity_nanometer_second;
  // Expression rate of PDL1 on tumor cells
  k_out_PDL1 = 50000 MWDERIVEDUNIT_molecule__day;
  // Degradation rate of PDL1 on tumor cells
  k_in_PDL1 = 1 MWDERIVEDUNIT_1__day;
  // Number of folds increase of PDL1 expression by IFNg
  r_PDL1_IFNg = 6 dimensionless;
  // kon of PD1-PDL2 binding
  kon_PD1_PDL2 = 0.08 MWDERIVEDUNIT_1__micromolarity_nanometer_second;
  // kon of PD1-aPD1 binding
  kon_PD1_aPD1 = 670000 MWDERIVEDUNIT_1__molarity_second;
  // kon of CD28-CD80 binding
  kon_CD28_CD80 = 0.1333333 MWDERIVEDUNIT_1__micromolarity_nanometer_second;
  // kon of CD28-CD86 binding
  kon_CD28_CD86 = 0.4666667 MWDERIVEDUNIT_1__micromolarity_nanometer_second;
  // kon of CTLA4-CD80 binding
  kon_CTLA4_CD80 = 0.3333333 MWDERIVEDUNIT_1__micromolarity_nanometer_second;
  // kon of CTLA4-CD86 binding
  kon_CTLA4_CD86 = 0.6666667 MWDERIVEDUNIT_1__micromolarity_nanometer_second;
  // kon of CD80-PDL1 binding
  kon_CD80_PDL1 = 0.1066667 MWDERIVEDUNIT_1__micromolarity_nanometer_second;
  // kon of CD80 self-association
  kon_CD80_CD80 = 0.0001966667 MWDERIVEDUNIT_1__micromolarity_nanometer_second;
  // koff of PD1-PDL1 binding
  koff_PD1_PDL1 = 1.476 MWDERIVEDUNIT_1__second;
  // koff of PD1-PDL2 binding
  koff_PD1_PDL2 = 0.552 MWDERIVEDUNIT_1__second;
  // koff of PD1-aPD1 binding
  koff_PD1_aPD1 = 0.00268 MWDERIVEDUNIT_1__second;
  // koff of CD28-CD80 binding
  koff_CD28_CD80 = 1.6 MWDERIVEDUNIT_1__second;
  // koff of CD28-CD86 binding
  koff_CD28_CD86 = 28 MWDERIVEDUNIT_1__second;
  // koff of CTLA4-CD80 binding
  koff_CTLA4_CD80 = 0.42 MWDERIVEDUNIT_1__second;
  // koff of CTLA4-CD86 binding
  koff_CTLA4_CD86 = 5.2 MWDERIVEDUNIT_1__second;
  // koff of CD80-PDL1 binding
  koff_CD80_PDL1 = 6.016 MWDERIVEDUNIT_1__second;
  // koff of CD80 self-association
  koff_CD80_CD80 = 0.01003 MWDERIVEDUNIT_1__second;
  // Antibody cross-arm binding efficiency that also includes the conversion of kon from 3D to 2D
  Chi_PD1_aPD1 = 33.33333 MWDERIVEDUNIT_1__nanometer;
  // PD1/PDL1 concentration for half-maximal T cell inactivation
  PD1_50 = 6 MWDERIVEDUNIT_molecule__micrometer___2;
  // Hill coefficient for PD1/PDL1 half-maximal T cell inactivation
  n_PD1 = 2 dimensionless;
  // CD28-CD80/CD28-CD86 concentration for half-maximal T cell co-estimulation
  CD28_CD8X_50 = 200 MWDERIVEDUNIT_molecule__micrometer___2;
  // Hill coefficient for CD28-CD80/CD28-CD86 half-maximal T cell co-estimulation
  n_CD28_CD8X = 2 dimensionless;
  // concentration of PD1 on CD8 cells
  CD8_PD1_total = 27900 MWBUILTINUNIT_molecule;
  // concentration of CD28 on CD8 cells
  CD8_CD28_total = 184000 MWBUILTINUNIT_molecule;
  // concentration of CTLA4 on CD8 cells
  CD8_CTLA4_syn = 8000 MWBUILTINUNIT_molecule;
  // concentration of PDL1 on CD8 cells
  CD8_PDL1_total = 83700 MWBUILTINUNIT_molecule;
  // baseline number of PDL1 molecules per C1 cell (Zhang 2022, PMID: 35037417; Liang 2018, PMID: 29378617) — PDAC cohort-averaged baseline; per-PDL1+-cell density estimated
  C1_PDL1_base = 4800 MWBUILTINUNIT_molecule;
  // PDL2/PDL1 molecule ratio on C1cell (Cheng 2014, PMID: 23417675)
  r_PDL2C1 = 0.07 dimensionless;
  // number of CD80 molecules per C1 cell (Jansson 2005, PMID: 16034096)
  C1_CD80_total = 80000 MWBUILTINUNIT_molecule;
  // number of CD86 molecules per C1 cell (Jansson 2005, PMID: 16034096)
  C1_CD86_total = 860000 MWBUILTINUNIT_molecule;
  // concentration of bound and unbound PDL1 molecules
  syn_CD8_C1_PDL1_total has MWDERIVEDUNIT_molecule__micrometer___2;
  // concentration of bound and unbound PDL2 molecules
  syn_CD8_C1_PDL2_total has MWDERIVEDUNIT_molecule__micrometer___2;
  // Fraction of synaptic PD1 sequestered by anti-PD-1 (drug-engagement gate for CD8 reinvigoration)
  phi_aPD1_C1 has dimensionless;
  // baseline number of PDL1 molecules per APC cell Per-mDC PD-L1 surface density; ~8e4 surface consistent with Rieckmann 2017 ~214k total copies/cell (~0.37 surface fraction), PMID 28263321; Mayoux 2020 PMID 32161104
  APC_PDL1_base = 80000 MWBUILTINUNIT_molecule;
  // PDL2/PDL1 molecule ratio on APCcell (Cheng 2014, PMID: 23417675)
  r_PDL2APC = 0.07 dimensionless;
  // number of CD80 molecules per APC cell (Jansson 2005, PMID: 16034096)
  APC_CD80_total = 80000 MWBUILTINUNIT_molecule;
  // number of CD86 molecules per APC cell (Jansson 2005, PMID: 16034096)
  APC_CD86_total = 860000 MWBUILTINUNIT_molecule;
  // concentration of bound and unbound PDL1 molecules
  syn_CD8_APC_PDL1_total has MWDERIVEDUNIT_molecule__micrometer___2;
  // concentration of bound and unbound PDL2 molecules
  syn_CD8_APC_PDL2_total has MWDERIVEDUNIT_molecule__micrometer___2;
  // Th differentiation rate to Treg
  k_Th_to_Treg = 0.022 MWDERIVEDUNIT_1__day;
  // CD4 proliferation rate
  k_CD4_pro = 1 MWDERIVEDUNIT_1__day;
  // CD4 death rate
  k_CD4_death = 0.1 MWDERIVEDUNIT_1__day;
  // Half-Maximal cancer cell number for T cell recruitment
  K_C2_recruit = 20200000 MWDERIVEDUNIT_cell___2;
  // Help-independent floor fraction of cDC1->CD8 cross-priming (innate DAMP/IL-12 licensing)
  f_help_indep = 0.2 dimensionless;
  // Half-maximal LN conventional-helper (V_LN.Th) density for CD40L licensing of cDC1
  Th_50_help = 1500 MWUSERUNIT_cell;
  // Half-max V_LN.Th for the division-destiny help-licensing Hill H_div_help (N_aT costim only)
  Th_50_div = 1000000 MWUSERUNIT_cell;
  // Division-destiny help-licensing multiplier (N_aT costim only; decoupled from priming-throughput H_CD4_help)
  H_div_help has dimensionless;
  // Half-maximal internalized endosomal tumor-antigen (V_e.P1) concentration for MHC-II presentation gating Th priming
  p1_II_50 = 1e-11 MWBUILTINUNIT_molarity;
  // MHC-II antigen-presentation Hill gating conventional Th priming (rule below)
  H_P1_II has dimensionless;
  // Baseline Th exhaustion rate from chronic TCR stimulation (mirrors k_CD8_basal_exh)
  k_Th_basal_exh = 0.05 MWDERIVEDUNIT_1__day;
  // Niche carrying-capacity density for the exhausted-Th reservoir (caps Th->Th_exh inflow; mirrors CD8 rho_pex_max)
  rho_Thexh_max = 30000000 MWDERIVEDUNIT_cell__milliliter;
  // Constitutive exhausted-Th -> functional-Th reflux rate (CD4 analog of k_pex_reflux)
  k_Th_reflux = 0.01 MWDERIVEDUNIT_1__day;
  // Maximal Th exhaustion rate driven by TGFβ (chronic immunosuppression)
  k_TGFb_Th_exh = 0.3 MWDERIVEDUNIT_1__day;
  // Tumor-local Th proliferation rate (Ki67+ 20-30% in PDAC TME)
  k_Th_pro_tumor = 0.15 MWDERIVEDUNIT_1__day;
  // Max Th density in tumor (carrying capacity for local proliferation)
  rho_Th_max = 5000000 MWDERIVEDUNIT_cell__milliliter;
  // Baseline tumor-immunosurveillance CD4 Th seeding density-rate (cancer-gated floor)
  k_Th_seed = 100000 MWDERIVEDUNIT_cell__milliliter_day;
  // rate of IL2 degradation
  k_IL2_deg = 0.09079845 MWDERIVEDUNIT_1__minute;
  // rate of IL2 secretion per activated T cell
  k_IL2_sec = 1e-11 MWDERIVEDUNIT_nanomole__cell__hour;
  // rate of IL2 consumption per T cell (all clones)
  k_IL2_cons = 5e-11 MWDERIVEDUNIT_nanomole__cell__hour;
  // T cell activation half-maximal IL2 concentration
  IL2_50 = 0.32 MWBUILTINPREFIX_nano_MWBUILTINUNIT_molarity;
  // number of activated T cell generations by TCR signaling only
  N_div_base = 2 dimensionless;
  // number of activated T cell generations by co-stimulatory signaling only
  N_div_costim = 1.5105 dimensionless;
  // maximum number of activated T cell generations due to IL2 (CD8)
  N_IL2_CD8 = 11 dimensionless;
  // maximum number of activated T cell generations due to IL2 (CD4)
  N_IL2_CD4 = 8.5 dimensionless;
  // paracrine weight of CD4-helper IL-2 vs CD8 autocrine in the IL-2 niche supply
  w_IL2_help = 5 dimensionless;
  // Treg IL-2 uptake weight in the niche demand (local IL-2 restriction)
  kappa_IL2_Treg = 1 dimensionless;
  // aggregate priming-niche volume for the local IL-2 QSS (<< V_LN)
  V_niche = 4.18879e-6 MWBUILTINPREFIX_milli_MWBUILTINUNIT_liter;
  // rate of IFNg secretion per CD8 T cell in tumor
  k_IFNg_Tsec = 2e-13 MWDERIVEDUNIT_nanomole__cell__day;
  // rate of IFNg secretion per Th cell in tumor
  k_IFNg_Thsec = 40.14761 MWDERIVEDUNIT_1__day;
  // IFNg degradation rate
  k_IFNg_deg = 7.68 MWDERIVEDUNIT_1__day;
  // Half-Maximal IFNg level for PD-L1 induction
  IFNg_50_ind = 2.96 MWBUILTINPREFIX_pico_MWBUILTINUNIT_molarity;
  // TGFb secretion rate per Treg cell (all clones)
  k_TGFb_Tsec = 1.2e-10 MWDERIVEDUNIT_nanomole__cell__day;
  // TGFb degradation rate
  k_TGFb_deg = 14.3 MWDERIVEDUNIT_1__day;
  // Baseline TGFb level in PDAC tumor
  TGFb_baseline = 0.016 MWBUILTINPREFIX_nano_MWBUILTINUNIT_molarity;
  // Half-maximal TGFb for Th-to-Treg differentiation
  TGFb_50_Th2Treg = 0.07 MWBUILTINPREFIX_nano_MWBUILTINUNIT_molarity;
  // Half-maximal TGFb for M1-to-M2 macrophage polarization
  TGFb_50_M2pol = 0.07 MWBUILTINPREFIX_nano_MWBUILTINUNIT_molarity;
  // Half-maximal TGFb for chemoresistance development (nab-paclitaxel)
  TGFb_50_chemores = 0.07 MWBUILTINPREFIX_nano_MWBUILTINUNIT_molarity;
  // Half-Maximal TGFb level for CD8 T cell inhibition
  TGFb_50_Teff = 0.14 MWBUILTINPREFIX_nano_MWBUILTINUNIT_molarity;
  // Half-Maximal TGFb level for CD4 helper T cell exhaustion
  TGFb_50_Th_exh = 0.14 MWBUILTINPREFIX_nano_MWBUILTINUNIT_molarity;
  // Bioactive fraction of secreted TGFb
  f_active_TGFb = 0.1 dimensionless;
  // IL-2 niche supply: autocrine CD8 + paracrine CD4-helper (weighted cell count)
  IL2_supply has MWUSERUNIT_cell;
  // IL-2 niche demand: priming CD8 + competing Tregs (weighted cell count)
  IL2_demand has MWUSERUNIT_cell;
  // Local priming-niche IL-2 concentration at QSS (drives division destiny N_aT/N_aTh)
  IL2_niche has MWBUILTINPREFIX_nano_MWBUILTINUNIT_molarity;
  // Number of Activated CD8+ T Cell Generations (see Rules)
  N_aT has dimensionless;
  // Number of Activated T Helper Cell Generations (see Rules)
  N_aTh has dimensionless;
  // Hill function of TGFb for Th-to-Treg differentiation
  H_TGFb_Th2Treg has dimensionless;
  // Hill function of TGFb for chemoresistance development
  H_TGFb_chemores has dimensionless;
  // Hill function of TGFb for Teff inhibition and chemoresistance development
  H_TGFb_Teff has dimensionless;
  // Hill function of TGFb for CD4 helper T cell exhaustion (PD-1+, dysfunction)
  H_TGFb_Th_exh has dimensionless;
  // rate of CCL2 secretion
  k_CCL2_sec = 2e-10 MWDERIVEDUNIT_nanomole__cell__day;
  // rate of CCL2 degradation
  k_CCL2_deg = 0.06 MWDERIVEDUNIT_1__hour;
  // Half-maximal CCL2 level of MDSC recruitment
  CCL2_50 = 0.23 MWBUILTINPREFIX_nano_MWBUILTINUNIT_molarity;
  // Rate of MDSC recruitment into the tumor
  k_MDSC_rec = 35000 MWDERIVEDUNIT_cell__milliliter_day;
  // Rate of MDSC death
  k_MDSC_death = 0.07 MWDERIVEDUNIT_1__day;
  // rate of NO degradation
  k_NO_deg = 135 MWDERIVEDUNIT_1__day;
  // rate of ArgI degradation
  k_ArgI_deg = 0.173 MWDERIVEDUNIT_1__day;
  // rate of NO secretion from MDSCs
  k_NO_sec = 4.8e-7 MWDERIVEDUNIT_nanomole__cell__day;
  // rate of ArgI secretion
  k_ArgI_sec = 1.1e-10 MWDERIVEDUNIT_nanomole__cell__day;
  // EC50 for ArgI-mediated T cell suppression
  ArgI_50_Teff = 50 MWBUILTINPREFIX_nano_MWBUILTINUNIT_molarity;
  // EC50 for NO-mediated T cell suppression
  NO_50_Teff = 1500 MWBUILTINPREFIX_nano_MWBUILTINUNIT_molarity;
  // Half-maximal ArgI level of Treg expansion
  ArgI_50_Treg = 0.36 MWBUILTINPREFIX_nano_MWBUILTINUNIT_molarity;
  // Hill function for NO-mediated inhibition on Teff
  H_NO has dimensionless;
  // Hill function for ariginase I-mediated inhibition on Teff
  H_ArgI_Teff has dimensionless;
  // Hill function for ariginase I-mediated Th-to-Treg transdifferentiation
  H_ArgI_Treg has dimensionless;
  // Combined MDSC suppression via NO (T cell dysfunction) and ArgI (arginine depletion)
  H_MDSC has dimensionless;
  // Hill function for IL-6 enhancement of MDSC recruitment
  H_IL6_MDSC has dimensionless;
  // Max fractional arginase amplification of TGFb-driven Th-to-Treg transdifferentiation at saturating tumoral arginase
  Emax_ArgI_Treg = 0.75 dimensionless;
  // Recruitment rate of macrophage into tumor compartment
  k_Mac_rec = 450000 MWDERIVEDUNIT_cell__milliliter_day;
  // Death rate of macrophages into tumor compartment
  k_Mac_death = 0.05 MWDERIVEDUNIT_1__day;
  // Macrophage niche density ceiling (finite stromal niche)
  rho_Mac_max = 10000000 MWDERIVEDUNIT_cell__milliliter;
  // Secretion rate of TGFb by macrophage in tumor compartment
  k_TGFb_Msec = 2e-11 MWDERIVEDUNIT_nanomole__cell__day;
  // Secretion rate of angiogenic factor by macrophage in tumor compartment
  k_vas_Msec = 0.05 MWDERIVEDUNIT_picogram__cell__day;
  // Secretion rate of IL-12 by mature cDC1 in tumor compartment (cDC1 is the IL-12p70-producing DC subtype; cDC2 do not make IL-12. M1-macrophage IL-12 is a separate source via k_IL12_Msec). Audit m2-A-MAC-01.
  k_IL12_sec = 8.5e-12 MWDERIVEDUNIT_nanomole__cell__day;
  // Secretion rate of IL-12 by macrophage in tumor compartment
  k_IL12_Msec = 5e-13 MWDERIVEDUNIT_nanomole__cell__day;
  // Degradation rate of IL-12 in tumor compartment
  k_IL12_deg = 0.0231 MWDERIVEDUNIT_1__hour;
  // Secretion rate of IL-10 by macrophage in tumor compartment
  k_IL10_sec = 3e-12 MWDERIVEDUNIT_nanomole__cell__day;
  // Secretion rate of IL-10 by Tregs in tumor compartment
  k_IL10_sec_Treg = 1.5e-12 MWDERIVEDUNIT_nanomole__cell__day;
  // Secretion rate of IL-10 by MDSCs in tumor compartment
  k_IL10_sec_MDSC = 1e-12 MWDERIVEDUNIT_nanomole__cell__day;
  // Degradation rate of IL-10 in tumor compartment
  k_IL10_deg = 2.5 MWDERIVEDUNIT_1__day;
  // Rate of M1 to M2 macrophage polarization
  k_M2_pol = 0.1 MWDERIVEDUNIT_1__day;
  // Rate of M2 to M1 macrophage polarization
  k_M1_pol = 1 MWDERIVEDUNIT_1__day;
  // Half-maximal IL-10 level for M1 to M2 macrophage polarization (innate-myeloid STAT3 axis)
  IL10_50_M2 = 8 MWBUILTINPREFIX_pico_MWBUILTINUNIT_molarity;
  // Half-maximal IL-10 level for DC maturation suppression (cDC1/cDC2)
  IL10_50_APC = 8 MWBUILTINPREFIX_pico_MWBUILTINUNIT_molarity;
  // Half-maximal IL-10 level for amplifying Treg-mediated CD8 exhaustion
  IL10_50_Treg = 8 MWBUILTINPREFIX_pico_MWBUILTINUNIT_molarity;
  // Half-maximal IL-12 level for M2 to M1 macrophage polarization
  IL12_50 = 15 MWBUILTINPREFIX_pico_MWBUILTINUNIT_molarity;
  // Linear slope of IFNg-driven M2 to M1 polarization in the sub-saturating regime (replaces IFNg_50 Hill)
  k_IFNg_response = 0.2 MWDERIVEDUNIT_1__picomolarity;
  // Rate of M1 macrophage-mediated killing of cancer cell
  k_M1_phago = 0.33 MWDERIVEDUNIT_1__day;
  // Volume of a single macrophage cell
  vol_Mcell = 4849.048 MWDERIVEDUNIT_micrometer___3__cell;
  // kon of CD47-SIRPa binding
  kon_CD47_SIRPa = 0.0625 MWDERIVEDUNIT_1__micromolarity_minute_nanometer;
  // koff of CD47-SIRPa binding
  koff_CD47_SIRPa = 0.3 MWDERIVEDUNIT_1__minute;
  // SIRPa occupancy for half-maximal CD47/SIRPa inhibition on phagocytosis of cancer cells by macrophages
  SIRPa_50 = 37 MWDERIVEDUNIT_molecule__micrometer___2;
  // Hill coefficient for CD47/SIRPa inhibition on phagocytosis of cancer cells by macrophages
  n_SIRPa = 2 dimensionless;
  // Hill function for overall checkpoint inhibition on phagocytosis of cancer cell by macrophage
  H_Mac_C has dimensionless;
  // Hill function for PD1-mediated inhibition on phagocytosis of cancer cell by macrophage
  H_PD1_M has dimensionless;
  // Hill function for SIRPa-mediated inhibition on phagocytosis of cancer cell by macrophage
  H_SIRPa has dimensionless;
  // CD47 expression on cancer cells
  C_CD47 = 400 MWDERIVEDUNIT_molecule__micrometer___2;
  // PD-1 expression on macrophages
  M_PD1_total = 12500 MWBUILTINUNIT_molecule;
  // SIRPa expression on macrophages
  M_SIRPa = 100 MWDERIVEDUNIT_molecule__micrometer___2;
  // Surface area of the macrophage
  A_Mcell = 1385.442 MWDERIVEDUNIT_micrometer___2;
  // Half-maximal IL-10 level for phagocytosis by macrophage
  IL10_50_phago = 270 MWBUILTINPREFIX_pico_MWBUILTINUNIT_molarity;
  // Association coefficient for macrophage and cancer cell
  K_M1_phago = 2 dimensionless;
  // Total number of macrophages
  M_total has MWUSERUNIT_cell;
  // Hill: IL-10 suppression of DC maturation (cDC1/cDC2)
  H_IL10_APC has dimensionless;
  // Hill: IL-10 amplification of Treg-mediated CD8 exhaustion
  H_IL10_Treg has dimensionless;
  // Hill function for IL10-mediated inhibition on phagocytosis
  H_IL10_phago has dimensionless;
  // Hill function for IL12
  H_IL12 has dimensionless;
  // Hill function for IL-6 promotion of M2 macrophage polarization
  H_IL6_M2 has dimensionless;
  // Averaged M2-polarizing milieu drive (TGFb/IL-10/IL-6); sets both the fraction of recruited monocytes differentiating directly to M2 and the M1->M2 polarization drive
  phi_M2_skew has dimensionless;
  // Rate of encountering resident PSCs as tumor expands into pancreas
  k_CAF_encounter = 1000000 MWDERIVEDUNIT_cell__milliliter_day;
  // Constitutive PSC density in pancreatic tissue
  k_CAF_const = 2000000 MWDERIVEDUNIT_cell__milliliter;
  // qPSC->myCAF activation rate (TGFb-driven)
  k_PSC_to_myCAF = 0.2 MWDERIVEDUNIT_1__day;
  // qPSC->iCAF activation rate (IL-1-driven)
  k_PSC_to_iCAF = 0.2 MWDERIVEDUNIT_1__day;
  // qPSC->apCAF activation rate (constitutive low)
  k_PSC_to_apCAF = 0.05 MWDERIVEDUNIT_1__day;
  // iCAF->myCAF interconversion (TGFb-driven)
  k_iCAF_to_myCAF = 0.1 MWDERIVEDUNIT_1__day;
  // myCAF->iCAF interconversion (IL-1-driven)
  k_myCAF_to_iCAF = 0.05 MWDERIVEDUNIT_1__day;
  // myCAF proliferation rate
  k_myCAF_prolif = 0.15 MWDERIVEDUNIT_1__day;
  // iCAF proliferation rate
  k_iCAF_prolif = 0.1 MWDERIVEDUNIT_1__day;
  // apCAF proliferation rate (lower than iCAF/myCAF)
  k_apCAF_prolif = 0.05 MWDERIVEDUNIT_1__day;
  // Max CAF:cancer ratio — total carrying-capacity budget partitioned across iCAF/myCAF/apCAF
  f_stroma_max = 2.43 dimensionless;
  // apCAF share of the total CAF carrying capacity. Default 0.1 from Elyada 2019 Fig 5D (apCAFs ~10% of PDAC CAFs). Free parameter in the stick-breaking simplex parameterization (paired with f_iCAF_of_non_apCAF).
  f_apCAF_of_total = 0.1 dimensionless;
  // iCAF share of the non-apCAF CAF mass (stick-breaking second step). Default 0.222 from Elyada 2019 Fig 5D — myCAF 0.7 + iCAF 0.2 of total → iCAF/(iCAF+myCAF) = 0.2/0.9 = 0.222. Free parameter in the stick-breaking simplex parameterization (paired with f_apCAF_of_total).
  f_iCAF_of_non_apCAF = 0.222 dimensionless;
  // Collagen secretion rate by myCAFs
  k_col_myCAF_sec = 5e-8 MWDERIVEDUNIT_milligram__cell_day;
  // Basal fraction of collagen secretion (TGFb-independent)
  f_col_basal = 0.15 dimensionless;
  // TGFb EC50 for CAF activation and interconversion
  TGFb_50_CAF_act = 0.07 MWBUILTINPREFIX_nano_MWBUILTINUNIT_molarity;
  // TGFb EC50 for collagen secretion
  TGFb_50_col_sec = 0.07 MWBUILTINPREFIX_nano_MWBUILTINUNIT_molarity;
  // Constitutive collagen degradation rate
  k_col_deg = 0.007 MWDERIVEDUNIT_1__day;
  // M2 macrophage MMP-mediated collagen degradation
  k_MMP_M2 = 1e-8 MWDERIVEDUNIT_milliliter__cell_day;
  // Collagen volume fraction at 50% MMP-susceptibility (LOX-crosslinking shield)
  phi_cross_50 = 0.03 dimensionless;
  // Fraction of collagen susceptible to M2 MMP degradation (non-crosslinked)
  f_nascent has dimensionless;
  // Collagen packing density (material constant)
  rho_collagen = 0.103 MWDERIVEDUNIT_gram__milliliter;
  // Collagen volume fraction (0-1). Bare-volume normalized; primary input for all ECM Hill functions.
  phi_collagen has dimensionless;
  // Death rate of quiescent PSCs
  k_qpsc_death = 0.005 MWDERIVEDUNIT_1__day;
  // Death rate of iCAFs
  k_iCAF_death = 0.05 MWDERIVEDUNIT_1__day;
  // Death rate of myCAFs
  k_myCAF_death = 0.015 MWDERIVEDUNIT_1__day;
  // Death rate of apCAFs
  k_apCAF_death = 0.03 MWDERIVEDUNIT_1__day;
  // Reference pore size in normal pancreas (Wolf 2013)
  d_pore_ref = 3.5 MWBUILTINPREFIX_micro_MWBUILTINUNIT_meter;
  // Collagen volume fraction in normal pancreas (reference)
  phi_col_ref = 0.046 dimensionless;
  // Critical pore diameter for T cell migration arrest (Wolf 2013)
  d_crit_T = 2.3 MWBUILTINPREFIX_micro_MWBUILTINUNIT_meter;
  // Critical pore diameter for APC migration arrest (podosome/MMP migration)
  d_crit_APC = 2.1 MWBUILTINPREFIX_micro_MWBUILTINUNIT_meter;
  // Hill coefficient for pore-size exclusion sharpness
  n_pore = 4 dimensionless;
  // Pore size between collagen fibers (decreases with density)
  d_pore has MWBUILTINPREFIX_micro_MWBUILTINUNIT_meter;
  // Pore-size-based T cell exclusion. 1=fully excluded, 0=free migration.
  H_pore_T has dimensionless;
  // Pore-size-based APC exclusion. DCs more deformable than T cells.
  H_pore_APC has dimensionless;
  // Reference stiffness at phi_col_ref (~1 kPa, dimensionless)
  E_ref = 1 dimensionless;
  // Power law exponent for stiffness-collagen relationship
  n_stiff = 1.8 dimensionless;
  // Half-max stiffness for T cell exhaustion
  E_50_Texh = 4 dimensionless;
  // Hill coefficient for stiffness-mediated T cell exhaustion
  n_Texh = 1 dimensionless;
  // Half-max stiffness for fibroblast mechanotransduction
  E_50_fib = 5 dimensionless;
  // Hill coefficient for stiffness-mediated fibroblast activation
  n_fib = 1 dimensionless;
  // Tissue stiffness (kPa-scaled, dimensionless). Power law of collagen density.
  stiffness has dimensionless;
  // Stiffness-mediated T cell exhaustion (chronic mechanosensing, PD-L1)
  H_stiff_Texh has dimensionless;
  // Stiffness-mediated fibroblast activation (YAP/TAZ mechanotransduction)
  H_stiff_fib has dimensionless;
  // phi_collagen for 50% carrying capacity reduction. >1 = ECM barrier never reaches half-max, consistent with stroma-depletion worsening PDAC (Rhim 2014, Ozdemir 2014).
  phi_col_50_Kmax = 2 dimensionless;
  // Physical packing ceiling for collagen volume fraction (logistic secretion saturation). ~0.5 = peak fibrillar collagen packing in dense PDAC stroma (placeholder pending primary-source anchor).
  phi_col_max = 0.5 dimensionless;
  // Max CAF population sustained by stiff ECM alone (mechanotransduction niche via YAP/TAZ). Allows fibrotic scar persistence post-therapy.
  K_stiff_niche = 100000 MWUSERUNIT_cell;
  // Aggregate stromal contribution scale (global multiplier on subtype-weighted CAF sum in C_max). Constrained by Xu 2010 + Hwang 2008 orthotopic dose-response submodel targets.
  k_stroma_support = 1 dimensionless;
  // Per-myCAF contribution to cancer C_max. myCAFs build PDAC desmoplasia (collagen/CXCL12/VEGF) — dominant structural CAF subtype (Elyada 2019; Dominguez 2020).
  k_stroma_myCAF = 1.4 dimensionless;
  // Per-iCAF contribution to cancer C_max. iCAFs are inflammatory secretors (IL-6/CXCL12), low αSMA, located distally from tumor — minimal structural carrying-capacity role (Elyada 2019, Öhlund 2017).
  k_stroma_iCAF = 0.28 dimensionless;
  // Per-apCAF contribution to cancer C_max. apCAFs are rare (<5% of CAFs) MHC-II+ tolerogenic antigen-presenters — predominantly immunomodulatory (induce Treg expansion in antigen-specific manner), not structural (Elyada 2019, Huang 2022 Cancer Cell).
  k_stroma_apCAF = 0.07 dimensionless;
  // Baseline C-independent carrying-capacity floor (cells): parenchymal volume the lesion occupies pre-desmoplasia. UN-ANCHORED fitted structural handle (derivedFrom={}); value 1.7e9 is calibrated as the tumor_fold handle coupled with k_C1_growth~0.008, NOT a literature value. Candidate future submodel anchor: accessible parenchymal/lobular volume / vol_cell (queued in reconciliation_targets.csv) -- but GitHub #229 (V_T<->C_max unification) would DERIVE and dissolve it. Default 0 recovers prior stroma+vascular-only C_max exactly.
  C_cap0 = 1700000000 MWUSERUNIT_cell;
  // Volume of quiescent PSC
  vol_qPSCcell = 1500 MWDERIVEDUNIT_micrometer___3__cell;
  // Volume of iCAF
  vol_iCAFcell = 2000 MWDERIVEDUNIT_micrometer___3__cell;
  // Volume of myCAF
  vol_myCAFcell = 3500 MWDERIVEDUNIT_micrometer___3__cell;
  // Volume of apCAF
  vol_apCAFcell = 2500 MWDERIVEDUNIT_micrometer___3__cell;
  // CXCL12 secretion rate by iCAFs
  k_CXCL12_sec_iCAF = 1e-10 MWDERIVEDUNIT_nanomolarity_liter__cell_day;
  // CXCL12 degradation rate
  k_CXCL12_deg = 2 MWDERIVEDUNIT_1__day;
  // EC50 for CXCL12-mediated T cell exclusion
  CXCL12_50_Texcl = 8 MWBUILTINPREFIX_nano_MWBUILTINUNIT_molarity;
  // Effective iCAF-scaled IL-6 source rate
  k_IL6_sec_iCAF = 1.103622e-9 MWDERIVEDUNIT_nanomolarity_liter__cell_day;
  // IL-6 degradation rate
  k_IL6_deg = 16 MWDERIVEDUNIT_1__day;
  // EC50 for IL-6 enhancement of MDSC recruitment
  IL6_50_MDSC = 0.015 MWBUILTINPREFIX_nano_MWBUILTINUNIT_molarity;
  // EC50 for IL-6 promotion of M2 polarization
  IL6_50_M2 = 0.015 MWBUILTINPREFIX_nano_MWBUILTINUNIT_molarity;
  // EC50 for IL-6 autocrine feedback promoting iCAF phenotype
  IL6_50_iCAF = 0.015 MWBUILTINPREFIX_nano_MWBUILTINUNIT_molarity;
  // Fold-enhancement of iCAF formation by IL-6 feedback
  f_IL6_iCAF = 3 dimensionless;
  // Hill function for IL-6 autocrine feedback on iCAF phenotype
  H_IL6_iCAF has dimensionless;
  // IL-1alpha secretion rate by cancer cells
  k_IL1_sec = 1e-12 MWDERIVEDUNIT_nanomole__cell_day;
  // IL-1alpha degradation rate
  k_IL1_deg = 6.93 MWDERIVEDUNIT_1__day;
  // Basal EC50 for IL-1-driven iCAF formation
  IL1_50 = 0.01 MWBUILTINPREFIX_nano_MWBUILTINUNIT_molarity;
  // Hill coefficient for IL-1-driven iCAF formation
  n_IL1 = 1 dimensionless;
  // TGFb EC50 for IL-1R1 downregulation
  TGFb_50_IL1R1 = 0.07 MWBUILTINPREFIX_nano_MWBUILTINUNIT_molarity;
  // Max fold-shift of IL-1 EC50 by TGFb-driven IL-1R1 repression
  Emax_IL1R1 = 5 dimensionless;
  // Dimensionless IL-1 ratio: IL1 / effective EC50
  IL1_ratio has dimensionless;
  // Effective IL-1 Hill function. TGFb antagonizes by increasing effective EC50 via IL-1R1 repression (saturating).
  H_IL1_eff has dimensionless;
  // Angiogenic factor secretion rate by myCAFs
  k_vas_myCAF_sec = 0.002 MWDERIVEDUNIT_picogram__cell_day;
  // Effective antigen-specific induced-Treg rate via apCAF presentation
  k_apCAF_iTreg = 0.15 MWDERIVEDUNIT_1__day;
  // EC50 for antigen-dependent Treg induction by apCAFs
  P1_50_apCAF = 1e-9 MWBUILTINUNIT_molarity;
  // Total activated PSC count (iCAF+myCAF+apCAF). Backward compatibility for test statistics.
  aPSC_total has MWUSERUNIT_cell;
  // TGF-β secretion rate by myCAFs
  k_TGFb_sec_myCAF = 2e-10 MWDERIVEDUNIT_nanomolarity_liter__cell_day;
  // CXCL12 secretion rate by tumor cells
  k_CXCL12_sec_cancer = 5e-11 MWDERIVEDUNIT_nanomolarity_liter__cell_day;
  // Quasi-steady antigen-presentation gate for apCAF MHC-II-dependent Treg induction
  H_apCAF_pMHCII has dimensionless;
  // GVAX cell clearance rate from tumor
  k_GVAX_clearance = 0.1 MWDERIVEDUNIT_1__day;
  // Volume of intradermal injection site (~0.1 mL)
  V_ID_volume = 0.0001 MWBUILTINUNIT_liter;
  // GM-CSF production rate per GVAX cell per day
  k_GMCSF_prod = 1e-8 MWDERIVEDUNIT_nanomolarity__cell__day;
  // GM-CSF degradation/clearance rate (half-life ~3 hours)
  k_GMCSF_deg = 5 MWDERIVEDUNIT_1__day;
  // APC recruitment rate to intradermal injection site
  k_APC_recruit_ID = 100000 MWDERIVEDUNIT_cell__day;
  // EC50 for GM-CSF-mediated APC recruitment and maturation
  EC50_GMCSF = 0.00294005 MWBUILTINPREFIX_nano_MWBUILTINUNIT_molarity;
  // APC maturation rate at injection site
  k_APC_mature_ID = 2.72806 MWDERIVEDUNIT_1__day;
  // APC migration rate from injection site to lymph nodes
  k_APC_mig_ID_LN = 0.7 MWDERIVEDUNIT_1__day;
  // APC death rate at injection site
  k_APC_death_ID = 0.1 MWDERIVEDUNIT_1__day;
  // Antigen consumed per APC maturation event at injection site
  sigma_P1_per_mAPC = 1e-9 MWDERIVEDUNIT_nanomole__cell;
  // EC50 for antigen-dependent APC maturation. Lowered from 10 nM to 0.1 nM on 2026-04-21 (Fix 3): with the 10 nM value, V_ID.P1_GVAX (~0.009 nM steady state) produced a Hill factor of ~0.0009 in J_mature_ID, so GVAX-derived antigen was never a meaningful contributor to APC maturation — maturation proceeded almost entirely via the GMCSF + baseline APC terms. 0.1 nM is an estimated value in the nanomolar-affinity range typical of peptide/antigen-receptor interactions; not anchored to a specific primary source. Candidate for submodel-target extraction.
  EC50_P1_mature = 0.1 MWBUILTINPREFIX_nano_MWBUILTINUNIT_molarity;
  K_APC_ID = 1000000 MWUSERUNIT_cell;
  k_APC_recruit0 = 100 MWDERIVEDUNIT_cell__day;
  k_mAPC_death_ID = 0.7 MWDERIVEDUNIT_1__day;
  y_Ag_per_cell = 1e-9 MWDERIVEDUNIT_nanomole__cell;
  k_P1_deg_ID = 10 MWDERIVEDUNIT_1__day;
  K_APC_mig = 100000 MWUSERUNIT_cell;
  // Antigen-transfer rate constant: migratory mcDC2 -> resident cDC1 cross-licensing (Ferris 2022 PMID: 35648641; Mueller 2017 Eur J Immunol)
  k_cDC1_Ag_transfer = 1e-7 MWDERIVEDUNIT_1__cell_day;
  // Vaccine-antigen presentation-uptake rate into the shared endosomal pMHC pool; parallel to tumor k_up=14.4 (audit consensus #2, GVAX->H_P1 coupling); placeholder centered at k_up, SBI-varied, submodel anchor pending
  k_GVAX_present = 14.4 MWDERIVEDUNIT_1__day__cell;
  H_GMCSF_ID has dimensionless;
  // Half-max death FLUX (cell/day) for HMGB1 (DAMP)-mediated APC maturation at the GVAX injection depot; anchored to the depot operating death flux (~5e7 cell/day peak) so H_HMGB1_ID sits responsive. Literature-anchor route deferred (HMGB1_50_ID = EC50*k_deg*V_ID/q_release).
  HMGB1_50_ID = 10000000 MWDERIVEDUNIT_cell__day;
  H_HMGB1_ID has dimensionless;
  J_mature_ID has MWDERIVEDUNIT_cell__day;
  // Shared effective fold-broadening of tumor-specific CD4 and CD8 repertoires under saturating GVAX antigen (qualitatively anchored to Thomas 2004 PMID 15289501; geometric-mean initial value; estimated and requires reduced-model refit).
  f_epitope_spread = 4.898979 dimensionless;
  // Vaccine-antigen Hill gating epitope-spreading clonal recruitment (Path A); 0 at diagnosis
  H_P1_spread has dimensionless;
  // GVAX-vaccine-gated in-situ tumor CD8 proliferation increment (Path C). Anchored to f*k_CD8_T_pro (f~0.6): the vaccine-differential increment is a bounded fraction of the Blessin-anchored constitutive in-situ rate (k_CD8_T_pro=0.079/day). H_P1_spread-gated (zero without vaccine), saturating in V_T.CD8 density. Retained in gvax_module after the C13 TLA/urelumab cut. Prior sigma 0.7 (was 1.5 placeholder). See notes/calibration/vpop_thexh_cd8vac_anchoring_2026-07-23.md.
  k_CD8_T_vac_pro = 0.05 MWDERIVEDUNIT_1__day;
  // Cyclophosphamide clearance rate
  k_Cy_clear = 2.5 MWDERIVEDUNIT_1__day;
  // Maximum Treg depletion rate by cyclophosphamide
  k_Cy_Treg_deplete = 0.15 MWDERIVEDUNIT_1__day;
  // Cyclophosphamide concentration for 50% Treg depletion
  Cy_50_Treg = 50 MWBUILTINPREFIX_milli_MWBUILTINUNIT_gram;
  // Decay rate of the cyclophosphamide durable PD effect compartment (sets Treg-suppression duration)
  k_Cy_eff_decay = 0.05 MWDERIVEDUNIT_1__day;
  // Maximum fractional suppression of tumor-Treg proliferation by the Cy effect compartment
  Emax_Cy_Treg = 0.8 dimensionless;
  // Build rate of the cyclophosphamide effect compartment from drug exposure (structural; weakly identifiable, fixed)
  k_Cy_on = 10 MWDERIVEDUNIT_milligram__day;
  // Half-saturation of the Cy effect compartment on tumor-Treg proliferation (structural; weakly identifiable, fixed)
  Cy_eff_50 = 1 MWBUILTINPREFIX_milli_MWBUILTINUNIT_gram;
  // Rate of naive CD4 activation into Tfh
  k_Tfh_act = 10 MWDERIVEDUNIT_1__day;
  // Rate of tumor-local Th -> Tfh differentiation (antigen + IL-6 gated)
  k_Tfh_diff_tumor = 0.5 MWDERIVEDUNIT_1__day;
  // EC50 for IL-6 Hill function gating Th -> Tfh differentiation in tumor
  IL6_50_Tfh = 0.001 MWBUILTINPREFIX_nano_MWBUILTINUNIT_molarity;
  // IL-6 Hill function for tumor-local Th -> Tfh differentiation
  H_IL6_Tfh has dimensionless;
  // Marrow output of naive B cells to blood
  k_nB_in = 10000 MWDERIVEDUNIT_cell__day;
  // Naive B activation rate in LN (antigen + Tfh help)
  k_B_act = 10 MWDERIVEDUNIT_1__day;
  // Number of antigen-specific B cell clones (clonal expansion)
  n_B_clones = 50 dimensionless;
  // Activated B proliferation rate in LN
  k_B_pro = 2 MWDERIVEDUNIT_1__day;
  // Mature B cell death rate
  k_B_death = 0.1 MWDERIVEDUNIT_1__day;
  // Tumor-local aB -> plasma differentiation rate (Tfh-helped)
  k_B_to_plasma = 0.5 MWDERIVEDUNIT_1__day;
  // Plasma cell death rate
  k_plasma_death = 0.033 MWDERIVEDUNIT_1__day;
  // Half-maximal LN Tfh number for B-cell activation help
  Tfh_50_B = 100000 MWUSERUNIT_cell;
  // Tumor-local naive B activation rate (antigen-gated)
  k_B_act_tumor = 1 MWDERIVEDUNIT_1__day;
  // Tumor-local activated B proliferation rate (saturating form)
  k_B_pro_tumor = 1 MWDERIVEDUNIT_1__day;
  // Max activated B density in tumor (carrying capacity, analogous to rho_Th_max)
  rho_B_max = 5000000 MWDERIVEDUNIT_cell__milliliter;
  // Half-maximal tumor Tfh for aB -> plasma differentiation help
  Tfh_50_plasma = 1000000 MWDERIVEDUNIT_cell__milliliter;
  // Naive B cell death rate (was k_nTreg_death)
  k_nB_death = 0.002 MWDERIVEDUNIT_1__day;
  // Naive B cell entry into LN (was q_nCD4_LN_in)
  q_nB_LN_in = 0.1 MWDERIVEDUNIT_1__day;
  // Naive B cell exit from LN (was q_nCD4_LN_out)
  q_nB_LN_out = 2.88 MWDERIVEDUNIT_1__day;
  // Mature B cell transport C->P (was q_Treg_P_in)
  q_B_P_in = 0.25 MWDERIVEDUNIT_1__minute;
  // Mature B cell transport P->C (was q_Treg_P_out)
  q_B_P_out = 24 MWDERIVEDUNIT_1__day;
  // Mature B cell exit from LN (was q_Treg_LN_out)
  q_B_LN_out = 24 MWDERIVEDUNIT_1__day;
  // B cell transmigration into tumor (was q_Treg_T_in)
  q_B_T_in = 5.8e-5 MWDERIVEDUNIT_1__centimeter___3_minute;
  // Plasma cell antibody secretion rate
  k_Ab_sec = 1e-5 MWDERIVEDUNIT_nanomole__cell__day;
  // Antibody degradation/clearance rate in tumor
  k_Ab_deg = 0.033 MWDERIVEDUNIT_1__day;
  // Half-maximal antibody for ADCC (macrophage Fc-mediated killing boost)
  Ab_50_ADCC = 0.01 MWBUILTINPREFIX_nano_MWBUILTINUNIT_molarity;
  // Max fold-increase in M1 phagocytosis from ADCC
  ADCC_boost_max = 2 dimensionless;
  // Half-maximal antibody for DC immune-complex uptake boost
  Ab_50_DC = 29.3 MWBUILTINPREFIX_nano_MWBUILTINUNIT_molarity;
  // Max fold-increase in DC antigen uptake from immune complexes
  DC_Ab_boost = 3.95 dimensionless;
  // Hill function for antibody-mediated ADCC and immune-complex effects
  H_Ab has dimensionless;
  // Hill function for antibody-mediated DC uptake boost
  H_Ab_DC has dimensionless;
  // Forward B->Breg switching rate (TGFb+IL10 gated)
  k_Breg_on = 1 MWDERIVEDUNIT_1__day;
  // Reverse Breg->B reversion rate
  k_Breg_off = 2 MWDERIVEDUNIT_1__day;
  // TGFb EC50 for Breg switching
  TGFb_50_Breg = 0.07 MWBUILTINPREFIX_nano_MWBUILTINUNIT_molarity;
  // IL-10 EC50 for Breg switching
  IL10_50_Breg = 8 MWBUILTINPREFIX_nano_MWBUILTINUNIT_molarity;
  // Breg IL-10 secretion rate (aBreg only)
  k_IL10_sec_Breg = 1.5e-12 MWDERIVEDUNIT_nanomole__cell_day;
  // TGFb Hill for Breg switching
  H_TGFb_Breg has dimensionless;
  // IL-10 Hill for Breg switching
  H_IL10_Breg has dimensionless;
  // Total CD8 T cells in V_T (naive + effector + terminal-exhausted + progenitor-exhausted). Aggregate alias for total-CD8 observables.
  CD8_total_T has MWUSERUNIT_cell;
  // All nucleated cells in V_T (cancer + immune + CAFs). Used as the denominator for _pct_ calibration targets matching mIHC "% of all nucleated cells" measurements.
  nucleated_total_T has MWUSERUNIT_cell;
  // Exhausted CD8 T cells in V_T (terminal + progenitor-exhausted).
  CD8_exh_total_T has MWUSERUNIT_cell;
  // Conventional CD4 helper T cells in V_T (naive/effector + exhausted), excluding Treg.
  Th_total_T has MWUSERUNIT_cell;
  // All CD4 T cells in V_T (naive + conventional helper + Treg).
  CD4_total_T has MWUSERUNIT_cell;
  // All T cells in V_T (CD8 + CD4), the model side of a pan-CD3 stain.
  Tcell_total_T has MWUSERUNIT_cell;
  // Tumour-associated macrophages in V_T (M1-like + M2-like).
  Mac_total_T has MWUSERUNIT_cell;
  // All dendritic cells in V_T (immature + mature, cDC1 + cDC2).
  DC_total_T has MWUSERUNIT_cell;
  // Mature dendritic cells in V_T (mcDC1 + mcDC2), the DC-LAMP+ subset.
  mDC_total_T has MWUSERUNIT_cell;
  // cDC1 lineage in V_T at any maturation state (cDC1 + mcDC1).
  cDC1_lineage_T has MWUSERUNIT_cell;
  // cDC2 lineage in V_T at any maturation state (cDC2 + mcDC2).
  cDC2_lineage_T has MWUSERUNIT_cell;
  // All leukocytes in V_T (T cells + macrophages + MDSC + DC). Excludes cancer cells and CAFs, unlike nucleated_total_T.
  immune_total_T has MWUSERUNIT_cell;
  // Whole-repertoire CD8 T cells in V_C (per-clone naive pool scaled by div_CD8, plus the expanded antigen-specific clone).
  CD8_total_C has MWUSERUNIT_cell;
  // Activated cancer-associated fibroblasts in V_T (iCAF + myCAF + apCAF). Excludes quiescent qPSC.
  CAF_total_T has MWUSERUNIT_cell;

  // Assignment rules:
  V_T := V_Tmin + ((C_x + C_total)*vol_cell + (CD8_exh + CD8_pex + Th_exh + T_total)*vol_Tcell + M_total*vol_Mcell + qPSC*vol_qPSCcell + iCAF*vol_iCAFcell + myCAF*vol_myCAFcell + apCAF*vol_apCAFcell)/Ve_T + collagen/rho_collagen + (nB_V_T + aB_V_T + Plasma + nBreg + aBreg)*vol_Tcell/Ve_T;
  C_total := 0*cell + C1;
  T_total := 0*cell + Treg_V_T + CD8_V_T + nCD8_V_T + Th_V_T + nCD4_V_T + Tfh_V_T;
  T_total_LN := 0*cell + Treg_V_LN + CD8_V_LN + Th_V_LN + Tfh_V_LN;
  R_Tcell := 0*cell/day + (k_C1_death + k_C1_therapy)*C1 + k_C_Tcell_eff*C1 + k_M1_phago*C1*Mac_M1/(Mac_M1 + K_M1_phago*C_total + cell)*(1 - H_Mac_C)*(1 - H_IL10_phago)*(1 + ADCC_boost_max*H_Ab);
  k_C1_therapy := 0/day;
  // PDAC carrying capacity: vasculature + stromal support - ECM barrier
  C_max := (C_cap0 + K_vasc + k_stroma_support*(k_stroma_myCAF*myCAF + k_stroma_iCAF*iCAF + k_stroma_apCAF*apCAF))*(1 - phi_collagen/(phi_collagen + phi_col_50_Kmax));
  Tregs := Treg_V_T;
  vasc_ratio := K_vasc/V_T/K50_vasc;
  H_vasc := vasc_ratio^n_vasc/(1 + vasc_ratio^n_vasc);
  K_T_Treg := 1/R50_Treg;
  k_C_Tcell_eff := p_T_kill_per_contact*v_T_search_volume*CD8_V_T/V_T/cell*(1 - H_pore_T)*CD8_V_T/(CD8_V_T + K_T_Treg*Tregs + cell)*(1 - H_PD1_C1)*(1 - H_MDSC)*(1 - Emax_TGFb_Teff*H_TGFb_Teff);
  H_HMGB1 := R_Tcell/(R_Tcell + HMGB1_50);
  H_TGFb_APC := TGFb/(TGFb + TGFb_50_APC);
  APC_total_T := cDC1_V_T + cDC2_V_T;
  mAPC_total_T := mcDC1_V_T + mcDC2_V_T;
  mAPC_total_LN := mcDC1_V_LN + mcDC2_V_LN;
  H_APC_Treg := n_sites_APC*mcDC2_V_LN/(n_sites_APC*mcDC2_V_LN + nCD4_V_LN*n_CD4_clones + cell);
  pTCR_p0_MHC_tot := k_M1p0_TCR_off/(k_M1p0_TCR_off + phi_M1p0_TCR)*(k_M1p0_TCR_p/(k_M1p0_TCR_off + k_M1p0_TCR_p))^N_M1p0_TCR*0.5*(M1p0_A_s/n_CD4_clones + TCR_p0_tot + k_M1p0_TCR_off/k_M1p0_TCR_on - TCR_p0_tot*sqrt(max(((M1p0_A_s/n_CD4_clones + TCR_p0_tot + k_M1p0_TCR_off/k_M1p0_TCR_on)/TCR_p0_tot)^2 - 4*M1p0_A_s/n_CD4_clones/TCR_p0_tot, 0)));
  H_P0 := pTCR_p0_MHC_tot/(pTCR_p0_MHC_tot + p0_50);
  pTCR_p1_MHC_tot := k_M1p1_TCR_off/(k_M1p1_TCR_off + phi_M1p1_TCR)*(k_M1p1_TCR_p/(k_M1p1_TCR_off + k_M1p1_TCR_p))^N_M1p1_TCR*0.5*(M1p1_A_s/n_CD8_clones + TCR_p1_tot + k_M1p1_TCR_off/k_M1p1_TCR_on - TCR_p1_tot*sqrt(max(((M1p1_A_s/n_CD8_clones + TCR_p1_tot + k_M1p1_TCR_off/k_M1p1_TCR_on)/TCR_p1_tot)^2 - 4*M1p1_A_s/n_CD8_clones/TCR_p1_tot, 0)));
  H_P1 := pTCR_p1_MHC_tot/(pTCR_p1_MHC_tot + p1_50);
  syn_CD8_C1_PDL1_total := PDL1_syn_CD8_C1 + PD1_PDL1_syn_CD8_C1 + PDL1_CD80_syn_CD8_C1 + PDL1_CD80_CD28_syn_CD8_C1 + PDL1_CD80_CTLA4_syn_CD8_C1;
  syn_CD8_C1_PDL2_total := PD1_PDL2_syn_CD8_C1 + PDL2_syn_CD8_C1;
  H_PD1_C1 := ((PD1_PDL1_syn_CD8_C1 + PD1_PDL2_syn_CD8_C1)/PD1_50)^n_PD1/(((PD1_PDL1_syn_CD8_C1 + PD1_PDL2_syn_CD8_C1)/PD1_50)^n_PD1 + 1);
  phi_aPD1_C1 := (PD1_aPD1_syn_CD8_C1 + 2*PD1_aPD1_PD1_syn_CD8_C1)/(PD1_syn_CD8_C1 + PD1_PDL1_syn_CD8_C1 + PD1_PDL2_syn_CD8_C1 + PD1_aPD1_syn_CD8_C1 + 2*PD1_aPD1_PD1_syn_CD8_C1);
  H_CD28_C1 := ((CD28_CD80_syn_CD8_C1 + CD28_CD86_syn_CD8_C1 + 2*CD28_CD80_CD28_syn_CD8_C1 + PDL1_CD80_CD28_syn_CD8_C1)/CD28_CD8X_50)^n_CD28_CD8X/(((CD28_CD80_syn_CD8_C1 + CD28_CD86_syn_CD8_C1 + 2*CD28_CD80_CD28_syn_CD8_C1 + PDL1_CD80_CD28_syn_CD8_C1)/CD28_CD8X_50)^n_CD28_CD8X + 1);
  syn_CD8_APC_PDL1_total := PDL1_syn_CD8_APC + PD1_PDL1_syn_CD8_APC + PDL1_CD80_syn_CD8_APC + PDL1_CD80_CD28_syn_CD8_APC + PDL1_CD80_CTLA4_syn_CD8_APC;
  syn_CD8_APC_PDL2_total := PD1_PDL2_syn_CD8_APC + PDL2_syn_CD8_APC;
  H_PD1_APC := ((PD1_PDL1_syn_CD8_APC + PD1_PDL2_syn_CD8_APC)/PD1_50)^n_PD1/(((PD1_PDL1_syn_CD8_APC + PD1_PDL2_syn_CD8_APC)/PD1_50)^n_PD1 + 1);
  H_CD28_APC := ((CD28_CD80_syn_CD8_APC + CD28_CD86_syn_CD8_APC + 2*CD28_CD80_CD28_syn_CD8_APC + PDL1_CD80_CD28_syn_CD8_APC)/CD28_CD8X_50)^n_CD28_CD8X/(((CD28_CD80_syn_CD8_APC + CD28_CD86_syn_CD8_APC + 2*CD28_CD80_CD28_syn_CD8_APC + PDL1_CD80_CD28_syn_CD8_APC)/CD28_CD8X_50)^n_CD28_CD8X + 1);
  H_CD4_help := f_help_indep + (1 - f_help_indep)*Th_V_LN/(Th_V_LN + Th_50_help);
  H_div_help := Th_V_LN/(Th_V_LN + Th_50_div);
  H_P1_II := P1_V_e/(P1_V_e + p1_II_50);
  IL2_supply := w_IL2_help*aTh + aCD8;
  IL2_demand := aCD8 + kappa_IL2_Treg*Treg_V_LN;
  IL2_niche := k_IL2_sec*IL2_supply/(k_IL2_cons*IL2_demand/IL2_50 + k_IL2_deg*V_niche);
  N_aT := N_div_base + N_div_costim*H_CD28_APC*H_div_help + N_IL2_CD8*IL2_niche/(IL2_50 + IL2_niche);
  N_aTh := N_div_base + N_div_costim*H_CD28_APC + N_IL2_CD4*IL2_niche/(IL2_50 + IL2_niche);
  H_TGFb_Th2Treg := TGFb/(TGFb + TGFb_50_Th2Treg);
  H_TGFb_chemores := TGFb/(TGFb + TGFb_50_chemores);
  H_TGFb_Teff := TGFb/(TGFb + TGFb_50_Teff);
  H_TGFb_Th_exh := TGFb/(TGFb + TGFb_50_Th_exh);
  H_NO := NO/(NO_50_Teff + NO);
  H_ArgI_Teff := ArgI/(ArgI_50_Teff + ArgI);
  H_ArgI_Treg := ArgI/(ArgI_50_Treg + ArgI);
  H_MDSC := 1 - (1 - H_NO)*(1 - H_ArgI_Teff);
  PDL1_total := PDL1_syn_M_C + PD1_PDL1_syn_M_C + PDL1_CD80_syn_M_C;
  PDL2_total := PD1_PDL2_syn_M_C + PDL2_syn_M_C;
  H_SIRPa := (CD47_SIRPa/SIRPa_50)^n_SIRPa/((CD47_SIRPa/SIRPa_50)^n_SIRPa + 1);
  H_PD1_M := ((PD1_PDL1_syn_M_C + PD1_PDL2_syn_M_C)/PD1_50)^n_PD1/(((PD1_PDL1_syn_M_C + PD1_PDL2_syn_M_C)/PD1_50)^n_PD1 + 1);
  H_Mac_C := 1 - (1 - H_SIRPa)*(1 - H_PD1_M);
  M_total := Mac_M1 + Mac_M2;
  H_IL10_APC := IL10/(IL10_50_APC + IL10);
  H_IL10_Treg := IL10/(IL10_50_Treg + IL10);
  H_IL10_phago := IL10/(IL10_50_phago + IL10);
  H_IL12 := IL12/(IL12_50 + IL12);
  phi_M2_skew := (TGFb/(TGFb + TGFb_50_M2pol) + IL10/(IL10 + IL10_50_M2) + H_IL6_M2)/3;
  f_nascent := phi_cross_50/(phi_cross_50 + phi_collagen);
  phi_collagen := collagen/rho_collagen/(collagen/rho_collagen + ((C_x + C_total)*vol_cell + (CD8_exh + CD8_pex + Th_exh + T_total)*vol_Tcell + M_total*vol_Mcell + qPSC*vol_qPSCcell + iCAF*vol_iCAFcell + myCAF*vol_myCAFcell + apCAF*vol_apCAFcell)/Ve_T + V_Tmin);
  d_pore := d_pore_ref*(phi_col_ref/(phi_collagen + 1e-6))^0.5;
  H_pore_T := 1/(1 + (d_pore/d_crit_T)^n_pore);
  H_pore_APC := 1/(1 + (d_pore/d_crit_APC)^n_pore);
  stiffness := E_ref*(phi_collagen/phi_col_ref)^n_stiff;
  H_stiff_Texh := stiffness^n_Texh/(E_50_Texh^n_Texh + stiffness^n_Texh);
  H_stiff_fib := stiffness^n_fib/(E_50_fib^n_fib + stiffness^n_fib);
  IL1_ratio := IL1/(IL1_50*(1 + Emax_IL1R1*TGFb/(TGFb_50_IL1R1 + TGFb)));
  H_IL1_eff := IL1_ratio^n_IL1/(1 + IL1_ratio^n_IL1);
  H_apCAF_pMHCII := P1_V_T/(P1_V_T + P1_50_apCAF);
  H_CXCL12_Texcl := CXCL12/(CXCL12_50_Texcl + CXCL12);
  H_IL6_MDSC := IL6/(IL6_50_MDSC + IL6);
  H_IL6_M2 := IL6/(IL6_50_M2 + IL6);
  H_IL6_iCAF := IL6/(IL6_50_iCAF + IL6);
  aPSC_total := iCAF + myCAF + apCAF;
  H_GMCSF_ID := GMCSF/V_ID/(EC50_GMCSF + GMCSF/V_ID);
  H_HMGB1_ID := k_GVAX_clearance*GVAX_cells/(k_GVAX_clearance*GVAX_cells + HMGB1_50_ID);
  J_mature_ID := k_APC_mature_ID*H_HMGB1_ID*APC*(P1_GVAX/V_ID)/(P1_GVAX/V_ID + EC50_P1_mature);
  H_P1_spread := P1_GVAX/V_ID/(P1_GVAX/V_ID + EC50_P1_mature);
  H_IL6_Tfh := IL6/(IL6_50_Tfh + IL6);
  H_Ab := Ab/(Ab_50_ADCC + Ab);
  H_Ab_DC := Ab/(Ab_50_DC + Ab);
  H_TGFb_Breg := TGFb/(TGFb_50_Breg + TGFb);
  H_IL10_Breg := IL10/(IL10_50_Breg + IL10);
  CD8_total_T := CD8_V_T + CD8_exh + CD8_pex + nCD8_V_T;
  nucleated_total_T := C1 + C_x + CD8_total_T + nCD4_V_T + Th_V_T + Th_exh + Treg_V_T + Mac_M1 + Mac_M2 + MDSC + cDC1_V_T + cDC2_V_T + mcDC1_V_T + mcDC2_V_T + nB_V_T + aB_V_T + Plasma + Tfh_V_T + qPSC + iCAF + myCAF + apCAF;
  CD8_exh_total_T := CD8_exh + CD8_pex;
  Th_total_T := Th_V_T + Th_exh + nCD4_V_T;
  CD4_total_T := Th_total_T + Treg_V_T;
  Tcell_total_T := CD8_total_T + CD4_total_T;
  Mac_total_T := Mac_M1 + Mac_M2;
  DC_total_T := cDC1_V_T + cDC2_V_T + mcDC1_V_T + mcDC2_V_T;
  mDC_total_T := mcDC1_V_T + mcDC2_V_T;
  cDC1_lineage_T := cDC1_V_T + mcDC1_V_T;
  cDC2_lineage_T := cDC2_V_T + mcDC2_V_T;
  immune_total_T := Tcell_total_T + Mac_total_T + MDSC + DC_total_T;
  CD8_total_C := nCD8_V_C*div_CD8 + CD8_V_C;
  CAF_total_T := iCAF + myCAF + apCAF;

  // Reactions:
  // Clearance of dead cancer cells from tumor
  Reaction_1: C_x => ; k_cell_clear*C_x;
  // Clearance of exhausted CD4 T cells from tumor
  Reaction_2: Th_exh => ; k_cell_clear*Th_exh;
  // Tumor cell growth
  Reaction_3: => C1; k_C1_growth*C1*ln(max(C_max/(C_total + cell), 1));
  // Tumor cell death
  Reaction_4: C1 => C_x; k_C1_death*C1;
  // VEGF secretion by cancer cells
  Reaction_5: => VEGF; k_vas_Csec*C_total;
  // VEGF degradation
  Reaction_6: VEGF => ; k_vas_deg*VEGF*V_T;
  // Vascular growth
  Reaction_7: => K_vasc; k_vas_growth*C_total*VEGF/(VEGF + VEGF_50);
  // Vascular inhibition (Hahnfeldt 1999 endogenous-inhibition surface term; vas_inhib_vol_scale = per-cell tumor volume in mm^3)
  Reaction_8: K_vasc => ; k_vas_decay*K_vasc*(max(C_total, 0)/cell*vas_inhib_vol_scale)^(2/3);
  // Thymic output of naive T cell to blood
  Reaction_9: => nCD4_V_C; Q_nCD4_thym/div_Treg;
  // Naive T cell proliferation in the peripheral compartment
  Reaction_10: => nCD4_V_P; k_nCD4_pro/div_Treg*nCD4_V_P/(K_nTreg_pro/div_Treg + nCD4_V_P);
  // Naive T cell proliferation in the TDLN compartment
  Reaction_11: => nCD4_V_LN; k_nCD4_pro/div_Treg*nCD4_V_LN/(K_nTreg_pro/div_Treg + nCD4_V_LN);
  // Naive T cell death in the peripheral compartment
  Reaction_12: nCD4_V_P => ; k_nTreg_death*nCD4_V_P;
  // Naive T cell death in the central compartment
  Reaction_13: nCD4_V_C => ; k_nTreg_death*nCD4_V_C;
  // Naive T cell death in the TDLN compartment
  Reaction_14: nCD4_V_LN => ; k_nTreg_death*nCD4_V_LN;
  // Naive T cell entry into the peripheral compartment
  Reaction_15: nCD4_V_C => nCD4_V_P; q_nCD4_P_in*nCD4_V_C;
  // Naive T cell exit from the peripheral compartment
  Reaction_16: nCD4_V_P => nCD4_V_C; q_nCD4_P_out*nCD4_V_P;
  // Naive T cell entry into the lymph node
  Reaction_17: nCD4_V_C => nCD4_V_LN; q_nCD4_LN_in*nCD4_V_C;
  // Naive T cell exit from the lymph node
  Reaction_18: nCD4_V_LN => nCD4_V_C; q_nCD4_LN_out*nCD4_V_LN;
  // Naive T cell activation (antigen-dependent)
  Reaction_19: nCD4_V_LN => ; (1 - f_nTreg)*k_Treg_act*H_APC_Treg*H_P0*nCD4_V_LN;
  // Naive T cell activation (antigen-dependent)
  Reaction_20: => aTreg; (1 - f_nTreg)*k_Treg_act*H_APC_Treg*H_P0*nCD4_V_LN*n_CD4_clones;
  // Constitutive Treg activation (antigen-independent)
  Reaction_21: nCD4_V_LN => ; f_nTreg*k_Treg_act*H_APC_Treg*nCD4_V_LN;
  // Constitutive Treg activation (antigen-independent)
  Reaction_22: => aTreg; f_nTreg*k_Treg_act*H_APC_Treg*nCD4_V_LN*n_CD4_clones;
  // aTreg cell proliferation
  Reaction_23: aTreg => ; k_Treg_pro*aTreg;
  // aTreg cell proliferation
  Reaction_24: => Treg_V_LN; k_Treg_pro*aTreg;
  // T cell death in the central compartment
  Reaction_25: Treg_V_C => ; k_Treg_death*Treg_V_C;
  // T cell death in the peripheral compartment
  Reaction_26: Treg_V_P => ; k_Treg_death*Treg_V_P;
  // T cell death in the lymph node compartment
  Reaction_27: Treg_V_LN => ; k_Treg_death*Treg_V_LN;
  // Tumor-local homeostatic Treg death (restored 2026-07-13). Bounds the pool so it can sit BELOW its half-saturation density; without it the renewal reaction is forced permanently negative and inverts. Shares the k_Treg_death deuterium anchor with the circulating compartments.
  Reaction_28: Treg_V_T => ; k_Treg_death*Treg_V_T;
  // Induced Treg clearance upon antigen clearance (nTregs persist)
  Reaction_29: Treg_V_T => ; (1 - f_nTreg)*k_cell_clear*Treg_V_T*(K_C2_recruit/(C_total^2 + K_C2_recruit));
  // Tumor-local Treg renewal, SATURATING in density (rho_Treg_max*V_T is the half-saturation density, NOT a hard ceiling). Reformulated 2026-07-13 from the unclamped logistic, which -- with the tumoral death removed on 2026-06-17 -- was forced permanently negative and ran as a quadratic sink (see the death reaction above and notes/model/tcell_carrying_capacity_inversion.md). This form is monotone in k_Treg_pro_tumor and in influx at every density, so the Cy throttle that gvax_module appends here (*(1 - Emax_Cy_Treg*...)) now correctly REMOVES Tregs instead of adding them. The pool is bounded by k_Treg_death (restored above), not by the cap. k_Treg_pro_tumor keeps its Ki67 submodel anchor. Mechanism-specific losses remain explicit: Cy depletion (gvax_module) and post-eradication clearance (below). The apCAF-driven additive cap (rho_Treg_apCAF_extra*H_apCAF) was retired 2026-05-01; an antigen-specific induced-Treg contribution (k_apCAF_iTreg, fibroblast_module_enhanced) remains the residual apCAF→Treg coupling.
  Reaction_30: => Treg_V_T; k_Treg_pro_tumor*Treg_V_T/(1 + Treg_V_T/(rho_Treg_max*V_T + cell))*(1 - Emax_Cy_Treg*Cy_eff/(Cy_eff_50 + Cy_eff));
  // T cell transport into the peripheral compartment
  Reaction_31: Treg_V_C => Treg_V_P; q_Treg_P_in*Treg_V_C;
  // T cell transport out of the peripheral compartment
  Reaction_32: Treg_V_P => Treg_V_C; q_Treg_P_out*Treg_V_P;
  // T cell transport into the tumor compartment
  Reaction_33: Treg_V_C => Treg_V_T; q_Treg_T_in*V_T*Treg_V_C*(C_total^2/(C_total^2 + K_C2_recruit))*H_vasc;
  // T cell transport out of the lymph node compartment
  Reaction_34: Treg_V_LN => Treg_V_C; q_Treg_LN_out*Treg_V_LN;
  // Thymic output of naive T cell to blood
  Reaction_35: => nCD8_V_C; Q_nCD8_thym/div_CD8;
  // Naive T cell proliferation in the peripheral compartment
  Reaction_36: => nCD8_V_P; k_nCD8_pro/div_CD8*nCD8_V_P/(K_nCD8_pro/div_CD8 + nCD8_V_P);
  // Naive T cell proliferation in the TDLN compartment
  Reaction_37: => nCD8_V_LN; k_nCD8_pro/div_CD8*nCD8_V_LN/(K_nCD8_pro/div_CD8 + nCD8_V_LN);
  // Naive T cell death in the peripheral compartment
  Reaction_38: nCD8_V_P => ; k_nCD8_death*nCD8_V_P;
  // Naive T cell death in the central compartment
  Reaction_39: nCD8_V_C => ; k_nCD8_death*nCD8_V_C;
  // Naive T cell death in the TDLN compartment
  Reaction_40: nCD8_V_LN => ; k_nCD8_death*nCD8_V_LN;
  // Naive T cell entry into the peripheral compartment
  Reaction_41: nCD8_V_C => nCD8_V_P; q_nCD8_P_in*nCD8_V_C;
  // Naive T cell exit from the peripheral compartment
  Reaction_42: nCD8_V_P => nCD8_V_C; q_nCD8_P_out*nCD8_V_P;
  // Naive T cell entry into the lymph node
  Reaction_43: nCD8_V_C => nCD8_V_LN; q_nCD8_LN_in*nCD8_V_C;
  // Naive T cell exit from the lymph node
  Reaction_44: nCD8_V_LN => nCD8_V_C; q_nCD8_LN_out*nCD8_V_LN;
  // Naive CD8 T cell activation by mature cDC1 (cross-presentation), licensed by CD4 help (H_CD4_help)
  Reaction_45: nCD8_V_LN => ; k_T_activation_per_APC*mcDC1_V_LN*H_P1*nCD8_V_LN*H_CD4_help;
  // Naive CD8 -> activated CD8 commitment (x clone diversity). Clonal EXPANSION is carried solely by the 2^N_aT proliferation cascade below (N_aT = N_div_base + N_div_costim*H_CD28 + N_IL2_CD8*IL2hill, Marchingo 2014). The former *n_T_expansion_burst fold-factor here double-counted that expansion (audit V12; the Butz1998 submodel forward model itself sums log2(burst)+N_aT) and was removed.
  Reaction_46: => aCD8; k_T_activation_per_APC*mcDC1_V_LN*H_P1*nCD8_V_LN*H_CD4_help*n_CD8_clones*(1 + f_epitope_spread*H_P1_spread);
  // aCD8 cell proliferation
  Reaction_47: aCD8 => ; k_CD8_pro/N_aT*aCD8;
  // aCD8 cell proliferation
  Reaction_48: => CD8_V_LN; k_CD8_pro/N_aT*2^N_aT*aCD8;
  // T cell death in the central compartment
  Reaction_49: CD8_V_C => ; k_CD8_death*CD8_V_C;
  // T cell death in the peripheral compartment
  Reaction_50: CD8_V_P => ; k_CD8_death*CD8_V_P;
  // T cell death in the lymph node compartment
  Reaction_51: CD8_V_LN => ; k_CD8_death*CD8_V_LN;
  // Tumor-local CD8 proliferation, SATURATING in density (Blessin-anchored k_pro; rho_CD8_max*V_T is the half-saturation density, NOT a hard ceiling). Reformulated 2026-07-13 from the logistic k_pro*CD8*(1 - CD8/cap): see notes/model/tcell_carrying_capacity_inversion.md. The logistic has no max(0,.) clamp, so once GVAX drove CD8 past the cap the "proliferation" reaction ran as a QUADRATIC SINK whose strength scaled with k_pro -- raising CD8 proliferation destroyed CD8 (4x k_CD8_T_pro -> 0.775x CD8), and influx sensitivity was crushed to a square root. The pools sit AT the cap boundary (d21 CD8/cap ~1.1 at the submodel-anchored theta), so the sign flipped exactly where the model lives. The saturating form is monotone in k_pro and in influx at every density, so behaviour no longer depends on which side of the cap a draw lands. The pool is bounded by k_CD8_death (restored 2026-06-22), not by the cap. Influx/turnover sets the level -- as this comment always claimed, but which the logistic did not deliver.
  Reaction_52: => CD8_V_T; k_CD8_T_pro*CD8_V_T/(1 + CD8_V_T/(rho_CD8_max*V_T + cell));
  // Tumor-local homeostatic CD8 death with a density-dependent CROWDING term (V3 stabilizer, 2026-07-17). Linear apoptosis/AICD k_CD8_death*CD8 plus a quadratic crowding death k_CD8_death*CD8^2/(rho_CD8_crowd*V_T) representing cytokine/nutrient competition (per-cell survival drops as local CD8 density rises). The crowding term is NOT meant to lower the target CD8 level -- it removes the near-critical runaway. With linear birth vs linear death the in-tumor CD8 balance sits at a bifurcation (below it CD8 collapses, above it the coupled tumour/immune loop diverges to NaN; ~30% of prior draws blow up and the ~62 cells/mm^2 target lives on that edge). The C^2 death bounds the high-density branch, converting the explode side into a finite steady state so the high-density regime becomes reachable. Crowding equals the linear death at density = rho_CD8_crowd (2e7 cell/mL ~ 220 cells/mm^2), ~28% extra death at the target. Distinct from exhaustion routing.
  Reaction_53: CD8_V_T => ; k_CD8_death*CD8_V_T*(1 + CD8_V_T/(rho_CD8_crowd*V_T + cell));
  // Baseline T cell exhaustion from chronic antigen exposure (PDL1-indep; gated by 1-H_PD1_C1 to avoid double-counting with route 4 below). Gateway: enters the progenitor-exhausted (Tpex) reservoir, not terminal.
  Reaction_54: CD8_V_T => CD8_pex; k_CD8_basal_exh*CD8_V_T*C_total/(C_total + K_C_exh + cell)*(1 - H_PD1_C1)*(1 - CD8_pex/(rho_pex_max*V_T + cell));
  // T cell clearance upon antigen clearance
  Reaction_55: CD8_V_T => CD8_exh; k_cell_clear*CD8_V_T*(K_C2_recruit/(C_total^2 + K_C2_recruit));
  // T cell exhaustion from Tregs (gateway: enters Tpex reservoir)
  Reaction_56: CD8_V_T => CD8_pex; k_Treg_CD8_exh*CD8_V_T*Tregs/(CD8_V_T + Tregs + cell)*(1 - CD8_pex/(rho_pex_max*V_T + cell))*H_IL10_Treg;
  // T cell exhaustion from cancer (PD-1 mediated; gateway: enters Tpex reservoir)
  Reaction_57: CD8_V_T => CD8_pex; k_C_CD8_exh*CD8_V_T*C_total/(C_total + CD8_V_T + cell)*H_PD1_C1*(1 - CD8_pex/(rho_pex_max*V_T + cell));
  // T cell exhaustion from ECM (gateway: enters Tpex reservoir)
  Reaction_58: CD8_V_T => CD8_pex; k_stiff_CD8_exh*CD8_V_T*H_stiff_Texh*(1 - CD8_pex/(rho_pex_max*V_T + cell));
  // Death of terminally exhausted CD8 T cells
  Reaction_59: CD8_exh => ; k_CD8_exh_death*CD8_exh;
  // Differentiation of progenitor-exhausted (Tpex) to terminal exhausted CD8
  Reaction_60: CD8_pex => CD8_exh; k_pex_diff*CD8_pex;
  // Death of progenitor-exhausted (Tpex) CD8 (~0.4x terminal, Miller 2019)
  Reaction_61: CD8_pex => ; k_pex_death*CD8_pex;
  // Constitutive Tpex -> effector reflux (homeostatic stem-like replenishment of functional CD8)
  Reaction_62: CD8_pex => CD8_V_T; k_pex_reflux*CD8_pex;
  // Anti-PD-1 reinvigoration: progenitor-exhausted (Tpex) CD8 reflux to effector pool (terminal cells not rescued; cA-C4)
  Reaction_63: CD8_pex => CD8_V_T; k_reinvig*CD8_pex*phi_aPD1_C1;
  // T cell transport into the peripheral compartment
  Reaction_64: CD8_V_C => CD8_V_P; q_CD8_P_in*CD8_V_C;
  // T cell transport out of the peripheral compartment
  Reaction_65: CD8_V_P => CD8_V_C; q_CD8_P_out*CD8_V_P;
  // T cell transport into the tumor compartment (reduced by CXCL12-mediated exclusion and vascular-access gating H_vasc). NOTE: the desmoplastic pore barrier (1-H_pore_T) is deliberately NOT applied here — V_T is the whole tumor region including stroma, and V_T.CD8 (matching the observed cd8_density) counts stromal CD8. PDAC immune exclusion keeps CD8 in the stroma but away from cancer nests, which is represented on the KILL rate (1-H_pore_T in k_C_Tcell_eff), not on infiltration into the region.
  Reaction_66: CD8_V_C => CD8_V_T; q_CD8_T_in*V_T*CD8_V_C*(C_total^2/(C_total^2 + K_C2_recruit))*(1 - H_CXCL12_Texcl)*H_vasc;
  // T cell transport out of the lymph node compartment
  Reaction_67: CD8_V_LN => CD8_V_C; q_CD8_LN_out*CD8_V_LN;
  // Naive CD8 trafficking to tumor (same extravasation gating as effector CD8)
  Reaction_68: nCD8_V_C => nCD8_V_T; q_CD8_T_in*V_T*nCD8_V_C*(C_total^2/(C_total^2 + K_C2_recruit))*(1 - H_CXCL12_Texcl)*H_vasc;
  // Naive CD8 consumed by tumor-local cDC1 priming
  Reaction_69: nCD8_V_T => ; k_T_activation_per_APC*mcDC1_V_T*nCD8_V_T;
  // Tumor-local CD8 priming by mature cDC1 (clonal burst; ABM: PARAM_DC_PRIME_K_CD8)
  Reaction_70: => CD8_V_T; k_T_activation_per_APC*mcDC1_V_T*nCD8_V_T*n_CD8_clones;
  // Naive CD8 death in tumor
  Reaction_71: nCD8_V_T => ; k_nCD8_death*nCD8_V_T;
  // Naive CD8 clearance upon antigen clearance
  Reaction_72: nCD8_V_T => ; k_cell_clear*nCD8_V_T*(K_C2_recruit/(C_total^2 + K_C2_recruit));
  // Cancer cell killing by T cells
  Reaction_73: C1 => C_x; k_C_Tcell_eff*C1;
  // cDC1 recruitment into tumor (ECM-impeded)
  Reaction_74: => cDC1_V_T; k_APC_death*cDC1_recruit_target_T*V_T*(1 - H_pore_APC);
  // cDC1 death/turnover in tumor
  Reaction_75: cDC1_V_T => ; k_APC_death*cDC1_V_T;
  // cDC1 recruitment into LN (homeostatic source toward APC0_cDC1_LN)
  Reaction_76: => cDC1_V_LN; k_APC_death*APC0_cDC1_LN*V_LN;
  // cDC1 turnover/death in LN (first-order)
  Reaction_77: cDC1_V_LN => ; k_APC_death*cDC1_V_LN;
  // cDC1 maturation in tumor (DAMP+IL12 driven, IL10+TGFb inhibited)
  Reaction_78: cDC1_V_T => mcDC1_V_T; k_APC_mat_cDC1*cDC1_V_T*(1 - (1 - min(H_HMGB1*(1 + DC_Ab_boost*H_Ab_DC), 1))*(1 - H_IL12))*(1 - H_IL10_APC)*(1 - H_TGFb_APC);
  // mcDC1 migration to lymph node (ECM-impeded)
  Reaction_79: mcDC1_V_T => mcDC1_V_LN; k_APC_mig*mcDC1_V_T*(1 - H_pore_APC);
  // mcDC1 in-situ death/turnover in tumor (pure death; migration to LN is the separate efflux fate)
  Reaction_80: mcDC1_V_T => ; k_mAPC_death*mcDC1_V_T;
  // mcDC1 death in lymph node
  Reaction_81: mcDC1_V_LN => ; k_mAPC_death*mcDC1_V_LN;
  // cDC2 recruitment into tumor (ECM-impeded)
  Reaction_82: => cDC2_V_T; k_APC_death*cDC2_recruit_target_T*V_T*(1 - H_pore_APC);
  // cDC2 death/turnover in tumor
  Reaction_83: cDC2_V_T => ; k_APC_death*cDC2_V_T;
  // cDC2 recruitment into LN (homeostatic source toward APC0_cDC2_LN)
  Reaction_84: => cDC2_V_LN; k_APC_death*APC0_cDC2_LN*V_LN;
  // cDC2 turnover/death in LN (first-order)
  Reaction_85: cDC2_V_LN => ; k_APC_death*cDC2_V_LN;
  // cDC2 maturation in tumor (DAMP+IL12 driven, IL10+TGFb inhibited)
  Reaction_86: cDC2_V_T => mcDC2_V_T; k_APC_mat_cDC2*cDC2_V_T*(1 - (1 - min(H_HMGB1*(1 + DC_Ab_boost*H_Ab_DC), 1))*(1 - H_IL12))*(1 - H_IL10_APC)*(1 - H_TGFb_APC);
  // mcDC2 migration to lymph node (ECM-impeded)
  Reaction_87: mcDC2_V_T => mcDC2_V_LN; k_APC_mig*mcDC2_V_T*(1 - H_pore_APC);
  // mcDC2 in-situ death/turnover in tumor (pure death; migration to LN is the separate efflux fate)
  Reaction_88: mcDC2_V_T => ; k_mAPC_death*mcDC2_V_T;
  // mcDC2 death in lymph node
  Reaction_89: mcDC2_V_LN => ; k_mAPC_death*mcDC2_V_LN;
  // MHC translocation
  Reaction_90: M1_A_e => M1_A_s; kout*M1_A_e*A_e - kin*M1_A_s*A_s;
  // Antigen deposition from dying cancer cells
  Reaction_91: => P0_V_T; n_CD4_clones*P0_C1*R_Tcell;
  // Free antigen degradation
  Reaction_92: P0_V_T => ; k_xP0_deg*P0_V_T*V_T;
  // Antigen uptake by all DC subtypes (cDC1+cDC2)
  Reaction_93: P0_V_T => ; k_P0_up*APC_total_T*P0_V_T*V_T;
  // Antigen uptake by mature antigen presenting cells
  Reaction_94: => P0_V_e; k_P0_up*cell*P0_V_T*V_e;
  // Antigen degradation in APC endosomes
  Reaction_95: P0_V_e => p0; k_P0_deg*P0_V_e*V_e;
  // Epitope degradation in APC endosomes
  Reaction_96: p0 => ; k_p0_deg*p0*V_e;
  // Antigen-MHC binding in endosome
  Reaction_97: p0 + M1_A_e => M1p0_A_e; k_P0_on*p0*M1_A_e*A_e;
  // Antigen-MHC unbinding in endosome
  Reaction_98: M1p0_A_e => p0 + M1_A_e; k_P0_d1*k_P0_on*M1p0_A_e*A_e;
  // Antigen-MHC unbinding on APC surface
  Reaction_99: M1p0_A_s => M1_A_s; k_P0_d1*k_P0_on*M1p0_A_s*A_s;
  // Antigen-MHC translocation
  Reaction_100: M1p0_A_e => M1p0_A_s; kout*M1p0_A_e*A_e;
  // Antigen deposition from dying cancer cells
  Reaction_101: => P1_V_T; n_CD8_clones*P1_C1*R_Tcell;
  // Free antigen degradation
  Reaction_102: P1_V_T => ; k_xP1_deg*P1_V_T*V_T;
  // Antigen uptake by all DC subtypes (cDC1+cDC2)
  Reaction_103: P1_V_T => ; k_P1_up*APC_total_T*P1_V_T*V_T;
  // Antigen uptake by mature antigen presenting cells
  Reaction_104: => P1_V_e; k_P1_up*cell*P1_V_T*V_e;
  // Antigen degradation in APC endosomes
  Reaction_105: P1_V_e => p1; k_P1_deg*P1_V_e*V_e;
  // Epitope degradation in APC endosomes
  Reaction_106: p1 => ; k_p1_deg*p1*V_e;
  // Antigen-MHC binding in endosome
  Reaction_107: p1 + M1_A_e => M1p1_A_e; k_P1_on*p1*M1_A_e*A_e;
  // Antigen-MHC unbinding in endosome
  Reaction_108: M1p1_A_e => p1 + M1_A_e; k_P1_d1*k_P1_on*M1p1_A_e*A_e;
  // Antigen-MHC unbinding on APC surface
  Reaction_109: M1p1_A_s => M1_A_s; k_P1_d1*k_P1_on*M1p1_A_s*A_s;
  // Antigen-MHC translocation
  Reaction_110: M1p1_A_e => M1p1_A_s; kout*M1p1_A_e*A_e;
  // aPD1 diffusive transport to peripheral compartment
  Reaction_111: aPD1_V_C -> aPD1_V_P; q_P_aPD1*(aPD1_V_C/gamma_C_aPD1 - aPD1_V_P/gamma_P_aPD1);
  // aPD1 diffusive transport to tumor compartment
  Reaction_112: aPD1_V_C -> aPD1_V_T; q_T_aPD1*(aPD1_V_C/gamma_C_aPD1 - aPD1_V_T/gamma_T_aPD1);
  // aPD1 diffusive transport to lymph node compartment
  Reaction_113: aPD1_V_C -> aPD1_V_LN; q_LN_aPD1*(aPD1_V_C/gamma_C_aPD1 - aPD1_V_LN/gamma_LN_aPD1);
  // aPD1 convective transport from tumor to lymph node
  Reaction_114: aPD1_V_T => aPD1_V_LN; q_LD_aPD1*V_T*aPD1_V_T/gamma_T_aPD1;
  // aPD1 convective transport from lymph node to central
  Reaction_115: aPD1_V_LN => aPD1_V_C; q_LD_aPD1*V_T*aPD1_V_LN/gamma_LN_aPD1;
  // Drug clearance from central compartment
  Reaction_116: aPD1_V_C => ; k_cl_aPD1*aPD1_V_C;
  // Translocation of PDL1 between cell surface and cytoplasm; IFNg sets the induction CEILING (base -> base*r_PDL1_IFNg), not just the rate
  Reaction_117: => PDL1_syn_CD8_C1; k_out_PDL1*IFNg_V_T/(IFNg_V_T + IFNg_50_ind)*(1 - syn_CD8_C1_PDL1_total/(C1_PDL1_base*(1 + (r_PDL1_IFNg - 1)*IFNg_V_T/(IFNg_V_T + IFNg_50_ind))/A_cell));
  // Translocation of PDL2 between cell surface and cytoplasm; IFNg sets the induction CEILING, not just the rate
  Reaction_118: => PDL2_syn_CD8_C1; k_out_PDL1*r_PDL2C1*IFNg_V_T/(IFNg_V_T + IFNg_50_ind)*(1 - syn_CD8_C1_PDL2_total/(C1_PDL1_base*(1 + (r_PDL1_IFNg - 1)*IFNg_V_T/(IFNg_V_T + IFNg_50_ind))/A_cell*r_PDL2C1));
  // Translocation of PDL1 between cell surface and cytoplasm
  Reaction_119: => PDL1_syn_CD8_C1; k_in_PDL1*(C1_PDL1_base/A_cell - syn_CD8_C1_PDL1_total)*syn_CD8_C1;
  // Translocation of PDL2 between cell surface and cytoplasm
  Reaction_120: => PDL2_syn_CD8_C1; k_in_PDL1*(C1_PDL1_base/A_cell*r_PDL2C1 - syn_CD8_C1_PDL2_total)*syn_CD8_C1;
  // binding and unbinding of PD1 PDL1 in synapse
  Reaction_121: PD1_syn_CD8_C1 + PDL1_syn_CD8_C1 -> PD1_PDL1_syn_CD8_C1; (kon_PD1_PDL1*PD1_syn_CD8_C1*PDL1_syn_CD8_C1 - koff_PD1_PDL1*PD1_PDL1_syn_CD8_C1)*syn_CD8_C1;
  // binding and unbinding of PD1 PDL2 in synapse
  Reaction_122: PD1_syn_CD8_C1 + PDL2_syn_CD8_C1 -> PD1_PDL2_syn_CD8_C1; (kon_PD1_PDL2*PD1_syn_CD8_C1*PDL2_syn_CD8_C1 - koff_PD1_PDL2*PD1_PDL2_syn_CD8_C1)*syn_CD8_C1;
  // binding and unbinding of PD1 to aPD1 on CD8 surface in synapse
  Reaction_123: PD1_syn_CD8_C1 -> PD1_aPD1_syn_CD8_C1; (2*kon_PD1_aPD1*(PD1_syn_CD8_C1*aPD1_V_T/gamma_T_aPD1) - koff_PD1_aPD1*PD1_aPD1_syn_CD8_C1)*syn_CD8_C1;
  // binding and unbinding of PD1 to PD1-aPD1 on CD8 surface in synapse
  Reaction_124: PD1_aPD1_syn_CD8_C1 + PD1_syn_CD8_C1 -> PD1_aPD1_PD1_syn_CD8_C1; (Chi_PD1_aPD1*kon_PD1_aPD1*PD1_syn_CD8_C1*PD1_aPD1_syn_CD8_C1 - 2*koff_PD1_aPD1*PD1_aPD1_PD1_syn_CD8_C1)*syn_CD8_C1;
  // binding and unbinding of CD28 and CD80 in synapse
  Reaction_125: CD28_syn_CD8_C1 + CD80_syn_CD8_C1 -> CD28_CD80_syn_CD8_C1; (2*kon_CD28_CD80*CD28_syn_CD8_C1*CD80_syn_CD8_C1 - koff_CD28_CD80*CD28_CD80_syn_CD8_C1)*syn_CD8_C1;
  // binding and unbinding of CD28-CD80 and CD28 in synapse
  Reaction_126: CD28_CD80_syn_CD8_C1 + CD28_syn_CD8_C1 -> CD28_CD80_CD28_syn_CD8_C1; (kon_CD28_CD80*CD28_syn_CD8_C1*CD28_CD80_syn_CD8_C1 - 2*koff_CD28_CD80*CD28_CD80_CD28_syn_CD8_C1)*syn_CD8_C1;
  // binding and unbinding of CD28 and CD86 in synapse
  Reaction_127: CD28_syn_CD8_C1 + CD86_syn_CD8_C1 -> CD28_CD86_syn_CD8_C1; (kon_CD28_CD86*CD28_syn_CD8_C1*CD86_syn_CD8_C1 - koff_CD28_CD86*CD28_CD86_syn_CD8_C1)*syn_CD8_C1;
  // binding and unbinding of CTLA4 and CD80 in synapse
  Reaction_128: CTLA4_syn_CD8_C1 + CD80_syn_CD8_C1 -> CD80_CTLA4_syn_CD8_C1; (4*kon_CTLA4_CD80*CTLA4_syn_CD8_C1*CD80_syn_CD8_C1 - koff_CTLA4_CD80*CD80_CTLA4_syn_CD8_C1)*syn_CD8_C1;
  // binding and unbinding of CTLA4 and CD80-CTLA4 in synapse
  Reaction_129: CTLA4_syn_CD8_C1 + CD80_CTLA4_syn_CD8_C1 -> CTLA4_CD80_CTLA4_syn_CD8_C1; (2*kon_CTLA4_CD80*CTLA4_syn_CD8_C1*CD80_CTLA4_syn_CD8_C1 - 2*koff_CTLA4_CD80*CTLA4_CD80_CTLA4_syn_CD8_C1)*syn_CD8_C1;
  // binding and unbinding of CD80 and CTLA4-CD80-CTLA4 in synapse
  Reaction_130: CD80_syn_CD8_C1 + CTLA4_CD80_CTLA4_syn_CD8_C1 -> CD80_CTLA4_CD80_CTLA4_syn_CD8_C1; (4*kon_CTLA4_CD80*CD80_syn_CD8_C1*CTLA4_CD80_CTLA4_syn_CD8_C1 - koff_CTLA4_CD80*CD80_CTLA4_CD80_CTLA4_syn_CD8_C1)*syn_CD8_C1;
  // binding and unbinding of CD80-CTLA4 and CD80 in synapse
  Reaction_131: CD80_CTLA4_syn_CD8_C1 + CD80_syn_CD8_C1 -> CD80_CTLA4_CD80_syn_CD8_C1; (2*kon_CTLA4_CD80*CD80_CTLA4_syn_CD8_C1*CD80_syn_CD8_C1 - 2*koff_CTLA4_CD80*CD80_CTLA4_CD80_syn_CD8_C1)*syn_CD8_C1;
  // binding and unbinding of CTLA4 and CD80-CTLA4-CD80 in synapse
  Reaction_132: CTLA4_syn_CD8_C1 + CD80_CTLA4_CD80_syn_CD8_C1 -> CD80_CTLA4_CD80_CTLA4_syn_CD8_C1; (4*kon_CTLA4_CD80*CTLA4_syn_CD8_C1*CD80_CTLA4_CD80_syn_CD8_C1 - koff_CTLA4_CD80*CD80_CTLA4_CD80_CTLA4_syn_CD8_C1)*syn_CD8_C1;
  // binding and unbinding of CTLA4 and CD86 in synapse
  Reaction_133: CTLA4_syn_CD8_C1 + CD86_syn_CD8_C1 -> CD86_CTLA4_syn_CD8_C1; (2*kon_CTLA4_CD86*CTLA4_syn_CD8_C1*CD86_syn_CD8_C1 - koff_CTLA4_CD86*CD86_CTLA4_syn_CD8_C1)*syn_CD8_C1;
  // binding and unbinding of CD86-CTLA4 and CD86 in synapse
  Reaction_134: CD86_CTLA4_syn_CD8_C1 + CD86_syn_CD8_C1 -> CD86_CTLA4_CD86_syn_CD8_C1; (kon_CTLA4_CD86*CD86_CTLA4_syn_CD8_C1*CD86_syn_CD8_C1 - 2*koff_CTLA4_CD86*CD86_CTLA4_CD86_syn_CD8_C1)*syn_CD8_C1;
  // self-association and dissociation of CD80 monomers in synapse
  Reaction_135: CD80m_syn_CD8_C1 + CD80m_syn_CD8_C1 -> CD80_syn_CD8_C1; (kon_CD80_CD80*CD80m_syn_CD8_C1*CD80m_syn_CD8_C1 - koff_CD80_CD80*CD80_syn_CD8_C1)*syn_CD8_C1;
  // binding and unbinding of CD80 and PDL1 in synapse
  Reaction_136: CD80m_syn_CD8_C1 + PDL1_syn_CD8_C1 -> PDL1_CD80_syn_CD8_C1; (kon_CD80_PDL1*CD80m_syn_CD8_C1*PDL1_syn_CD8_C1 - koff_CD80_PDL1*PDL1_CD80_syn_CD8_C1)*syn_CD8_C1;
  // binding and unbinding of PDL1-CD80 and CD28 in synapse
  Reaction_137: PDL1_CD80_syn_CD8_C1 + CD28_syn_CD8_C1 -> PDL1_CD80_CD28_syn_CD8_C1; (kon_CD28_CD80*PDL1_CD80_syn_CD8_C1*CD28_syn_CD8_C1 - koff_CD28_CD80*PDL1_CD80_CD28_syn_CD8_C1)*syn_CD8_C1;
  // binding and unbinding of PDL1-CD80 and CTLA4 in synapse
  Reaction_138: PDL1_CD80_syn_CD8_C1 + CTLA4_syn_CD8_C1 -> PDL1_CD80_CTLA4_syn_CD8_C1; (2*kon_CTLA4_CD80*PDL1_CD80_syn_CD8_C1*CTLA4_syn_CD8_C1 - koff_CTLA4_CD80*PDL1_CD80_CTLA4_syn_CD8_C1)*syn_CD8_C1;
  // Translocation of PDL1 between cell surface and cytoplasm; IFNg sets the induction CEILING (base -> base*r_PDL1_IFNg), not just the rate
  Reaction_139: => PDL1_syn_CD8_APC; k_out_PDL1*IFNg_V_LN/(IFNg_V_LN + IFNg_50_ind)*(1 - syn_CD8_APC_PDL1_total/(APC_PDL1_base*(1 + (r_PDL1_IFNg - 1)*IFNg_V_LN/(IFNg_V_LN + IFNg_50_ind))/A_APC));
  // Translocation of PDL2 between cell surface and cytoplasm; IFNg sets the induction CEILING, not just the rate
  Reaction_140: => PDL2_syn_CD8_APC; k_out_PDL1*r_PDL2APC*IFNg_V_LN/(IFNg_V_LN + IFNg_50_ind)*(1 - syn_CD8_APC_PDL2_total/(APC_PDL1_base*(1 + (r_PDL1_IFNg - 1)*IFNg_V_LN/(IFNg_V_LN + IFNg_50_ind))/A_APC*r_PDL2APC));
  // Translocation of PDL1 between cell surface and cytoplasm
  Reaction_141: => PDL1_syn_CD8_APC; k_in_PDL1*(APC_PDL1_base/A_APC - syn_CD8_APC_PDL1_total)*syn_CD8_APC;
  // Translocation of PDL2 between cell surface and cytoplasm
  Reaction_142: => PDL2_syn_CD8_APC; k_in_PDL1*(APC_PDL1_base/A_APC*r_PDL2APC - syn_CD8_APC_PDL2_total)*syn_CD8_APC;
  // binding and unbinding of PD1 PDL1 in synapse
  Reaction_143: PD1_syn_CD8_APC + PDL1_syn_CD8_APC -> PD1_PDL1_syn_CD8_APC; (kon_PD1_PDL1*PD1_syn_CD8_APC*PDL1_syn_CD8_APC - koff_PD1_PDL1*PD1_PDL1_syn_CD8_APC)*syn_CD8_APC;
  // binding and unbinding of PD1 PDL2 in synapse
  Reaction_144: PD1_syn_CD8_APC + PDL2_syn_CD8_APC -> PD1_PDL2_syn_CD8_APC; (kon_PD1_PDL2*PD1_syn_CD8_APC*PDL2_syn_CD8_APC - koff_PD1_PDL2*PD1_PDL2_syn_CD8_APC)*syn_CD8_APC;
  // binding and unbinding of PD1 to aPD1 on CD8 surface in synapse
  Reaction_145: PD1_syn_CD8_APC -> PD1_aPD1_syn_CD8_APC; (2*kon_PD1_aPD1*(PD1_syn_CD8_APC*aPD1_V_LN/gamma_LN_aPD1) - koff_PD1_aPD1*PD1_aPD1_syn_CD8_APC)*syn_CD8_APC;
  // binding and unbinding of PD1 to PD1-aPD1 on CD8 surface in synapse
  Reaction_146: PD1_aPD1_syn_CD8_APC + PD1_syn_CD8_APC -> PD1_aPD1_PD1_syn_CD8_APC; (Chi_PD1_aPD1*kon_PD1_aPD1*PD1_syn_CD8_APC*PD1_aPD1_syn_CD8_APC - 2*koff_PD1_aPD1*PD1_aPD1_PD1_syn_CD8_APC)*syn_CD8_APC;
  // binding and unbinding of CD28 and CD80 in synapse
  Reaction_147: CD28_syn_CD8_APC + CD80_syn_CD8_APC -> CD28_CD80_syn_CD8_APC; (2*kon_CD28_CD80*CD28_syn_CD8_APC*CD80_syn_CD8_APC - koff_CD28_CD80*CD28_CD80_syn_CD8_APC)*syn_CD8_APC;
  // binding and unbinding of CD28-CD80 and CD28 in synapse
  Reaction_148: CD28_CD80_syn_CD8_APC + CD28_syn_CD8_APC -> CD28_CD80_CD28_syn_CD8_APC; (kon_CD28_CD80*CD28_syn_CD8_APC*CD28_CD80_syn_CD8_APC - 2*koff_CD28_CD80*CD28_CD80_CD28_syn_CD8_APC)*syn_CD8_APC;
  // binding and unbinding of CD28 and CD86 in synapse
  Reaction_149: CD28_syn_CD8_APC + CD86_syn_CD8_APC -> CD28_CD86_syn_CD8_APC; (kon_CD28_CD86*CD28_syn_CD8_APC*CD86_syn_CD8_APC - koff_CD28_CD86*CD28_CD86_syn_CD8_APC)*syn_CD8_APC;
  // binding and unbinding of CTLA4 and CD80 in synapse
  Reaction_150: CTLA4_syn_CD8_APC + CD80_syn_CD8_APC -> CD80_CTLA4_syn_CD8_APC; (4*kon_CTLA4_CD80*CTLA4_syn_CD8_APC*CD80_syn_CD8_APC - koff_CTLA4_CD80*CD80_CTLA4_syn_CD8_APC)*syn_CD8_APC;
  // binding and unbinding of CTLA4 and CD80-CTLA4 in synapse
  Reaction_151: CTLA4_syn_CD8_APC + CD80_CTLA4_syn_CD8_APC -> CTLA4_CD80_CTLA4_syn_CD8_APC; (2*kon_CTLA4_CD80*CTLA4_syn_CD8_APC*CD80_CTLA4_syn_CD8_APC - 2*koff_CTLA4_CD80*CTLA4_CD80_CTLA4_syn_CD8_APC)*syn_CD8_APC;
  // binding and unbinding of CD80 and CTLA4-CD80-CTLA4 in synapse
  Reaction_152: CD80_syn_CD8_APC + CTLA4_CD80_CTLA4_syn_CD8_APC -> CD80_CTLA4_CD80_CTLA4_syn_CD8_APC; (4*kon_CTLA4_CD80*CD80_syn_CD8_APC*CTLA4_CD80_CTLA4_syn_CD8_APC - koff_CTLA4_CD80*CD80_CTLA4_CD80_CTLA4_syn_CD8_APC)*syn_CD8_APC;
  // binding and unbinding of CD80-CTLA4 and CD80 in synapse
  Reaction_153: CD80_CTLA4_syn_CD8_APC + CD80_syn_CD8_APC -> CD80_CTLA4_CD80_syn_CD8_APC; (2*kon_CTLA4_CD80*CD80_CTLA4_syn_CD8_APC*CD80_syn_CD8_APC - 2*koff_CTLA4_CD80*CD80_CTLA4_CD80_syn_CD8_APC)*syn_CD8_APC;
  // binding and unbinding of CTLA4 and CD80-CTLA4-CD80 in synapse
  Reaction_154: CTLA4_syn_CD8_APC + CD80_CTLA4_CD80_syn_CD8_APC -> CD80_CTLA4_CD80_CTLA4_syn_CD8_APC; (4*kon_CTLA4_CD80*CTLA4_syn_CD8_APC*CD80_CTLA4_CD80_syn_CD8_APC - koff_CTLA4_CD80*CD80_CTLA4_CD80_CTLA4_syn_CD8_APC)*syn_CD8_APC;
  // binding and unbinding of CTLA4 and CD86 in synapse
  Reaction_155: CTLA4_syn_CD8_APC + CD86_syn_CD8_APC -> CD86_CTLA4_syn_CD8_APC; (2*kon_CTLA4_CD86*CTLA4_syn_CD8_APC*CD86_syn_CD8_APC - koff_CTLA4_CD86*CD86_CTLA4_syn_CD8_APC)*syn_CD8_APC;
  // binding and unbinding of CD86-CTLA4 and CD86 in synapse
  Reaction_156: CD86_CTLA4_syn_CD8_APC + CD86_syn_CD8_APC -> CD86_CTLA4_CD86_syn_CD8_APC; (kon_CTLA4_CD86*CD86_CTLA4_syn_CD8_APC*CD86_syn_CD8_APC - 2*koff_CTLA4_CD86*CD86_CTLA4_CD86_syn_CD8_APC)*syn_CD8_APC;
  // self-association and dissociation of CD80 monomers in synapse
  Reaction_157: CD80m_syn_CD8_APC + CD80m_syn_CD8_APC -> CD80_syn_CD8_APC; (kon_CD80_CD80*CD80m_syn_CD8_APC*CD80m_syn_CD8_APC - koff_CD80_CD80*CD80_syn_CD8_APC)*syn_CD8_APC;
  // binding and unbinding of CD80 and PDL1 in synapse
  Reaction_158: CD80m_syn_CD8_APC + PDL1_syn_CD8_APC -> PDL1_CD80_syn_CD8_APC; (kon_CD80_PDL1*CD80m_syn_CD8_APC*PDL1_syn_CD8_APC - koff_CD80_PDL1*PDL1_CD80_syn_CD8_APC)*syn_CD8_APC;
  // binding and unbinding of PDL1-CD80 and CD28 in synapse
  Reaction_159: PDL1_CD80_syn_CD8_APC + CD28_syn_CD8_APC -> PDL1_CD80_CD28_syn_CD8_APC; (kon_CD28_CD80*PDL1_CD80_syn_CD8_APC*CD28_syn_CD8_APC - koff_CD28_CD80*PDL1_CD80_CD28_syn_CD8_APC)*syn_CD8_APC;
  // binding and unbinding of PDL1-CD80 and CTLA4 in synapse
  Reaction_160: PDL1_CD80_syn_CD8_APC + CTLA4_syn_CD8_APC -> PDL1_CD80_CTLA4_syn_CD8_APC; (2*kon_CTLA4_CD80*PDL1_CD80_syn_CD8_APC*CTLA4_syn_CD8_APC - koff_CTLA4_CD80*PDL1_CD80_CTLA4_syn_CD8_APC)*syn_CD8_APC;
  // Naive CD4 activation by mature cDC2 (MHC-II presentation gate H_P1_II, mechanistic APC kinetics)
  Reaction_161: nCD4_V_LN => ; k_T_activation_per_APC*mcDC2_V_LN*H_P1_II*nCD4_V_LN;
  // Naive CD4 -> activated Th commitment (x clone diversity). Expansion carried solely by the 2^N_aTh cascade below; the former *n_T_expansion_burst double-counted it (audit V12) and was removed, mirroring CD8.
  Reaction_162: => aTh; k_T_activation_per_APC*mcDC2_V_LN*H_P1_II*nCD4_V_LN*n_CD4_clones*(1 + f_epitope_spread*H_P1_spread);
  // aTh cell proliferation
  Reaction_163: aTh => ; k_CD4_pro/N_aTh*aTh;
  // aTh cell proliferation
  Reaction_164: => Th_V_LN; k_CD4_pro/N_aTh*2^N_aTh*aTh;
  // TGFb/ArgI and antigen-specific apCAF contributions to Th->Treg conversion. The Th pool is the model's local conventional-CD4 substrate; no separate intratumoral naive-CD4 state is represented.
  Reaction_165: Th_V_T => Treg_V_T; k_Th_to_Treg*Th_V_T*H_TGFb_Th2Treg*(1 + Emax_ArgI_Treg*H_ArgI_Treg) + k_apCAF_iTreg*Th_V_T*(apCAF/(aPSC_total + cell))*H_apCAF_pMHCII;
  // T cell death in the central compartment
  Reaction_166: Th_V_C => ; k_CD4_death*Th_V_C;
  // T cell death in the peripheral compartment
  Reaction_167: Th_V_P => ; k_CD4_death*Th_V_P;
  // T cell death in the lymph node compartment
  Reaction_168: Th_V_LN => ; k_CD4_death*Th_V_LN;
  // Baseline Th exhaustion from chronic antigen exposure (niche-capped inflow: shuts off as Th_exh reservoir fills, mirrors CD8 gateway)
  Reaction_169: Th_V_T => Th_exh; k_Th_basal_exh*Th_V_T*C_total/(C_total + K_C_exh + cell)*(1 - Th_exh/(rho_Thexh_max*V_T + cell));
  // Th exhaustion driven by TGFβ (cell-specific EC50 via H_TGFb_Th_exh; niche-capped inflow, mirrors CD8 gateway)
  Reaction_170: Th_V_T => Th_exh; k_TGFb_Th_exh*Th_V_T*H_TGFb_Th_exh*(1 - Th_exh/(rho_Thexh_max*V_T + cell));
  // Th clearance upon antigen clearance (niche-capped inflow)
  Reaction_171: Th_V_T => Th_exh; k_cell_clear*Th_V_T*(K_C2_recruit/(C_total^2 + K_C2_recruit))*(1 - Th_exh/(rho_Thexh_max*V_T + cell));
  // Constitutive exhausted-Th -> functional-Th reflux (homeostatic replenishment; breaks the Th collapse so rho_Th_max binds)
  Reaction_172: Th_exh => Th_V_T; k_Th_reflux*Th_exh;
  // T cell transport into the peripheral compartment
  Reaction_173: Th_V_C => Th_V_P; q_Treg_P_in*Th_V_C;
  // T cell transport out of the peripheral compartment
  Reaction_174: Th_V_P => Th_V_C; q_Treg_P_out*Th_V_P;
  // T cell transport into the tumor compartment (reduced by CXCL12-mediated exclusion; vascular-access gated H_vasc)
  Reaction_175: Th_V_C => Th_V_T; q_Treg_T_in*V_T*Th_V_C*(C_total^2/(C_total^2 + K_C2_recruit))*(1 - H_CXCL12_Texcl)*H_vasc;
  // T cell transport out of the lymph node compartment
  Reaction_176: Th_V_LN => Th_V_C; q_Treg_LN_out*Th_V_LN;
  // Naive CD4 trafficking to tumor (same extravasation gating as Th/Treg)
  Reaction_177: nCD4_V_C => nCD4_V_T; q_Treg_T_in*V_T*nCD4_V_C*(C_total^2/(C_total^2 + K_C2_recruit))*(1 - H_CXCL12_Texcl)*H_vasc;
  // Naive CD4 consumed by tumor-local cDC2 priming
  Reaction_178: nCD4_V_T => ; k_T_activation_per_APC*mcDC2_V_T*nCD4_V_T;
  // Tumor-local CD4 priming by mature cDC2 (clonal burst -> Th; ABM: PARAM_DC_PRIME_K_TH). Treg fate handled by downstream Th->Treg conversion (k_Th_to_Treg*H_TGFb_Th2Treg).
  Reaction_179: => Th_V_T; k_T_activation_per_APC*mcDC2_V_T*nCD4_V_T*n_CD4_clones;
  // Naive CD4 death in tumor
  Reaction_180: nCD4_V_T => ; k_nTreg_death*nCD4_V_T;
  // Naive CD4 clearance upon antigen clearance
  Reaction_181: nCD4_V_T => ; k_cell_clear*nCD4_V_T*(K_C2_recruit/(C_total^2 + K_C2_recruit));
  // Tumor-local Th renewal, SATURATING in density (rho_Th_max*V_T is the half-saturation density, NOT a hard ceiling). Reformulated 2026-07-13 from the logistic k_pro*Th*(1 - Th/cap) -- same defect as CD8, see notes/model/tcell_carrying_capacity_inversion.md: unclamped, so above the cap the reaction became a quadratic sink scaling with k_Th_pro_tumor, inverting the response. Th sits at ~1.1x the cap at d21 under GVAX (submodel-anchored theta), i.e. right on the sign flip. The saturating form is monotone in k_pro and influx at every density. Bounded by k_CD4_death (restored 2026-06-22), not by the cap. The CD8-inflammation Hill (alpha_Th_cap, route-2) was retired 2026-06-22. k_Th_pro_tumor keeps its Ki67 anchor. Mechanism-specific losses: Th->Treg conversion, Th->Th_exh exhaustion, Th_exh death via k_cell_clear.
  Reaction_182: => Th_V_T; k_Th_pro_tumor*Th_V_T/(1 + Th_V_T/(rho_Th_max*V_T + cell));
  // Tumor-local homeostatic Th death (apoptosis; restored 2026-06-22). Distinct from exhaustion/conversion; sets the influx/turnover balance level with the trafficking + seed influx.
  Reaction_183: Th_V_T => ; k_CD4_death*Th_V_T;
  // Baseline tumor-immunosurveillance CD4 Th seeding (cancer-gated effector floor; analog of k_CD8_seed; prevents unphysical live-Th zero-collapse so cd4_helper_density / cd4_pct stop cratering)
  Reaction_184: => Th_V_T; k_Th_seed*V_T*(C_total^2/(C_total^2 + K_C2_recruit));
  // IFNg secretion from CD8 T cells in tumor (clone-specific effectors)
  Reaction_185: => IFNg_V_T; k_IFNg_Tsec*CD8_V_T;
  // IFNg secretion from Th cells in tumor (clone-specific effectors)
  Reaction_186: => IFNg_V_T; k_IFNg_Thsec*Th_V_T;
  // IFNg secretion from CD8 effector T cells in the lymph node
  Reaction_187: => IFNg_V_LN; k_IFNg_Tsec*CD8_V_LN;
  // IFNg secretion from Th effector T cells in the lymph node
  Reaction_188: => IFNg_V_LN; k_IFNg_Thsec*Th_V_LN;
  // IFNg degradation in tumor
  Reaction_189: IFNg_V_T => ; k_IFNg_deg*IFNg_V_T*V_T;
  // IFNg degradation in lymph node (mechanism #9)
  Reaction_190: IFNg_V_LN => ; k_IFNg_deg*IFNg_V_LN*V_LN;
  // Bioactive TGFb baseline production by PDAC cancer cells (scaled by f_active_TGFb).
  Reaction_191: => TGFb; k_TGFb_deg*f_active_TGFb*TGFb_baseline*V_T;
  // First-order TGFb degradation (acts on the full bioactive TGFb pool: baseline + Treg + myCAF secretion).
  Reaction_192: TGFb => ; k_TGFb_deg*TGFb*V_T;
  // Bioactive TGFb secretion by Tregs in tumor (scaled by f_active_TGFb).
  Reaction_193: => TGFb; f_active_TGFb*k_TGFb_Tsec*Treg_V_T;
  // CCL2 secretion by cancer cells (C_total); MDSC contribution not modeled
  Reaction_194: => CCL2; k_CCL2_sec*C_total;
  // CCL2 degradation
  Reaction_195: CCL2 => ; k_CCL2_deg*CCL2*V_T;
  // Recruitment of MDSC to tumor (enhanced by IL-6; vascular-access gated H_vasc)
  Reaction_196: => MDSC; k_MDSC_rec*V_T*(CCL2/(CCL2 + CCL2_50))*(1 + H_IL6_MDSC)*H_vasc;
  // MDSC death in the tumor compartment
  Reaction_197: MDSC => ; k_MDSC_death*MDSC;
  // MDSC death upon tumor eradication
  Reaction_198: MDSC => ; k_cell_clear*MDSC*(K_C2_recruit/(C_total^2 + K_C2_recruit));
  // NO degradation
  Reaction_199: NO => ; k_NO_deg*NO*V_T;
  // ArgI degradation
  Reaction_200: ArgI => ; k_ArgI_deg*ArgI*V_T;
  // NO secretion from MDSC
  Reaction_201: => NO; k_NO_sec*MDSC;
  // ArgI secretion from MDSC
  Reaction_202: => ArgI; k_ArgI_sec*MDSC;
  // Secretion of angiogenic factor by macrophage in tumor
  Reaction_203: => VEGF; k_vas_Msec*Mac_M2;
  // Recruitment of CCL2-attracted monocytes seeding as M1 (vascular-access gated H_vasc; density-capped at the rho_Mac_max niche ceiling). M2-like TAMs form downstream via M1->M2 polarization.
  Reaction_204: => Mac_M1; k_Mac_rec*V_T*(CCL2/(CCL2 + CCL2_50))*H_vasc*(1 - (Mac_M1 + Mac_M2)/(rho_Mac_max*V_T + cell));
  // Macrophage death upon tumor eradication
  Reaction_205: Mac_M1 => ; k_cell_clear*Mac_M1*(K_C2_recruit/(C_total^2 + K_C2_recruit));
  // Macrophage death upon tumor eradication
  Reaction_206: Mac_M2 => ; k_cell_clear*Mac_M2*(K_C2_recruit/(C_total^2 + K_C2_recruit));
  // Death of macrophage in tumor
  Reaction_207: Mac_M1 => ; k_Mac_death*Mac_M1;
  // Death of macrophage in tumor
  Reaction_208: Mac_M2 => ; k_Mac_death*Mac_M2;
  // Secretion of IL-12 by mature cDC1 in the tumor
  Reaction_209: => IL12; k_IL12_sec*mcDC1_V_T;
  // Secretion of IL-12 by macrophage in tumor
  Reaction_210: => IL12; k_IL12_Msec*Mac_M1;
  // Degradation of IL-12 in tumor
  Reaction_211: IL12 => ; k_IL12_deg*IL12*V_T;
  // Bioactive TGFb secretion by M2 macrophages (scaled by f_active_TGFb).
  Reaction_212: => TGFb; f_active_TGFb*k_TGFb_Msec*Mac_M2;
  // Secretion of IL-10 by macrophage in tumor
  Reaction_213: => IL10; k_IL10_sec*Mac_M2;
  // Arginase-I secretion by M2 TAMs (direct CD8 suppression via the shared V_T.ArgI pool; mechanism #7 cA-M3). Per-cell rate reused from MDSC k_ArgI_sec.
  Reaction_214: => ArgI; k_ArgI_sec*Mac_M2;
  // IL-10 secretion by Tregs (Pan 2025 DOI:10.3389/fimmu.2025.1582305)
  Reaction_215: => IL10; k_IL10_sec_Treg*Treg_V_T;
  // IL-10 secretion by MDSCs (Pan 2025 DOI:10.3389/fimmu.2025.1582305)
  Reaction_216: => IL10; k_IL10_sec_MDSC*MDSC;
  // Degradation of IL-10 in tumor
  Reaction_217: IL10 => ; k_IL10_deg*IL10*V_T;
  // M1 to M2 macrophage polarization (averaged Hill drive phi_M2_skew over TGFb, IL-10, IL-6 — max rate at k_M2_pol when all three are saturated).
  Reaction_218: Mac_M1 => Mac_M2; k_M2_pol*Mac_M1*phi_M2_skew;
  // M2 to M1 macrophage polarization in tumor (IL-12 Hill + IFNg linear sub-saturating - OR logic, max rate capped at k_M1_pol)
  Reaction_219: Mac_M2 => Mac_M1; k_M1_pol*Mac_M2*(1 - (1 - IL12/(IL12 + IL12_50))*max(0, 1 - k_IFNg_response*IFNg_V_T));
  // Translocation of PDL1 between cell surface and cytoplasm
  Reaction_220: => PDL1_syn_M_C; k_out_PDL1*IFNg_V_T/(IFNg_V_T + IFNg_50_ind)*(1 - PDL1_total/(C1_PDL1_base*r_PDL1_IFNg/A_cell));
  // Translocation of PDL2 between cell surface and cytoplasm
  Reaction_221: => PDL2_syn_M_C; k_out_PDL1*r_PDL2C1*IFNg_V_T/(IFNg_V_T + IFNg_50_ind)*(1 - PDL2_total/(C1_PDL1_base*r_PDL1_IFNg/A_cell*r_PDL2C1));
  // Translocation of PDL1 between cell surface and cytoplasm
  Reaction_222: => PDL1_syn_M_C; k_in_PDL1*(C1_PDL1_base/A_cell - PDL1_total)*syn_M_C;
  // Translocation of PDL2 between cell surface and cytoplasm
  Reaction_223: => PDL2_syn_M_C; k_in_PDL1*(C1_PDL1_base/A_cell*r_PDL2C1 - PDL2_total)*syn_M_C;
  // binding and unbinding of CD47-SIRPa in synapse
  Reaction_224: CD47 + SIRPa -> CD47_SIRPa; (kon_CD47_SIRPa*CD47*SIRPa - koff_CD47_SIRPa*CD47_SIRPa)*syn_M_C;
  // binding and unbinding of PD1 PDL1 in synapse
  Reaction_225: PD1_syn_M_C + PDL1_syn_M_C -> PD1_PDL1_syn_M_C; (kon_PD1_PDL1*PD1_syn_M_C*PDL1_syn_M_C - koff_PD1_PDL1*PD1_PDL1_syn_M_C)*syn_M_C;
  // binding and unbinding of PD1 PDL2 in synapse
  Reaction_226: PD1_syn_M_C + PDL2_syn_M_C -> PD1_PDL2_syn_M_C; (kon_PD1_PDL2*PD1_syn_M_C*PDL2_syn_M_C - koff_PD1_PDL2*PD1_PDL2_syn_M_C)*syn_M_C;
  // binding and unbinding of PD1 to aPD1 on macrophage surface in synapse
  Reaction_227: PD1_syn_M_C -> PD1_aPD1_syn_M_C; (2*kon_PD1_aPD1*(PD1_syn_M_C*aPD1_V_T/gamma_T_aPD1) - koff_PD1_aPD1*PD1_aPD1_syn_M_C)*syn_M_C;
  // binding and unbinding of PD1 to PD1-aPD1 on macrophage surface in synapse
  Reaction_228: PD1_aPD1_syn_M_C + PD1_syn_M_C -> PD1_aPD1_PD1_syn_M_C; (Chi_PD1_aPD1*kon_PD1_aPD1*PD1_syn_M_C*PD1_aPD1_syn_M_C - 2*koff_PD1_aPD1*PD1_aPD1_PD1_syn_M_C)*syn_M_C;
  // self-association and dissociation of CD80 monomers in synapse
  Reaction_229: CD80m_syn_M_C + CD80m_syn_M_C -> CD80_syn_M_C; (kon_CD80_CD80*CD80m_syn_M_C*CD80m_syn_M_C - koff_CD80_CD80*CD80_syn_M_C)*syn_M_C;
  // binding and unbinding of CD80 and PDL1 in synapse
  Reaction_230: CD80m_syn_M_C + PDL1_syn_M_C -> PDL1_CD80_syn_M_C; (kon_CD80_PDL1*CD80m_syn_M_C*PDL1_syn_M_C - koff_CD80_PDL1*PDL1_CD80_syn_M_C)*syn_M_C;
  // M1 macrophage-mediated killing of cancer cell
  Reaction_231: C1 => C_x; k_M1_phago*C1*Mac_M1/(Mac_M1 + K_M1_phago*C_total + cell)*(1 - H_Mac_C)*(1 - H_IL10_phago)*(1 + ADCC_boost_max*H_Ab);
  // Bioactive TGFb secretion by myCAFs (scaled by f_active_TGFb).
  Reaction_232: => TGFb; f_active_TGFb*k_TGFb_sec_myCAF*myCAF;
  // Encounter resident PSCs as tumor expands into pancreas
  Reaction_233: => qPSC; k_CAF_encounter*V_T*((k_CAF_const - qPSC/V_T)/k_CAF_const);
  // PSC activation to myCAF (TGFb-driven, Biffi 2019)
  Reaction_234: qPSC => myCAF; k_PSC_to_myCAF*qPSC*(TGFb/(TGFb_50_CAF_act + TGFb));
  // PSC activation to iCAF (IL-1-driven + IL-6 feedback)
  Reaction_235: qPSC => iCAF; k_PSC_to_iCAF*qPSC*H_IL1_eff*(1 + f_IL6_iCAF*H_IL6_iCAF);
  // PSC activation to apCAF (constitutive low rate, Elyada 2019)
  Reaction_236: qPSC => apCAF; k_PSC_to_apCAF*qPSC;
  // iCAF->myCAF interconversion (TGFb-driven plasticity)
  Reaction_237: iCAF => myCAF; k_iCAF_to_myCAF*iCAF*(TGFb/(TGFb_50_CAF_act + TGFb));
  // myCAF->iCAF interconversion (IL-1-driven + IL-6 feedback)
  Reaction_238: myCAF => iCAF; k_myCAF_to_iCAF*myCAF*H_IL1_eff*(1 + f_IL6_iCAF*H_IL6_iCAF);
  // myCAF proliferation: logistic on subtype-partitioned cap (stick-breaking simplex)
  Reaction_239: => myCAF; k_myCAF_prolif*myCAF*(1 - myCAF/((1 - f_apCAF_of_total)*(1 - f_iCAF_of_non_apCAF)*(f_stroma_max*C_total + K_stiff_niche*H_stiff_fib) + cell));
  // iCAF proliferation: logistic on subtype-partitioned cap (stick-breaking simplex)
  Reaction_240: => iCAF; k_iCAF_prolif*iCAF*(1 - iCAF/((1 - f_apCAF_of_total)*f_iCAF_of_non_apCAF*(f_stroma_max*C_total + K_stiff_niche*H_stiff_fib) + cell));
  // apCAF proliferation: logistic on subtype-partitioned cap (stick-breaking simplex; Elyada 2019)
  Reaction_241: => apCAF; k_apCAF_prolif*apCAF*(1 - apCAF/(f_apCAF_of_total*(f_stroma_max*C_total + K_stiff_niche*H_stiff_fib) + cell));
  // qPSC clearance upon tumor eradication
  Reaction_242: qPSC => ; k_cell_clear*qPSC*(K_C2_recruit/(C_total^2 + K_C2_recruit));
  // iCAF clearance upon tumor eradication (suppressed by stiff ECM niche)
  Reaction_243: iCAF => ; k_cell_clear*iCAF*(K_C2_recruit/(C_total^2 + K_C2_recruit))*(1 - H_stiff_fib);
  // myCAF clearance upon tumor eradication (suppressed by stiff ECM niche)
  Reaction_244: myCAF => ; k_cell_clear*myCAF*(K_C2_recruit/(C_total^2 + K_C2_recruit))*(1 - H_stiff_fib);
  // apCAF clearance upon tumor eradication (suppressed by stiff ECM niche)
  Reaction_245: apCAF => ; k_cell_clear*apCAF*(K_C2_recruit/(C_total^2 + K_C2_recruit))*(1 - H_stiff_fib);
  // Constitutive death of quiescent PSCs
  Reaction_246: qPSC => ; k_qpsc_death*qPSC;
  // Constitutive death of iCAFs
  Reaction_247: iCAF => ; k_iCAF_death*iCAF;
  // Constitutive death of myCAFs
  Reaction_248: myCAF => ; k_myCAF_death*myCAF;
  // Constitutive death of apCAFs
  Reaction_249: apCAF => ; k_apCAF_death*apCAF;
  // Collagen secretion by myCAFs (logistic (1-phi/phi_col_max) cap, f_col_basal + (1-f_col_basal)*H_TGFb_col)
  Reaction_250: => collagen; k_col_myCAF_sec*(1 - phi_collagen/phi_col_max)*myCAF*(f_col_basal + (1 - f_col_basal)*TGFb/(TGFb_50_col_sec + TGFb));
  // Collagen degradation: constitutive turnover + M2 MMP activity gated by f_nascent (LOX-crosslinking shield)
  Reaction_251: collagen => ; (k_col_deg + k_MMP_M2*Mac_M2/V_T*f_nascent)*collagen;
  // CXCL12 secretion by iCAFs (T cell exclusion, Elyada 2019, Ogawa 2021)
  Reaction_252: => CXCL12; k_CXCL12_sec_iCAF*iCAF;
  // CXCL12 secretion by PDAC tumor cells (Feig et al. 2013)
  Reaction_253: => CXCL12; k_CXCL12_sec_cancer*C_total;
  // CXCL12 degradation in tumor
  Reaction_254: CXCL12 => ; k_CXCL12_deg*CXCL12*V_T;
  // Effective iCAF-scaled IL-6 source; absorbs the nominal total from retired iCAF/cancer/TAM source attribution (C11)
  Reaction_255: => IL6; k_IL6_sec_iCAF*iCAF;
  // IL-6 degradation in tumor
  Reaction_256: IL6 => ; k_IL6_deg*IL6*V_T;
  // IL-1alpha secretion by cancer cells
  Reaction_257: => IL1; k_IL1_sec*C_total;
  // IL-1alpha degradation in tumor
  Reaction_258: IL1 => ; k_IL1_deg*IL1*V_T;
  // Angiogenic factor secretion by myCAFs (complements M2 macrophage secretion)
  Reaction_259: => VEGF; k_vas_myCAF_sec*myCAF;
  // GVAX-antigen-gated bulk intratumoral CD8 proliferation; retained in C13 without a TLA state model.
  GVAX_CD8_tumor_proliferation: => CD8_V_T; k_CD8_T_vac_pro*CD8_V_T*H_P1_spread/(1 + CD8_V_T/(rho_CD8_max*V_T + cell));
  // GVAX cell clearance at injection site
  GVAX_clearance_ID: GVAX_cells => ; k_GVAX_clearance*GVAX_cells;
  // GM-CSF production by GVAX cells at injection site
  GMCSF_production_ID: => GMCSF; k_GMCSF_prod*GVAX_cells*V_ID;
  // GM-CSF degradation at injection site
  GMCSF_degradation_ID: GMCSF => ; k_GMCSF_deg*GMCSF;
  GVAX_antigen_release_ID: => P1_GVAX; y_Ag_per_cell*k_GVAX_clearance*GVAX_cells;
  P1_degradation_ID: P1_GVAX => ; k_P1_deg_ID*P1_GVAX;
  APC_recruitment_ID: => APC; (k_APC_recruit0 + k_APC_recruit_ID*H_GMCSF_ID)*K_APC_ID/(K_APC_ID + APC + mAPC);
  // APC maturation with antigen uptake at injection site
  APC_maturation_ID: APC => mAPC; J_mature_ID;
  // Antigen consumption tied to APC maturation events
  P1_consumption_ID: P1_GVAX => ; sigma_P1_per_mAPC*J_mature_ID;
  // Vaccine antigen feeds the shared endosomal pMHC pool (raises H_P1); copy of tumor-antigen uptake with k_up->k_GVAX_present, V_T.P1->V_ID.P1_GVAX/V_ID (audit consensus #2)
  P1_GVAX_presentation_ID: => P1_V_e; k_GVAX_present*cell*(P1_GVAX/V_ID)*V_e;
  // APC death at injection site
  APC_death_ID: APC => ; k_APC_death_ID*APC;
  mAPC_death_ID: mAPC => ; k_mAPC_death_ID*mAPC;
  mAPC_migration_ID_LN: mAPC => mcDC2_V_LN; k_APC_mig_ID_LN*mAPC/(1 + mcDC2_V_LN/K_APC_mig);
  // Antigen transfer from GVAX-derived mcDC2 to LN-resident cDC1 (Ferris 2022). Catalytic by design: mcDC2 is the antigen donor and is not consumed (one migratory DC cross-dresses many resident cDC1). No antigen species moves in this reaction, so there is nothing to conserve here -- it is a count-gated cDC1->mcDC1 maturation; the antigen-LOAD dependence enters downstream at the H_P1-gated CD8 priming step (Teff_module). Bounded, not runaway: V_LN.cDC1 is the consumed substrate and is replenished only by its homeostatic source (APC_module), and the effective first-order rate k_cDC1_Ag_transfer*mcDC2 ~ 1e-3..1e-1/day stays well below cDC1 turnover. Audit m1-A11: no change.
  cDC1_Ag_transfer_LN: cDC1_V_LN => mcDC1_V_LN; k_cDC1_Ag_transfer*cDC1_V_LN*mcDC2_V_LN;
  // Cyclophosphamide clearance (t1/2 ~12-24 hours)
  Cy_degradation: Cy => ; k_Cy_clear*Cy;
  // Build-up of the durable Cy PD effect compartment from drug exposure
  Cy_eff_buildup: => Cy_eff; k_Cy_on*(Cy/(Cy_50_Treg + Cy));
  // Decay of the durable Cy PD effect compartment (sets Treg-suppression duration)
  Cy_eff_decay: Cy_eff => ; k_Cy_eff_decay*Cy_eff;
  // Selective Treg depletion by low-dose cyclophosphamide
  Cy_Treg_depletion: Treg_V_T => ; k_Cy_Treg_deplete*Treg_V_T*(Cy/(Cy_50_Treg + Cy));
  // Naive CD4 activation to Tfh (antigen-dependent)
  Reaction_278: nCD4_V_LN => ; k_Tfh_act*H_APC_Treg*H_P1*nCD4_V_LN;
  // Naive CD4 activation to Tfh (antigen-dependent, clonal expansion)
  Reaction_279: => aTfh; k_Tfh_act*H_APC_Treg*H_P1*nCD4_V_LN*n_CD4_clones;
  // aTfh cell proliferation
  Reaction_280: aTfh => ; k_CD4_pro/N_aTh*aTfh;
  // aTfh cell proliferation
  Reaction_281: => Tfh_V_LN; k_CD4_pro/N_aTh*2^N_aTh*aTfh;
  // Tfh death in the central compartment
  Reaction_282: Tfh_V_C => ; k_CD4_death*Tfh_V_C;
  // Tfh death in the peripheral compartment
  Reaction_283: Tfh_V_P => ; k_CD4_death*Tfh_V_P;
  // Tfh death in the lymph node compartment
  Reaction_284: Tfh_V_LN => ; k_CD4_death*Tfh_V_LN;
  // Tfh death in the tumor compartment
  Reaction_285: Tfh_V_T => ; k_CD4_death*Tfh_V_T;
  // Tfh clearance upon antigen clearance
  Reaction_286: Tfh_V_T => ; k_cell_clear*Tfh_V_T*(K_C2_recruit/(C_total^2 + K_C2_recruit));
  // Tumor-local Th -> Tfh differentiation (antigen + IL-6 gated, TLS biology)
  Reaction_287: Th_V_T => Tfh_V_T; k_Tfh_diff_tumor*H_P1*H_IL6_Tfh*Th_V_T;
  // Tfh transport into the peripheral compartment
  Reaction_288: Tfh_V_C => Tfh_V_P; q_Treg_P_in*Tfh_V_C;
  // Tfh transport out of the peripheral compartment
  Reaction_289: Tfh_V_P => Tfh_V_C; q_Treg_P_out*Tfh_V_P;
  // Tfh transport out of the lymph node compartment
  Reaction_290: Tfh_V_LN => Tfh_V_C; q_Treg_LN_out*Tfh_V_LN;
  // Marrow output of naive B cells to blood
  Reaction_291: => nB_V_C; k_nB_in;
  // Naive B cell death in the central compartment
  Reaction_292: nB_V_C => ; k_nB_death*nB_V_C;
  // Naive B cell death in the lymph node
  Reaction_293: nB_V_LN => ; k_nB_death*nB_V_LN;
  // Naive B cell entry into the lymph node
  Reaction_294: nB_V_C => nB_V_LN; q_nB_LN_in*nB_V_C;
  // Naive B cell exit from the lymph node
  Reaction_295: nB_V_LN => nB_V_C; q_nB_LN_out*nB_V_LN;
  // Naive B activation in LN (antigen + Tfh help)
  Reaction_296: nB_V_LN => ; k_B_act*H_P1*(Tfh_V_LN/(Tfh_V_LN + Tfh_50_B))*nB_V_LN;
  // Naive B activation in LN (antigen + Tfh help, clonal expansion)
  Reaction_297: => aB_V_LN; k_B_act*H_P1*(Tfh_V_LN/(Tfh_V_LN + Tfh_50_B))*nB_V_LN*n_B_clones;
  // Activated B proliferation in LN
  Reaction_298: aB_V_LN => ; k_B_pro/N_aTh*aB_V_LN;
  // Activated B proliferation in LN (clonal burst)
  Reaction_299: => B_V_LN; k_B_pro/N_aTh*2^N_aTh*aB_V_LN;
  // B cell death in the central compartment
  Reaction_300: B_V_C => ; k_B_death*B_V_C;
  // B cell death in the peripheral compartment
  Reaction_301: B_V_P => ; k_B_death*B_V_P;
  // B cell death in the lymph node
  Reaction_302: B_V_LN => ; k_B_death*B_V_LN;
  // B cell transport into the peripheral compartment
  Reaction_303: B_V_C => B_V_P; q_B_P_in*B_V_C;
  // B cell transport out of the peripheral compartment
  Reaction_304: B_V_P => B_V_C; q_B_P_out*B_V_P;
  // B cell transport out of the lymph node
  Reaction_305: B_V_LN => B_V_C; q_B_LN_out*B_V_LN;
  // B cell trafficking to tumor (arrives as naive, ABM: BCELL_NAIVE). Gated by CXCL12 exclusion, vasculature, and B lineage niche capacity (includes Breg).
  Reaction_306: B_V_C => nB_V_T; q_B_T_in*V_T*B_V_C*(C_total^2/(C_total^2 + K_C2_recruit))*(1 - H_CXCL12_Texcl)*H_vasc/(1 + (nB_V_T + aB_V_T + Plasma + nBreg + aBreg)/(rho_B_max*V_T + cell));
  // Tumor-local naive B activation (antigen-gated, ABM: NAIVE->ACTIVATED)
  Reaction_307: nB_V_T => aB_V_T; k_B_act_tumor*H_P1*nB_V_T;
  // Tumor-local activated B cell proliferation (saturating with rho_B_max cap on TOTAL B lineage including Breg, matching Th F182 form)
  Reaction_308: => aB_V_T; k_B_pro_tumor*aB_V_T/(1 + (nB_V_T + aB_V_T + Plasma + nBreg + aBreg)/(rho_B_max*V_T + cell));
  // Tumor-local aB -> plasma differentiation (Tfh-helped density Hill, ABM: ACTIVATED->PLASMA)
  Reaction_309: aB_V_T => Plasma; k_B_to_plasma*aB_V_T*(Tfh_V_T/V_T/(Tfh_V_T/V_T + Tfh_50_plasma));
  // Naive B cell death in the tumor compartment
  Reaction_310: nB_V_T => ; k_B_death*nB_V_T;
  // Activated B cell death in the tumor compartment
  Reaction_311: aB_V_T => ; k_B_death*aB_V_T;
  // Plasma cell death in the tumor compartment
  Reaction_312: Plasma => ; k_plasma_death*Plasma;
  // Naive B clearance upon antigen clearance
  Reaction_313: nB_V_T => ; k_cell_clear*nB_V_T*(K_C2_recruit/(C_total^2 + K_C2_recruit));
  // Activated B clearance upon antigen clearance
  Reaction_314: aB_V_T => ; k_cell_clear*aB_V_T*(K_C2_recruit/(C_total^2 + K_C2_recruit));
  // Plasma clearance upon antigen clearance
  Reaction_315: Plasma => ; k_cell_clear*Plasma*(K_C2_recruit/(C_total^2 + K_C2_recruit));
  // Naive B -> naive Breg switching (TGFb + IL-10 gated)
  Reaction_316: nB_V_T => nBreg; k_Breg_on*H_TGFb_Breg*H_IL10_Breg*nB_V_T;
  // Activated B -> activated Breg switching (TGFb + IL-10 gated)
  Reaction_317: aB_V_T => aBreg; k_Breg_on*H_TGFb_Breg*H_IL10_Breg*aB_V_T;
  // Naive Breg -> naive B reversion (epigenetic, HDAC-dependent)
  Reaction_318: nBreg => nB_V_T; k_Breg_off*nBreg;
  // Activated Breg -> activated B reversion
  Reaction_319: aBreg => aB_V_T; k_Breg_off*aBreg;
  // Tumor-local naive Breg activation (antigen-gated, same rate as nB)
  Reaction_320: nBreg => aBreg; k_B_act_tumor*H_P1*nBreg;
  // Tumor-local activated Breg proliferation (saturating, shared B lineage niche cap)
  Reaction_321: => aBreg; k_B_pro_tumor*aBreg/(1 + (nB_V_T + aB_V_T + Plasma + nBreg + aBreg)/(rho_B_max*V_T + cell));
  // Naive Breg death in tumor
  Reaction_322: nBreg => ; k_B_death*nBreg;
  // Activated Breg death in tumor
  Reaction_323: aBreg => ; k_B_death*aBreg;
  // Naive Breg clearance upon antigen clearance
  Reaction_324: nBreg => ; k_cell_clear*nBreg*(K_C2_recruit/(C_total^2 + K_C2_recruit));
  // Activated Breg clearance upon antigen clearance
  Reaction_325: aBreg => ; k_cell_clear*aBreg*(K_C2_recruit/(C_total^2 + K_C2_recruit));
  // Breg IL-10 secretion (activated Breg only)
  Reaction_326: => IL10; k_IL10_sec_Breg*aBreg;
  // Endogenous antibody secretion by plasma cells
  Reaction_327: => Ab; k_Ab_sec*Plasma;
  // Antibody degradation/clearance in tumor
  Reaction_328: Ab => ; k_Ab_deg*Ab*V_T;

  // Events:
  Event_1: at (C_total < 0.5*cell): K_vasc = 0.01*cell;
  Event_2: at (C1 < 0.5*cell): C1 = 0*cell;

  // Unit definitions:
  unit MWBUILTINUNIT_liter = metre^3 * 1e-3 dimensionless;
  unit MWBUILTINPREFIX_milli_MWBUILTINUNIT_liter = metre^3 * 1e-6 dimensionless; MWBUILTINPREFIX_milli_MWBUILTINUNIT_liter is "milliliter";
  unit MWDERIVEDUNIT_millimeter___3 = metre^3 * 1e-9 dimensionless; MWDERIVEDUNIT_millimeter___3 is "millimeter^3";
  unit MWDERIVEDUNIT_micrometer___2 = metre^2 * 1e-12 dimensionless; MWDERIVEDUNIT_micrometer___2 is "micrometer^2";
  unit MWUSERUNIT_cell = 1.660539e-24 mole;
  unit MWBUILTINPREFIX_nano_MWBUILTINUNIT_molarity = mole * 1e-6 dimensionless / metre^3; MWBUILTINPREFIX_nano_MWBUILTINUNIT_molarity is "nanomolarity";
  unit MWDERIVEDUNIT_nanomolarity_liter = 1e-9 mole; MWDERIVEDUNIT_nanomolarity_liter is "(nanomolarity)*(liter)";
  unit MWBUILTINPREFIX_milli_MWBUILTINUNIT_gram = 1e-3 gram; MWBUILTINPREFIX_milli_MWBUILTINUNIT_gram is "milligram";
  unit MWDERIVEDUNIT_picogram__milliliter = gram * 1e-6 dimensionless / metre^3; MWDERIVEDUNIT_picogram__milliliter is "picogram/milliliter";
  unit MWDERIVEDUNIT_picogram__milliliter_milliliter = 1e-12 gram; MWDERIVEDUNIT_picogram__milliliter_milliliter is "(picogram/milliliter)*(milliliter)";
  unit MWBUILTINUNIT_molarity = mole * 1000 dimensionless / metre^3;
  unit MWDERIVEDUNIT_molarity_milliliter = 1e-3 mole; MWDERIVEDUNIT_molarity_milliliter is "(molarity)*(milliliter)";
  unit MWDERIVEDUNIT_nanomolarity_milliliter = 1e-12 mole; MWDERIVEDUNIT_nanomolarity_milliliter is "(nanomolarity)*(milliliter)";
  unit MWDERIVEDUNIT_nanomolarity_millimeter___3 = 1e-15 mole; MWDERIVEDUNIT_nanomolarity_millimeter___3 is "(nanomolarity)*(millimeter^3)";
  unit MWDERIVEDUNIT_molarity_litre = mole; MWDERIVEDUNIT_molarity_litre is "(molarity)*(litre)";
  unit MWDERIVEDUNIT_molecule__micrometer___2 = mole * 1.660539e-12 dimensionless / metre^2; MWDERIVEDUNIT_molecule__micrometer___2 is "molecule/micrometer^2";
  unit MWDERIVEDUNIT_molecule__micrometer___2_micrometer___2 = 1.660539e-24 mole; MWDERIVEDUNIT_molecule__micrometer___2_micrometer___2 is "(molecule/micrometer^2)*(micrometer^2)";
  unit MWBUILTINPREFIX_nano_MWBUILTINUNIT_mole = 1e-9 mole; MWBUILTINPREFIX_nano_MWBUILTINUNIT_mole is "nanomole";
  unit MWDERIVEDUNIT_1__day = 1.157407e-5 dimensionless / second; MWDERIVEDUNIT_1__day is "1/day";
  unit MWBUILTINUNIT_day = 86400 second;
  unit MWBUILTINPREFIX_micro_MWBUILTINUNIT_meter = 1e-6 metre; MWBUILTINPREFIX_micro_MWBUILTINUNIT_meter is "micrometer";
  unit MWDERIVEDUNIT_micrometer___3__cell = metre^3 * 602214.2 dimensionless / mole; MWDERIVEDUNIT_micrometer___3__cell is "micrometer^3/cell";
  unit MWDERIVEDUNIT_cell__day = mole * 1.92192e-29 dimensionless / second; MWDERIVEDUNIT_cell__day is "cell/day";
  unit MWBUILTINPREFIX_centi_MWBUILTINUNIT_meter = 0.01 metre; MWBUILTINPREFIX_centi_MWBUILTINUNIT_meter is "centimeter";
  unit MWDERIVEDUNIT_picogram__cell__day = gram * 6970072 dimensionless / (mole * second); MWDERIVEDUNIT_picogram__cell__day is "picogram/cell/day";
  unit MWDERIVEDUNIT_cell__milliliter = mole * 1.660539e-18 dimensionless / metre^3; MWDERIVEDUNIT_cell__milliliter is "cell/milliliter";
  unit MWDERIVEDUNIT_1__minute = 0.01666667 dimensionless / second; MWDERIVEDUNIT_1__minute is "1/minute";
  unit MWDERIVEDUNIT_1__centimeter___3_minute = 16666.67 dimensionless / (metre^3 * second); MWDERIVEDUNIT_1__centimeter___3_minute is "1/(centimeter^3*minute)";
  unit MWDERIVEDUNIT_1__day_cell = 6.970072e18 dimensionless / (mole * second); MWDERIVEDUNIT_1__day_cell is "1/(day*cell)";
  unit MWDERIVEDUNIT_millimeter___3__day = metre^3 * 1.157407e-14 dimensionless / second; MWDERIVEDUNIT_millimeter___3__day is "millimeter^3/day";
  unit MWDERIVEDUNIT_1__day__cell = 6.970072e18 dimensionless / (mole * second); MWDERIVEDUNIT_1__day__cell is "1/day/cell";
  unit MWDERIVEDUNIT_1__day__molarity = metre^3 * 1.157407e-8 dimensionless / (mole * second); MWDERIVEDUNIT_1__day__molarity is "1/day/molarity";
  unit MWDERIVEDUNIT_mole__cell = 6.022142e23 dimensionless; MWDERIVEDUNIT_mole__cell is "mole/cell";
  unit MWDERIVEDUNIT_1__second_molecule__micrometer___2 = metre^2 * 6.022142e11 dimensionless / (mole * second); MWDERIVEDUNIT_1__second_molecule__micrometer___2 is "1/(second*molecule/micrometer^2)";
  unit MWDERIVEDUNIT_1__second = dimensionless / second; MWDERIVEDUNIT_1__second is "1/second";
  unit MWDERIVEDUNIT_liter__second = metre^3 * 1e-3 dimensionless / second; MWDERIVEDUNIT_liter__second is "liter/second";
  unit MWDERIVEDUNIT_milliliter__second = metre^3 * 1e-6 dimensionless / second; MWDERIVEDUNIT_milliliter__second is "milliliter/second";
  unit MWDERIVEDUNIT_liter__day = metre^3 * 1.157407e-8 dimensionless / second; MWDERIVEDUNIT_liter__day is "liter/day";
  unit MWDERIVEDUNIT_1__micromolarity_nanometer_second = metre^2 * 1e12 dimensionless / (mole * second); MWDERIVEDUNIT_1__micromolarity_nanometer_second is "1/(micromolarity*nanometer*second)";
  unit MWDERIVEDUNIT_molecule__day = mole * 1.92192e-29 dimensionless / second; MWDERIVEDUNIT_molecule__day is "molecule/day";
  unit MWDERIVEDUNIT_1__molarity_second = metre^3 * 1e-3 dimensionless / (mole * second); MWDERIVEDUNIT_1__molarity_second is "1/(molarity*second)";
  unit MWDERIVEDUNIT_1__nanometer = 1e9 dimensionless / metre; MWDERIVEDUNIT_1__nanometer is "1/nanometer";
  unit MWBUILTINUNIT_molecule = 1.660539e-24 mole;
  unit MWDERIVEDUNIT_cell___2 = mole^2 * 2.757389e-48 dimensionless; MWDERIVEDUNIT_cell___2 is "cell^2";
  unit MWDERIVEDUNIT_cell__milliliter_day = mole * 1.92192e-23 dimensionless / (metre^3 * second); MWDERIVEDUNIT_cell__milliliter_day is "cell/(milliliter*day)";
  unit MWDERIVEDUNIT_nanomole__cell__hour = 1.672817e11 dimensionless / second; MWDERIVEDUNIT_nanomole__cell__hour is "nanomole/cell/hour";
  unit MWDERIVEDUNIT_nanomole__cell__day = 6.970072e9 dimensionless / second; MWDERIVEDUNIT_nanomole__cell__day is "nanomole/cell/day";
  unit MWBUILTINPREFIX_pico_MWBUILTINUNIT_molarity = mole * 1e-9 dimensionless / metre^3; MWBUILTINPREFIX_pico_MWBUILTINUNIT_molarity is "picomolarity";
  unit MWDERIVEDUNIT_1__hour = 2.777778e-4 dimensionless / second; MWDERIVEDUNIT_1__hour is "1/hour";
  unit MWDERIVEDUNIT_1__picomolarity = metre^3 * 1e9 dimensionless / mole; MWDERIVEDUNIT_1__picomolarity is "1/picomolarity";
  unit MWDERIVEDUNIT_1__micromolarity_minute_nanometer = metre^2 * 1.666667e10 dimensionless / (mole * second); MWDERIVEDUNIT_1__micromolarity_minute_nanometer is "1/(micromolarity*minute*nanometer)";
  unit MWDERIVEDUNIT_milligram__cell_day = gram * 6.970072e15 dimensionless / (mole * second); MWDERIVEDUNIT_milligram__cell_day is "milligram/(cell*day)";
  unit MWDERIVEDUNIT_milliliter__cell_day = metre^3 * 6.970072e12 dimensionless / (mole * second); MWDERIVEDUNIT_milliliter__cell_day is "milliliter/(cell*day)";
  unit MWDERIVEDUNIT_gram__milliliter = gram * 1000000 dimensionless / metre^3; MWDERIVEDUNIT_gram__milliliter is "gram/milliliter";
  unit MWDERIVEDUNIT_nanomolarity_liter__cell_day = 6.970072e9 dimensionless / second; MWDERIVEDUNIT_nanomolarity_liter__cell_day is "nanomolarity*liter/(cell*day)";
  unit MWDERIVEDUNIT_nanomole__cell_day = 6.970072e9 dimensionless / second; MWDERIVEDUNIT_nanomole__cell_day is "nanomole/(cell*day)";
  unit MWDERIVEDUNIT_picogram__cell_day = gram * 6970072 dimensionless / (mole * second); MWDERIVEDUNIT_picogram__cell_day is "picogram/(cell*day)";
  unit MWDERIVEDUNIT_nanomolarity__cell__day = 6.970072e12 dimensionless / (metre^3 * second); MWDERIVEDUNIT_nanomolarity__cell__day is "nanomolarity/cell/day";
  unit MWDERIVEDUNIT_nanomole__cell = 6.022142e14 dimensionless; MWDERIVEDUNIT_nanomole__cell is "nanomole/cell";
  unit MWDERIVEDUNIT_1__cell_day = 6.970072e18 dimensionless / (mole * second); MWDERIVEDUNIT_1__cell_day is "1/(cell*day)";
  unit MWDERIVEDUNIT_milligram__day = gram * 1.157407e-8 dimensionless / second; MWDERIVEDUNIT_milligram__day is "milligram/day";
end
